# OpenSim document version 40000
InverseKinematicsTool:
  model_file: D:/ms_model_estimation/dataset/opensim/BMLmovi/BMLmovi/Subject_11_F_MoSh/scale.osim
  constraint_weight: 20
  accuracy: 1e-5
  marker_file: MotionTrcData/Subject_11_F_11_poses.trc
  time_range: 0 4.608333
  output_motion_file: IKResults/Subject_11_F_11_poses.mot
  report_errors: true
  report_marker_locations: true
  IKTaskSet:
    IKMarkerTask MASI: apply=true weight=0
    IKMarkerTask MPSI: apply=true weight=0
    IKMarkerTask MHIPJ: apply=true weight=0
    IKMarkerTask CENTER: apply=true weight=0
    IKMarkerTask Virtual_LWRIST: apply=true weight=0
    IKMarkerTask Virtual_RWRIST: apply=true weight=0
    IKMarkerTask Virtual_LAJC: apply=true weight=0
    IKMarkerTask Virtual_RAJC: apply=true weight=0
    IKMarkerTask Virtual_LKJC: apply=true weight=0
    IKMarkerTask Virtual_RKJC: apply=true weight=0
    IKMarkerTask Virtual_Ground_RAJC: apply=true weight=0
    IKMarkerTask Virtual_Ground_LAJC: apply=true weight=0
    IKMarkerTask Virtual_Ground_RFOOT: apply=true weight=0
    IKMarkerTask Virtual_Ground_LFOOT: apply=true weight=0
    IKMarkerTask Virtual_Ground_RTOE: apply=true weight=0
    IKMarkerTask Virtual_Ground_LTOE: apply=true weight=0
    IKMarkerTask Virtual_Ground_RMT1: apply=true weight=0
    IKMarkerTask Virtual_Ground_LMT1: apply=true weight=0
    IKMarkerTask Virtual_Ground_RMT5: apply=true weight=0
    IKMarkerTask Virtual_Ground_LMT5: apply=true weight=0
    IKMarkerTask Virtual_Ground_RHEE: apply=true weight=0
    IKMarkerTask Virtual_Ground_LHEE: apply=true weight=0
    IKMarkerTask Virtual_LELC: apply=true weight=0
    IKMarkerTask Virtual_RELC: apply=true weight=0
    IKMarkerTask ROOT: apply=true weight=10
    IKMarkerTask LPSI: apply=true weight=20
    IKMarkerTask RPSI: apply=true weight=20
    IKMarkerTask RASI: apply=true weight=20
    IKMarkerTask LASI: apply=true weight=20
    IKMarkerTask LHIPJ: apply=true weight=10
    IKMarkerTask RHIPJ: apply=true weight=10
    IKMarkerTask Tracking_L5: apply=true weight=1
    IKMarkerTask Tracking_L4: apply=true weight=1
    IKMarkerTask Tracking_L3: apply=true weight=1
    IKMarkerTask Tracking_L2: apply=true weight=1
    IKMarkerTask Tracking_L1: apply=true weight=1
    IKMarkerTask T12: apply=true weight=10
    IKMarkerTask Tracking_T11: apply=true weight=1
    IKMarkerTask Tracking_T9: apply=true weight=1
    IKMarkerTask T10: apply=true weight=20
    IKMarkerTask Tracking_T7: apply=true weight=1
    IKMarkerTask T8: apply=true weight=10
    IKMarkerTask Tracking_T6: apply=true weight=1
    IKMarkerTask Tracking_T5: apply=true weight=1
    IKMarkerTask Tracking_T4: apply=true weight=1
    IKMarkerTask Tracking_T3: apply=true weight=1
    IKMarkerTask Tracking_T2: apply=true weight=1
    IKMarkerTask T1: apply=true weight=10
    IKMarkerTask Spine1: apply=true weight=1
    IKMarkerTask Spine2: apply=true weight=1
    IKMarkerTask Spine3: apply=true weight=1
    IKMarkerTask LCOL: apply=true weight=1
    IKMarkerTask RCOL: apply=true weight=1
    IKMarkerTask STRN: apply=true weight=20
    IKMarkerTask CLAV: apply=true weight=20
    IKMarkerTask C7: apply=true weight=20
    IKMarkerTask NECK: apply=true weight=10
    IKMarkerTask HEAD: apply=true weight=10
    IKMarkerTask LBHD: apply=true weight=10
    IKMarkerTask LFHD: apply=true weight=10
    IKMarkerTask RBHD: apply=true weight=10
    IKMarkerTask RFHD: apply=true weight=10
    IKMarkerTask LKJC: apply=true weight=1
    IKMarkerTask RKJC: apply=true weight=1
    IKMarkerTask RKNE: apply=true weight=20
    IKMarkerTask RKNI: apply=true weight=20
    IKMarkerTask LKNE: apply=true weight=20
    IKMarkerTask LKNI: apply=true weight=20
    IKMarkerTask LAJC: apply=true weight=1
    IKMarkerTask RAJC: apply=true weight=1
    IKMarkerTask LANK: apply=true weight=20
    IKMarkerTask RANK: apply=true weight=20
    IKMarkerTask LANI: apply=true weight=20
    IKMarkerTask RANI: apply=true weight=20
    IKMarkerTask LFOOT: apply=true weight=20
    IKMarkerTask RFOOT: apply=true weight=20
    IKMarkerTask LHEE: apply=true weight=20
    IKMarkerTask RHEE: apply=true weight=20
    IKMarkerTask LMT5: apply=true weight=1
    IKMarkerTask RMT5: apply=true weight=1
    IKMarkerTask RMT1: apply=true weight=1
    IKMarkerTask LMT1: apply=true weight=1
    IKMarkerTask RTOE: apply=true weight=10
    IKMarkerTask LTOE: apply=true weight=10
    IKMarkerTask LCLAV: apply=true weight=1
    IKMarkerTask RCLAV: apply=true weight=1
    IKMarkerTask LSHO: apply=true weight=20
    IKMarkerTask RSHO: apply=true weight=20
    IKMarkerTask LELC: apply=true weight=1
    IKMarkerTask RELC: apply=true weight=1
    IKMarkerTask LELB: apply=true weight=20
    IKMarkerTask RELB: apply=true weight=20
    IKMarkerTask LELBIN: apply=true weight=20
    IKMarkerTask RELBIN: apply=true weight=20
    IKMarkerTask LSHOULDER: apply=true weight=0
    IKMarkerTask RSHOULDER: apply=true weight=0
    IKMarkerTask LWRIST: apply=true weight=1
    IKMarkerTask RWRIST: apply=true weight=1
    IKMarkerTask LIWR: apply=true weight=20
    IKMarkerTask RIWR: apply=true weight=20
    IKMarkerTask LOWR: apply=true weight=20
    IKMarkerTask ROWR: apply=true weight=20
    IKMarkerTask left_index1: apply=true weight=20
    IKMarkerTask left_index2: apply=true weight=20
    IKMarkerTask left_index3: apply=true weight=20
    IKMarkerTask left_middle1: apply=true weight=20
    IKMarkerTask left_middle2: apply=true weight=20
    IKMarkerTask left_middle3: apply=true weight=20
    IKMarkerTask left_pinky1: apply=true weight=20
    IKMarkerTask left_pinky2: apply=true weight=20
    IKMarkerTask left_pinky3: apply=true weight=20
    IKMarkerTask left_ring1: apply=true weight=20
    IKMarkerTask left_ring2: apply=true weight=20
    IKMarkerTask left_ring3: apply=true weight=20
    IKMarkerTask left_thumb1: apply=true weight=20
    IKMarkerTask left_thumb2: apply=true weight=20
    IKMarkerTask left_thumb3: apply=true weight=20
    IKMarkerTask right_index1: apply=true weight=20
    IKMarkerTask right_index2: apply=true weight=20
    IKMarkerTask right_index3: apply=true weight=20
    IKMarkerTask right_middle1: apply=true weight=20
    IKMarkerTask right_middle2: apply=true weight=20
    IKMarkerTask right_middle3: apply=true weight=20
    IKMarkerTask right_pinky1: apply=true weight=20
    IKMarkerTask right_pinky2: apply=true weight=20
    IKMarkerTask right_pinky3: apply=true weight=20
    IKMarkerTask right_ring1: apply=true weight=20
    IKMarkerTask right_ring2: apply=true weight=20
    IKMarkerTask right_ring3: apply=true weight=20
    IKMarkerTask right_thumb1: apply=true weight=20
    IKMarkerTask right_thumb2: apply=true weight=20
    IKMarkerTask right_thumb3: apply=true weight=20
    IKMarkerTask rthumb: apply=true weight=20
    IKMarkerTask rindex: apply=true weight=20
    IKMarkerTask rmiddle: apply=true weight=20
    IKMarkerTask rring: apply=true weight=20
    IKMarkerTask rpinky: apply=true weight=20
    IKMarkerTask lthumb: apply=true weight=20
    IKMarkerTask lindex: apply=true weight=20
    IKMarkerTask lmiddle: apply=true weight=20
    IKMarkerTask lring: apply=true weight=20
    IKMarkerTask lpinky: apply=true weight=20
