# OpenSim document version 40000
Model scale:
  gravity: 0 -9.80665 0
  length_units: meters
  force_units: N
  Ground
  BodySet:
    Body pelvis: mass=9.726046 [kg] mass_center=(-0.08694507 -0.01253652 0) inertia=(0 0 0 0 0 0)
        meshes=(videoMuscle_sacrum.obj videoMuscle_pelvis.obj videoMuscle_l_pelvis.obj)
    Body lumbar5: mass=2.585805 mass_center=(0.01601273 0.02121931 0) inertia=(0.1746079 0.1746079 0.08232734 0 0 0)
        meshes=videoMuscle_lumbar5.obj
    Body lumbar4: mass=2.453842 mass_center=(0.02015192 0.01634975 0) inertia=(0.1609394 0.1609394 0.078407 0 0 0)
        meshes=videoMuscle_lumbar4.obj
    Body lumbar3: mass=2.387096 mass_center=(0.0317847 0.01191643 0) inertia=(0.1530002 0.1530002 0.08157351 0 0 0)
        meshes=videoMuscle_lumbar3.obj
    Body lumbar2: mass=2.325882 mass_center=(0.04030151 0.006041358 0) inertia=(0.1567705 0.1567705 0.08911263 0 0 0)
        meshes=videoMuscle_lumbar2.obj
    Body lumbar1: mass=2.369438 mass_center=(0.04809322 0.0009440355 0) inertia=(0.1601115 0.1601115 0.09650091 0 0 0)
        meshes=videoMuscle_lumbar1.obj
    Body thoracic12: mass=2.33836 mass_center=(0.06095296 -0.00175534 0) inertia=(0.1588035 0.1588035 0.09092196 0 0 0)
        meshes=videoMuscle_thoracic12_s.obj
    Body thoracic11: mass=1.889264 mass_center=(0.06597999 -0.0009591823 0)
        inertia=(0.1312955 0.1312955 0.09402357 0 0 0) meshes=videoMuscle_thoracic11_s.obj
    Body thoracic10: mass=1.82346 mass_center=(0.07058343 0.001861954 0) inertia=(0.129138 0.129138 0.09295335 0 0 0)
        meshes=videoMuscle_thoracic10_s.obj
    Body thoracic9: mass=1.532224 mass_center=(0.07515719 0.003868283 0) inertia=(0.1029055 0.1029055 0.06898182 0 0 0)
        meshes=videoMuscle_thoracic9_s.obj
    Body thoracic8: mass=1.443111 mass_center=(0.07002 0.00846002 0) inertia=(0.1038024 0.1038024 0.06513307 0 0 0)
        meshes=videoMuscle_thoracic8_s.obj
    Body thoracic7: mass=1.490316 mass_center=(0.06497183 0.02019335 0) inertia=(0.1060997 0.1060997 0.06013574 0 0 0)
        meshes=videoMuscle_thoracic7_s.obj
    Body thoracic6: mass=1.336811 mass_center=(0.05979013 0.02619412 0) inertia=(0.1112462 0.1112462 0.0567458 0 0 0)
        meshes=videoMuscle_thoracic6_s.obj
    Body thoracic5: mass=1.374952 mass_center=(0.05178943 0.03097439 0) inertia=(0.1142419 0.1142419 0.05173454 0 0 0)
        meshes=videoMuscle_thoracic5_s.obj
    Body thoracic4: mass=1.232395 mass_center=(0.04251363 0.03228559 0) inertia=(0.118141 0.118141 0.04937623 0 0 0)
        meshes=videoMuscle_thoracic4_s.obj
    Body thoracic3: mass=1.331867 mass_center=(0.02855355 0.02759171 0) inertia=(0.1190619 0.1190619 0.04628093 0 0 0)
        meshes=videoMuscle_thoracic3_s.obj
    Body thoracic2: mass=1.117384 mass_center=(0.02193367 0.02461511 0) inertia=(0.09567784 0.09567784 0.0346371 0 0 0)
        meshes=videoMuscle_thoracic2_s.obj
    Body thoracic1: mass=1.051779 mass_center=(0.005192623 0.01758245 0)
        inertia=(0.09515028 0.09515028 0.02977316 0 0 0) meshes=videoMuscle_thoracic1_s.obj
    Body head_neck: mass=6.310639 mass_center=(0 0.1369403 0) inertia=(0 0 0 0 0 0) meshes=videoMuscle_rotatedcerv7.obj
    Body femur_r: mass=12.87589 mass_center=(0 -0.1841843 0) inertia=(0 0 0 0 0 0) meshes=videoMuscle_femur_r.obj
    Body tibia_r: mass=3.93733 mass_center=(0 -0.2032435 0) inertia=(0 0 0 0 0 0)
        meshes=(videoMuscle_tibia_r.obj videoMuscle_fibula.obj)
    Body talus_r: mass=0.07951951 mass_center=(0 0 0) inertia=(0 0 0 0 0 0) meshes=videoMuscle_talus.obj
    Body calcn_r: mass=0.9940003 mass_center=(0.1050756 0.04339788 0) inertia=(0 0 0 0 0 0) meshes=videoMuscle_foot.obj
    Body toes_r: mass=0.1722404 mass_center=(0.03135936 0.009161428 -0.02212213) inertia=(0 0 0 0 0 0)
        meshes=videoMuscle_bofoot.obj
    Body femur_l: mass=12.87589 mass_center=(0 -0.1881146 0) inertia=(0 0 0 0 0 0) meshes=videoMuscle_femur_l.obj
    Body tibia_l: mass=3.93733 mass_center=(0 -0.2014851 0) inertia=(0 0 0 0 0 0)
        meshes=(videoMuscle_tibia_l.obj videoMuscle_fibula_l.obj)
    Body talus_l: mass=0.07951951 mass_center=(0 0 0) inertia=(0 0 0 0 0 0) meshes=videoMuscle_talus_lv.obj
    Body calcn_l: mass=0.9940003 mass_center=(0.1043185 0.03835353 0) inertia=(0 0 0 0 0 0)
        meshes=videoMuscle_l_foot.obj
    Body toes_l: mass=0.1722404 mass_center=(0.02955317 0.01020312 0.02463749) inertia=(0 0 0 0 0 0)
        meshes=videoMuscle_l_bofoot.obj
    Body cerv6: mass=1.177185e-25 mass_center=(0 0 0) inertia=(0 0 0 0 0 0) meshes=videoMuscle_cerv6.obj
    Body cerv5: mass=1.177185e-25 mass_center=(0 0 0) inertia=(0 0 0 0 0 0) meshes=videoMuscle_cerv5.obj
    Body cerv4: mass=1.177185e-25 mass_center=(0 0 0) inertia=(0 0 0 0 0 0) meshes=videoMuscle_cerv4.obj
    Body cerv3: mass=1.177185e-25 mass_center=(0 0 0) inertia=(0 0 0 0 0 0) meshes=videoMuscle_cerv3.obj
    Body cerv2: mass=1.177185e-25 mass_center=(0 0 0) inertia=(0 0 0 0 0 0) meshes=videoMuscle_cerv2.obj
    Body cerv1: mass=1.177185e-25 mass_center=(0 0 0) inertia=(0 0 0 0 0 0) meshes=videoMuscle_cerv1.obj
    Body jaw: mass=1.177185e-25 mass_center=(0 0 0) inertia=(0 0 0 0 0 0) meshes=videoMuscle_jaw.obj
    Body skull: mass=1.177185e-25 mass_center=(0 0 0) inertia=(0 0 0 0 0 0) meshes=videoMuscle_skull.obj
    Body thorax: mass=0.0001165787 mass_center=(0 0 0) inertia=(0 0 0 0 0 0) meshes=videoMuscle_thorax.obj
      WrapEllipsoid Thorax: xyz_body_rotation=(0.0434587 -0.3319616 0.1898918)
          translation=(-0.04963547 -0.1411148 0.05683999) quadrant=all dimensions=(0.1233428 0.1504576 0.0688332)
      WrapEllipsoid Thorax_l: xyz_body_rotation=(-0.0434587 0.3319616 0.1898918)
          translation=(-0.04963547 -0.1411148 -0.05683999) quadrant=all dimensions=(0.1233428 0.1504576 0.0688332)
    Body clavicle: mass=0.0001165787 mass_center=(0 0 0) inertia=(0 0 0 0 0 0) meshes=videoMuscle_clavicle.obj
    Body clavphant: mass=1.177185e-25 mass_center=(0 0 0) inertia=(0 0 0 0 0 0)
    Body scapula: mass=0.0001165787 mass_center=(0 0 0) inertia=(0 0 0 0 0 0) meshes=videoMuscle_scapula.obj
      WrapEllipsoid Deltoid2: active=false xyz_body_rotation=(3.130423 -1.548805 -1.314233)
          translation=(-0.00779372 -0.04190212 0.007608459) quadrant=-y dimensions=(0.03272014 0.03281088 0.0470221)
      WrapTorus Delt3: active=false xyz_body_rotation=(0.6209881 0.32882 -0.5607743)
          translation=(-0.1307464 -0.04744472 -0.02932427) quadrant=all inner_radius=0.04633438 outer_radius=0.06950157
      WrapTorus INFSP: xyz_body_rotation=(0.02530727 0.5883505 0.1518436)
          translation=(-0.07538409 -0.02205958 -0.008876535) quadrant=all inner_radius=0.009180584
          outer_radius=0.02180389
      WrapEllipsoid TMIN: xyz_body_rotation=(-2.097537 -0.2808235 -1.763481)
          translation=(-0.05616854 -0.05753227 -0.02845246) quadrant=x dimensions=(0.02662189 0.03958323 0.05326236)
      WrapCylinder TRIlongglen: xyz_body_rotation=(1.375319 -0.2946116 2.435956)
          translation=(-0.04824044 -0.03425332 -0.01046163) quadrant=x radius=0.003213639 length=0.03363396
    Body scapphant: mass=1.177185e-25 mass_center=(0 0 0) inertia=(0 0 0 0 0 0)
    Body humphant: mass=1.177185e-25 mass_center=(0 0 0) inertia=(0 0 0 0 0 0)
    Body humphant1: mass=1.177185e-25 mass_center=(0 0 0) inertia=(0 0 0 0 0 0)
    Body humerus: mass=2.464241 mass_center=(0 -0.1261228 0) inertia=(0 0 0 0 0 0) meshes=videoMuscle_humerus.obj
      WrapEllipsoid DELT1hh: xyz_body_rotation=(0.05846853 1.004612 0.5703736)
          translation=(-0.01543465 -0.01455534 -0.02909265) quadrant=z dimensions=(0.03369367 0.1134715 0.05552224)
      WrapCylinder delt2hum: xyz_body_rotation=(1.680927 -0.02495821 0.05166175)
          translation=(0.001887691 -0.1097954 0.001221447) quadrant=all radius=0.01044014 length=0.05728373
      WrapEllipsoid delt3hum: xyz_body_rotation=(1.727352 0.07592182 -2.743134)
          translation=(0.002109773 -0.0678485 0.001221447) quadrant=x dimensions=(0.01110409 0.01111562 0.05725551)
      WrapEllipsoid SUPSP: xyz_body_rotation=(0.03804818 0.00855211 -1.306728)
          translation=(0.0002220813 0.008824889 0.004774749) quadrant=all dimensions=(0.02287604 0.02226075 0.02220926)
      WrapEllipsoid INFSP_and_TMIN_hum_head: xyz_body_rotation=(-0.2865831 -0.00907571 -0.06841691)
          translation=(-0.000333122 0.002979833 0.004219545) quadrant=all dimensions=(0.02221121 0.02858328 0.02226972)
      WrapEllipsoid SUBSCAP: xyz_body_rotation=(-0.9245009 0.288852 0.381529)
          translation=(-0.002776017 0.0008022626 -0.00499683) quadrant=all dimensions=(0.02220827 0.0191409 0.03169734)
      WrapCylinder TMINhum: xyz_body_rotation=(1.753532 0.06928957 2.746276) translation=(-0.001554569 -0.05214707 0)
          quadrant=x radius=0.007777952 length=0.08013993
      WrapSphere TMAJ_LAT_PEC_CORBhh: translation=(0.0007772846 0 0.00666244) quadrant=all radius=0.03367739
      WrapCylinder TMAJ_LAThum: xyz_body_rotation=(1.536413 -0.06370452 1.41424)
          translation=(0.0007772846 -0.05077176 -0.006107237) quadrant=-x radius=0.007773556 length=0.04583675
      WrapEllipsoid PEC1hh: xyz_body_rotation=(-0.6204646 -0.3104941 0.3637266)
          translation=(-0.004108505 0.0005730447 -0.002776017) quadrant=-z
          dimensions=(0.03354954 0.02257039 0.02243999)
      WrapCylinder PEC12hum: xyz_body_rotation=(1.559277 -0.07749262 -0.9258972)
          translation=(0.002220813 -0.05822135 -0.001887691) quadrant=x radius=0.009994729 length=0.08021226
      WrapSphere PEC23hh: translation=(-0.009549497 0.002406788 -0.0004441627) quadrant=all radius=0.0224516
      WrapCylinder PEC3hum: xyz_body_rotation=(1.440944 -0.0561996 1.751961)
          translation=(0.000999366 -0.06314953 -0.0004441627) quadrant=-x radius=0.008886333 length=0.08018079
      WrapCylinder LAT_TMAJhh: xyz_body_rotation=(-0.3050835 -0.01832596 -0.6866125)
          translation=(-0.02487311 0.01169011 0.01043782) quadrant=-y radius=0.007891703 length=0.05012459
      WrapSphere LAT_TMAJ2hh: xyz_body_rotation=(-0.1272345 0.2761111 0.01972222)
          translation=(-0.001776651 0.01054402 0.005774115) quadrant=-z radius=0.03367739
      WrapCylinder CORBhum: xyz_body_rotation=(-1.608321 0.09599311 0.8752826)
          translation=(0.002998098 -0.13776 -0.006551399) quadrant=x radius=0.008884894 length=0.05728719
      WrapEllipsoid TRIlonghh: xyz_body_rotation=(3.001617 -0.853466 2.574186)
          translation=(-0.008661172 -0.004698967 -0.001554569) quadrant=z dimensions=(0.03912704 0.02278537 0.02221465)
      WrapCylinder TRI: xyz_body_rotation=(-0.1401499 -0.00628319 0.1549852)
          translation=(0.003109139 -0.3345435 -0.01321384) quadrant=all radius=0.01805235 length=0.0444465
      WrapEllipsoid ANC: xyz_body_rotation=(0.00750492 -0.1966986 1.049292)
          translation=(0.01487945 -0.3278962 -0.0008883253) quadrant=-x dimensions=(0.02275519 0.02239773 0.02220817)
      WrapEllipsoid BIClong: xyz_body_rotation=(-2.004336 -1.001644 0.9754645)
          translation=(0.003664342 0.008366453 0.000333122) quadrant=-y dimensions=(0.0277665 0.02275777 0.02239009)
      WrapEllipsoid Elbow_BIC_BRD: xyz_body_rotation=(-0.1286308 0.1375319 0.03071779)
          translation=(0.002109773 -0.3312199 -0.01554569) quadrant=x dimensions=(0.0166562 0.01718334 0.1111032)
      WrapEllipsoid Elbow_PT_ECRL: xyz_body_rotation=(-0.1610939 -0.1108284 0.6145304)
          translation=(0.00333122 -0.3291569 -0.007661806) quadrant=x dimensions=(0.02021856 0.02834353 0.03889867)
    Body ulna: mass=0.7082157 mass_center=(0 -0.1305508 0) inertia=(0 0 0 0 0 0) meshes=videoMuscle_ulna.obj
    Body radius: mass=0.7082157 mass_center=(0 -0.1305508 0) inertia=(0 0 0 0 0 0) meshes=videoMuscle_radius.obj
      WrapTorus ECU: xyz_body_rotation=(-0.9866346 -0.1488766 0.222704) translation=(-0.01435952 -0.2625135 0.03074523)
          quadrant=all inner_radius=0.005505858 outer_radius=0.008258787
    Body lunate: mass=0.5333477 mass_center=(0 -0.08175066 0) inertia=(0 0 0 0 0 0) meshes=videoMuscle_lunate.obj
      WrapTorus ECRL: xyz_body_rotation=(1.538333 0.2343977 0.7311184) translation=(0.02665195 -0.01152517 0.0249712)
          quadrant=all inner_radius=0.009604307 outer_radius=0.01920861
      WrapTorus ECRB: xyz_body_rotation=(1.312662 -0.1178097 -0.1162389)
          translation=(0.01512678 -0.01140511 0.02233001) quadrant=all inner_radius=0.009604307 outer_radius=0.01200538
      WrapTorus FCR: xyz_body_rotation=(-1.555961 -0.1532399 -0.1000074)
          translation=(0.003841723 -0.005402423 -0.02281023) quadrant=all inner_radius=0.001200538
          outer_radius=0.003001346
      WrapTorus FCU: xyz_body_rotation=(-1.573763 -0.07976155 0.39235)
          translation=(-0.01476662 -0.01488668 -0.02052921) quadrant=all inner_radius=0.008163661
          outer_radius=0.009604307
    Body scaphoid: mass=1.177185e-25 mass_center=(0 0 0) inertia=(0 0 0 0 0 0) meshes=videoMuscle_scaphoid.obj
    Body pisiform: mass=1.177185e-25 mass_center=(0 0 0) inertia=(0 0 0 0 0 0) meshes=videoMuscle_pisiform.obj
    Body triquetrum: mass=1.177185e-25 mass_center=(0 0 0) inertia=(0 0 0 0 0 0) meshes=videoMuscle_triquetrum.obj
    Body capitate: mass=1.177185e-25 mass_center=(0 0 0) inertia=(0 0 0 0 0 0) meshes=videoMuscle_capitate.obj
    Body trapezium: mass=1.177185e-25 mass_center=(0 0 0) inertia=(0 0 0 0 0 0) meshes=videoMuscle_trapezium.obj
    Body trapezoid: mass=1.177185e-25 mass_center=(0 0 0) inertia=(0 0 0 0 0 0) meshes=videoMuscle_trapezoid.obj
    Body hamate: mass=1.177185e-25 mass_center=(0 0 0) inertia=(0 0 0 0 0 0) meshes=videoMuscle_hamate.obj
    Body firstmc1: mass=1.177185e-25 mass_center=(0 0 0) inertia=(0 0 0 0 0 0)
    Body firstmc: mass=1.177185e-25 mass_center=(0 0 0) inertia=(0 0 0 0 0 0) meshes=videoMuscle_1mc.obj
    Body secondmc: mass=1.177185e-25 mass_center=(0 0 0) inertia=(0 0 0 0 0 0) meshes=videoMuscle_2mc.obj
    Body thirdmc: mass=1.177185e-25 mass_center=(0 0 0) inertia=(0 0 0 0 0 0) meshes=videoMuscle_3mc.obj
    Body fourthmc: mass=1.177185e-25 mass_center=(0 0 0) inertia=(0 0 0 0 0 0) meshes=videoMuscle_4mc.obj
    Body fifthmc: mass=1.177185e-25 mass_center=(0 0 0) inertia=(0 0 0 0 0 0) meshes=videoMuscle_5mc.obj
    Body proximal_thumb: mass=1.177185e-25 mass_center=(0 0 0) inertia=(0 0 0 0 0 0) meshes=videoMuscle_thumbprox.obj
    Body distal_thumb: mass=1.177185e-25 mass_center=(0 0 0) inertia=(0 0 0 0 0 0) meshes=videoMuscle_thumbdist.obj
    Body 2proxph: mass=1.177185e-25 mass_center=(0 0 0) inertia=(0 0 0 0 0 0) meshes=videoMuscle_2proxph.obj
    Body 2midph: mass=1.177185e-25 mass_center=(0 0 0) inertia=(0 0 0 0 0 0) meshes=videoMuscle_2midph.obj
    Body 2distph: mass=1.177185e-25 mass_center=(0 0 0) inertia=(0 0 0 0 0 0) meshes=videoMuscle_2distph.obj
    Body 3proxph: mass=1.177185e-25 mass_center=(0 0 0) inertia=(0 0 0 0 0 0) meshes=videoMuscle_3proxph.obj
    Body 3midph: mass=1.177185e-25 mass_center=(0 0 0) inertia=(0 0 0 0 0 0) meshes=videoMuscle_3midph.obj
    Body 3distph: mass=1.177185e-25 mass_center=(0 0 0) inertia=(0 0 0 0 0 0) meshes=videoMuscle_3distph.obj
    Body 4proxph: mass=1.177185e-25 mass_center=(0 0 0) inertia=(0 0 0 0 0 0) meshes=videoMuscle_4proxph.obj
    Body 4midph: mass=1.177185e-25 mass_center=(0 0 0) inertia=(0 0 0 0 0 0) meshes=videoMuscle_4midph.obj
    Body 4distph: mass=1.177185e-25 mass_center=(0 0 0) inertia=(0 0 0 0 0 0) meshes=videoMuscle_4distph.obj
    Body 5proxph: mass=1.177185e-25 mass_center=(0 0 0) inertia=(0 0 0 0 0 0) meshes=videoMuscle_5proxph.obj
    Body 5midph: mass=1.177185e-25 mass_center=(0 0 0) inertia=(0 0 0 0 0 0) meshes=videoMuscle_5midph.obj
    Body 5distph: mass=1.177185e-25 mass_center=(0 0 0) inertia=(0 0 0 0 0 0) meshes=videoMuscle_5distph.obj
    Body clavicle_l: mass=0.0001165787 mass_center=(0 0 0) inertia=(0 0 0 0 0 0) meshes=videoMuscle_clavicle_l.obj
    Body clavphant_l: mass=1.177185e-25 mass_center=(0 0 0) inertia=(0 0 0 0 0 0)
    Body scapula_l: mass=0.0001165787 mass_center=(0 0 0) inertia=(0 0 0 0 0 0) meshes=videoMuscle_scapula_l.obj
      WrapEllipsoid Deltoid2_l: active=false xyz_body_rotation=(-3.130423 1.548805 -1.314233)
          translation=(-0.00779372 -0.04190212 -0.007511515) quadrant=-y dimensions=(0.03268953 0.03242109 0.04702185)
      WrapTorus Delt3_l: active=false xyz_body_rotation=(-0.6209881 -0.32882 -0.5607743)
          translation=(-0.1307464 -0.04744472 0.02895063) quadrant=all inner_radius=0.04622139 outer_radius=0.06933209
      WrapTorus INFSP_l: xyz_body_rotation=(-0.02530727 -0.5883505 0.1518436)
          translation=(-0.07538409 -0.02205958 0.008763435) quadrant=all inner_radius=0.009163646
          outer_radius=0.02176366
      WrapEllipsoid TMIN_l: xyz_body_rotation=(2.097537 0.2808235 -1.763481)
          translation=(-0.05616854 -0.05753227 0.02808994) quadrant=x dimensions=(0.02636123 0.03958286 0.05310087)
      WrapCylinder TRIlongglen_l: xyz_body_rotation=(-1.375319 0.2946116 2.435956)
          translation=(-0.04824044 -0.03425332 0.01032833) quadrant=x radius=0.003195131 length=0.03361872
    Body scapphant_l: mass=1.177185e-25 mass_center=(0 0 0) inertia=(0 0 0 0 0 0)
    Body humphant_l: mass=1.177185e-25 mass_center=(0 0 0) inertia=(0 0 0 0 0 0)
    Body humphant1_l: mass=1.177185e-25 mass_center=(0 0 0) inertia=(0 0 0 0 0 0)
    Body humerus_l: mass=2.464241 mass_center=(0 -0.1255111 0) inertia=(0 0 0 0 0 0) meshes=videoMuscle_humerus_l.obj
      WrapEllipsoid DELT1hh_l: xyz_body_rotation=(-0.05846853 -1.004612 0.5703736)
          translation=(-0.01524881 -0.01447039 0.02874236) quadrant=-z dimensions=(0.03336536 0.1125937 0.0548541)
      WrapCylinder delt2hum_l: xyz_body_rotation=(-1.680927 0.02495821 0.05166175)
          translation=(0.001864962 -0.1091546 -0.00120674) quadrant=all radius=0.0103149 length=0.05694553
      WrapEllipsoid delt3hum_l: xyz_body_rotation=(-1.727352 -0.07592182 -2.743134)
          translation=(0.002084369 -0.06745254 -0.00120674) quadrant=x dimensions=(0.0109704 0.01098415 0.05691215)
      WrapEllipsoid SUPSP_l: xyz_body_rotation=(-0.03804818 -0.00855211 -1.306728)
          translation=(0.0002194073 0.008773388 -0.004717257) quadrant=all
          dimensions=(0.02273392 0.02200348 0.02194207)
      WrapEllipsoid INFSP_and_TMIN_hum_head_l: xyz_body_rotation=(0.2865831 0.00907571 -0.06841691)
          translation=(-0.000329111 0.002962443 -0.004168739) quadrant=all
          dimensions=(0.02194441 0.02840347 0.02201417)
      WrapEllipsoid SUBSCAP_l: xyz_body_rotation=(0.9245009 -0.288852 0.381529)
          translation=(-0.002742591 0.0007975807 0.004936665) quadrant=all
          dimensions=(0.02194089 0.01896385 0.03143771)
      WrapCylinder TMINhum_l: xyz_body_rotation=(-1.753532 -0.06928957 2.746276)
          translation=(-0.001535851 -0.05184275 0) quadrant=x radius=0.007685346 length=0.07965599
      WrapSphere TMAJ_LAT_PEC_CORBhh_l: translation=(0.0007679256 0 -0.006582219) quadrant=all radius=0.03334488
      WrapCylinder TMAJ_LAThum_l: xyz_body_rotation=(-1.536413 0.06370452 1.41424)
          translation=(0.0007679256 -0.05047546 0.006033701) quadrant=-x radius=0.007680103 length=0.04556796
      WrapEllipsoid PEC1hh_l: xyz_body_rotation=(0.6204646 0.3104941 0.3637266)
          translation=(-0.004059035 0.0005697005 0.002742591) quadrant=z dimensions=(0.03319393 0.02237179 0.02221688)
      WrapCylinder PEC12hum_l: xyz_body_rotation=(-1.559277 0.07749262 -0.9258972)
          translation=(0.002194073 -0.05788157 0.001864962) quadrant=x radius=0.009874604 length=0.07974152
      WrapSphere PEC23hh_l: translation=(-0.009434514 0.002392742 0.0004388146) quadrant=all radius=0.02222992
      WrapCylinder PEC3hum_l: xyz_body_rotation=(-1.440944 0.0561996 1.751961)
          translation=(0.0009873329 -0.062781 0.0004388146) quadrant=-x radius=0.008779966 length=0.0797043
      WrapCylinder LAT_TMAJhh_l: xyz_body_rotation=(0.3050835 0.01832596 -0.6866125)
          translation=(-0.02457362 0.01162189 -0.01031214) quadrant=-y radius=0.007820697 length=0.04955301
      WrapSphere LAT_TMAJ2hh_l: xyz_body_rotation=(0.1272345 -0.2761111 0.01972222)
          translation=(-0.001755258 0.01048249 -0.00570459) quadrant=z radius=0.03334488
      WrapCylinder CORBhum_l: xyz_body_rotation=(1.608321 -0.09599311 0.8752826)
          translation=(0.002961999 -0.136956 0.006472516) quadrant=x radius=0.00877825 length=0.05694961
      WrapEllipsoid TRIlonghh_l: xyz_body_rotation=(-3.001617 0.853466 2.574186)
          translation=(-0.008556885 -0.004671544 0.001535851) quadrant=-z dimensions=(0.03870947 0.02262662 0.02194851)
      WrapCylinder TRI_l: xyz_body_rotation=(0.1401499 0.00628319 0.1549852)
          translation=(0.003071702 -0.3325912 0.01305474) quadrant=all radius=0.01789216 length=0.04391753
      WrapEllipsoid ANC_l: xyz_body_rotation=(-0.00750492 0.1966986 1.049292)
          translation=(0.01470029 -0.3259826 0.0008776292) quadrant=-x dimensions=(0.02259089 0.02216661 0.02194078)
      WrapEllipsoid BIClong_l: xyz_body_rotation=(2.004336 1.001644 0.9754645)
          translation=(0.003620221 0.008317627 -0.000329111) quadrant=-y dimensions=(0.02743348 0.02259395 0.02215752)
      WrapEllipsoid Elbow_BIC_BRD_l: xyz_body_rotation=(0.1286308 -0.1375319 0.03071779)
          translation=(0.002084369 -0.3292869 0.01535851) quadrant=x dimensions=(0.01645566 0.01708156 0.1097783)
      WrapEllipsoid Elbow_PT_ECRL_l: xyz_body_rotation=(0.1610939 0.1108284 0.6145304)
          translation=(0.00329111 -0.327236 0.007569552) quadrant=x dimensions=(0.02002202 0.02811958 0.03843735)
    Body ulna_l: mass=0.7082157 mass_center=(0 -0.1323249 0) inertia=(0 0 0 0 0 0) meshes=videoMuscle_ulna_l.obj
    Body radius_l: mass=0.7082157 mass_center=(0 -0.1323249 0) inertia=(0 0 0 0 0 0) meshes=videoMuscle_radius_l.obj
      WrapTorus ECU_l: xyz_body_rotation=(0.9866346 0.1488766 0.222704)
          translation=(-0.01359716 -0.2649173 -0.02911295) quadrant=all inner_radius=0.005271134
          outer_radius=0.007906702
    Body lunate_l: mass=0.5333477 mass_center=(0 -0.0798865 0) inertia=(0 0 0 0 0 0) meshes=videoMuscle_lunate_l.obj
      WrapTorus ECRL_l: xyz_body_rotation=(-1.538333 -0.2343977 0.7311184)
          translation=(0.02604421 -0.01126236 -0.02440178) quadrant=all inner_radius=0.009385299 outer_radius=0.0187706
      WrapTorus ECRB_l: xyz_body_rotation=(-1.312662 0.1178097 -0.1162389)
          translation=(0.01478185 -0.01114504 -0.02182082) quadrant=all inner_radius=0.009385299
          outer_radius=0.01173162
      WrapTorus FCR_l: xyz_body_rotation=(1.555961 0.1532399 -0.1000074)
          translation=(0.00375412 -0.005279231 0.02229009) quadrant=all inner_radius=0.001173162
          outer_radius=0.002932906
      WrapTorus FCU_l: xyz_body_rotation=(1.573763 0.07976155 0.39235) translation=(-0.0144299 -0.01454721 0.02006108)
          quadrant=all inner_radius=0.007977504 outer_radius=0.009385299
    Body scaphoid_l: mass=1.177185e-25 mass_center=(0 0 0) inertia=(0 0 0 0 0 0) meshes=videoMuscle_scaphoid_l.obj
    Body pisiform_l: mass=1.177185e-25 mass_center=(0 0 0) inertia=(0 0 0 0 0 0) meshes=videoMuscle_pisiform_l.obj
    Body triquetrum_l: mass=1.177185e-25 mass_center=(0 0 0) inertia=(0 0 0 0 0 0) meshes=videoMuscle_triquetrum_l.obj
    Body capitate_l: mass=1.177185e-25 mass_center=(0 0 0) inertia=(0 0 0 0 0 0) meshes=videoMuscle_capitate_l.obj
    Body trapezium_l: mass=1.177185e-25 mass_center=(0 0 0) inertia=(0 0 0 0 0 0) meshes=videoMuscle_trapezium_l.obj
    Body trapezoid_l: mass=1.177185e-25 mass_center=(0 0 0) inertia=(0 0 0 0 0 0) meshes=videoMuscle_trapezoid_l.obj
    Body hamate_l: mass=1.177185e-25 mass_center=(0 0 0) inertia=(0 0 0 0 0 0) meshes=videoMuscle_hamate_l.obj
    Body firstmc1_l: mass=1.177185e-25 mass_center=(0 0 0) inertia=(0 0 0 0 0 0)
    Body firstmc_l: mass=1.177185e-25 mass_center=(0 0 0) inertia=(0 0 0 0 0 0) meshes=videoMuscle_1mc_l.obj
    Body secondmc_l: mass=1.177185e-25 mass_center=(0 0 0) inertia=(0 0 0 0 0 0) meshes=videoMuscle_2mc_l.obj
    Body thirdmc_l: mass=1.177185e-25 mass_center=(0 0 0) inertia=(0 0 0 0 0 0) meshes=videoMuscle_3mc_l.obj
    Body fourthmc_l: mass=1.177185e-25 mass_center=(0 0 0) inertia=(0 0 0 0 0 0) meshes=videoMuscle_4mc_l.obj
    Body fifthmc_l: mass=1.177185e-25 mass_center=(0 0 0) inertia=(0 0 0 0 0 0) meshes=videoMuscle_5mc_l.obj
    Body proximal_thumb_l: mass=1.177185e-25 mass_center=(0 0 0) inertia=(0 0 0 0 0 0)
        meshes=videoMuscle_thumbprox_l.obj
    Body distal_thumb_l: mass=1.177185e-25 mass_center=(0 0 0) inertia=(0 0 0 0 0 0) meshes=videoMuscle_thumbdist_l.obj
    Body 2proxph_l: mass=1.177185e-25 mass_center=(0 0 0) inertia=(0 0 0 0 0 0) meshes=videoMuscle_2proxph_l.obj
    Body 2midph_l: mass=1.177185e-25 mass_center=(0 0 0) inertia=(0 0 0 0 0 0) meshes=videoMuscle_2midph_l.obj
    Body 2distph_l: mass=1.177185e-25 mass_center=(0 0 0) inertia=(0 0 0 0 0 0) meshes=videoMuscle_2distph_l.obj
    Body 3proxph_l: mass=1.177185e-25 mass_center=(0 0 0) inertia=(0 0 0 0 0 0) meshes=videoMuscle_3proxph_l.obj
    Body 3midph_l: mass=1.177185e-25 mass_center=(0 0 0) inertia=(0 0 0 0 0 0) meshes=videoMuscle_3midph_l.obj
    Body 3distph_l: mass=1.177185e-25 mass_center=(0 0 0) inertia=(0 0 0 0 0 0) meshes=videoMuscle_3distph_l.obj
    Body 4proxph_l: mass=1.177185e-25 mass_center=(0 0 0) inertia=(0 0 0 0 0 0) meshes=videoMuscle_4proxph_l.obj
    Body 4midph_l: mass=1.177185e-25 mass_center=(0 0 0) inertia=(0 0 0 0 0 0) meshes=videoMuscle_4midph_l.obj
    Body 4distph_l: mass=1.177185e-25 mass_center=(0 0 0) inertia=(0 0 0 0 0 0) meshes=videoMuscle_4distph_l.obj
    Body 5proxph_l: mass=1.177185e-25 mass_center=(0 0 0) inertia=(0 0 0 0 0 0) meshes=videoMuscle_5proxph_l.obj
    Body 5midph_l: mass=1.177185e-25 mass_center=(0 0 0) inertia=(0 0 0 0 0 0) meshes=videoMuscle_5midph_l.obj
    Body 5distph_l: mass=1.177185e-25 mass_center=(0 0 0) inertia=(0 0 0 0 0 0) meshes=videoMuscle_5distph_l.obj
  JointSet:
    CustomJoint ground_pelvis: socket_parent_frame=ground_offset socket_child_frame=pelvis_offset
      Coordinate pelvis_tilt: default_value=0.04602031 range=(-31.41593 31.41593) clamped=true
      Coordinate pelvis_list: default_value=-0.00762478 range=(-31.41593 31.41593) clamped=true
      Coordinate pelvis_rotation: default_value=-0.00236981 range=(-31.41593 31.41593) clamped=true
      Coordinate pelvis_tx: default_value=0.107892 range=(-20 20) clamped=true
      Coordinate pelvis_ty: default_value=0.0048127 range=(-20 20) clamped=true
      Coordinate pelvis_tz: default_value=-2.378e-5 range=(-20 20) clamped=true
      PhysicalOffsetFrame ground_offset: socket_parent=/ground translation=(0 -0.2351 0) [meters]
      PhysicalOffsetFrame pelvis_offset: socket_parent=/bodyset/pelvis translation=(0 0 0)
      SpatialTransform:
        TransformAxis rotation1: coordinates=pelvis_tilt axis=(0 0 1) LinearFunction(coefficients=1 0)
        TransformAxis rotation2: coordinates=pelvis_list axis=(1 0 0) LinearFunction(coefficients=1 0)
        TransformAxis rotation3: coordinates=pelvis_rotation axis=(0 1 0) LinearFunction(coefficients=1 0)
        TransformAxis translation1: coordinates=pelvis_tx axis=(1 0 0) LinearFunction(coefficients=1 0)
        TransformAxis translation2: coordinates=pelvis_ty axis=(0 1 0) LinearFunction(coefficients=1 0)
        TransformAxis translation3: coordinates=pelvis_tz axis=(0 0 1) LinearFunction(coefficients=1 0)
    CustomJoint L5_S1_IVDjnt: socket_parent_frame=pelvis_offset socket_child_frame=lumbar5_offset
      Coordinate L5_S1_FE: default_value=-0.06924427 range=(-1.570796 0.1745329) clamped=true
      Coordinate L5_S1_LB: default_value=0 range=(-0.1745 0.1745) clamped=true
      Coordinate L5_S1_AR: default_value=0 range=(-0.1745 0.1745) clamped=true
      PhysicalOffsetFrame pelvis_offset: socket_parent=/bodyset/pelvis translation=(-0.1327803 0.08487158 0.002413399)
          orientation=(0 0 -0.36652) [radians]
      PhysicalOffsetFrame lumbar5_offset: socket_parent=/bodyset/lumbar5 translation=(0 0 0)
      SpatialTransform: axes_held_at_zero=(translation1 translation2 translation3)
        TransformAxis rotation1: coordinates=L5_S1_FE axis=(0 0 1) LinearFunction(coefficients=1 0)
        TransformAxis rotation2: coordinates=L5_S1_LB axis=(1 0 0) LinearFunction(coefficients=1 0)
        TransformAxis rotation3: coordinates=L5_S1_AR axis=(0 1 0) LinearFunction(coefficients=1 0)
    CustomJoint L4_L5_IVDjnt: socket_parent_frame=lumbar5_offset socket_child_frame=lumbar4_offset
      Coordinate L4_L5_FE: default_value=0.04667218 range=(-0.1745329 0.1745329) clamped=true
      Coordinate L4_L5_LB: default_value=0 range=(-0.1745329 0.1745329) clamped=true
      Coordinate L4_L5_AR: default_value=0 range=(-0.1745329 0.1745329) clamped=true
      PhysicalOffsetFrame lumbar5_offset: socket_parent=/bodyset/lumbar5 translation=(0 0.03352672 0)
          orientation=(0 0 0.31416)
      PhysicalOffsetFrame lumbar4_offset: socket_parent=/bodyset/lumbar4 translation=(0 0 0)
      SpatialTransform: axes_held_at_zero=(translation1 translation2 translation3)
        TransformAxis rotation1: coordinates=L4_L5_FE axis=(0 0 1) LinearFunction(coefficients=1 0)
        TransformAxis rotation2: coordinates=L4_L5_LB axis=(1 0 0) LinearFunction(coefficients=1 0)
        TransformAxis rotation3: coordinates=L4_L5_AR axis=(0 1 0) LinearFunction(coefficients=1 0)
    WeldJoint L3_L4_IVDjnt: socket_parent_frame=lumbar4_offset socket_child_frame=lumbar3_offset
      PhysicalOffsetFrame lumbar4_offset: socket_parent=/bodyset/lumbar4 translation=(0 0.0311728 0)
          orientation=(0 0 0.20944)
      PhysicalOffsetFrame lumbar3_offset: socket_parent=/bodyset/lumbar3 translation=(0 0 0)
    WeldJoint L2_L3_IVDjnt: socket_parent_frame=lumbar3_offset socket_child_frame=lumbar2_offset
      PhysicalOffsetFrame lumbar3_offset: socket_parent=/bodyset/lumbar3 translation=(0 0.03114061 0)
          orientation=(0 0 0.12217)
      PhysicalOffsetFrame lumbar2_offset: socket_parent=/bodyset/lumbar2 translation=(0 0 0)
    WeldJoint L1_L2_IVDjnt: socket_parent_frame=lumbar2_offset socket_child_frame=lumbar1_offset
      PhysicalOffsetFrame lumbar2_offset: socket_parent=/bodyset/lumbar2 translation=(0 0.02884513 0)
          orientation=(0 0 0.10472)
      PhysicalOffsetFrame lumbar1_offset: socket_parent=/bodyset/lumbar1 translation=(0 0 0)
    CustomJoint T12_L1_IVDjnt: socket_parent_frame=lumbar1_offset socket_child_frame=thoracic12_offset
      Coordinate T12_L1_FE: default_value=0.0291014 range=(-0.1745329 0.1745329) clamped=true
      Coordinate T12_L1_LB: default_value=0 range=(-0.1745329 0.1745329) clamped=true
      Coordinate T12_L1_AR: default_value=0 range=(-0.1745329 0.1745329) clamped=true
      PhysicalOffsetFrame lumbar1_offset: socket_parent=/bodyset/lumbar1 translation=(0 0.03006741 0)
          orientation=(0 0 -0.034907)
      PhysicalOffsetFrame thoracic12_offset: socket_parent=/bodyset/thoracic12 translation=(0 0 0)
      SpatialTransform: axes_held_at_zero=(translation1 translation2 translation3)
        TransformAxis rotation1: coordinates=T12_L1_FE axis=(0 0 1) LinearFunction(coefficients=1 0)
        TransformAxis rotation2: coordinates=T12_L1_LB axis=(1 0 0) LinearFunction(coefficients=1 0)
        TransformAxis rotation3: coordinates=T12_L1_AR axis=(0 1 0) LinearFunction(coefficients=1 0)
    CustomJoint T11_T12_IVDjnt: socket_parent_frame=thoracic12_offset socket_child_frame=thoracic11_offset
      Coordinate T11_T12_FE: default_value=0.0242891 range=(-0.1745329 0.1745329) clamped=true
      Coordinate T11_T12_LB: default_value=0 range=(-0.1745329 0.1745329) clamped=true
      Coordinate T11_T12_AR: default_value=0 range=(-0.1745329 0.1745329) clamped=true
      PhysicalOffsetFrame thoracic12_offset: socket_parent=/bodyset/thoracic12 translation=(0 0.02866132 0)
          orientation=(0 0 -0.069813)
      PhysicalOffsetFrame thoracic11_offset: socket_parent=/bodyset/thoracic11 translation=(0 0 0)
      SpatialTransform: axes_held_at_zero=(translation1 translation2 translation3)
        TransformAxis rotation1: coordinates=T11_T12_FE axis=(0 0 1) LinearFunction(coefficients=1 0)
        TransformAxis rotation2: coordinates=T11_T12_LB axis=(1 0 0) LinearFunction(coefficients=1 0)
        TransformAxis rotation3: coordinates=T11_T12_AR axis=(0 1 0) LinearFunction(coefficients=1 0)
    CustomJoint T10_T11_IVDjnt: socket_parent_frame=thoracic11_offset socket_child_frame=thoracic10_offset
      Coordinate T10_T11_FE: default_value=0.02070456 range=(-0.1745329 0.1745329) clamped=true
      Coordinate T10_T11_LB: default_value=0 range=(-0.1745329 0.1745329) clamped=true
      Coordinate T10_T11_AR: default_value=0 range=(-0.1745329 0.1745329) clamped=true
      PhysicalOffsetFrame thoracic11_offset: socket_parent=/bodyset/thoracic11 translation=(0 0.01993786 0)
          orientation=(0 0 -0.087266)
      PhysicalOffsetFrame thoracic10_offset: socket_parent=/bodyset/thoracic10 translation=(0 0 0)
      SpatialTransform: axes_held_at_zero=(translation1 translation2 translation3)
        TransformAxis rotation1: coordinates=T10_T11_FE axis=(0 0 1) LinearFunction(coefficients=1 0)
        TransformAxis rotation2: coordinates=T10_T11_LB axis=(1 0 0) LinearFunction(coefficients=1 0)
        TransformAxis rotation3: coordinates=T10_T11_AR axis=(0 1 0) LinearFunction(coefficients=1 0)
    CustomJoint T9_T10_IVDjnt: socket_parent_frame=thoracic10_offset socket_child_frame=thoracic9_offset
      Coordinate T9_T10_FE: default_value=0.02080672 range=(-0.1745329 0.1745329) clamped=true
      Coordinate T9_T10_LB: default_value=0 range=(-0.1745329 0.1745329) clamped=true
      Coordinate T9_T10_AR: default_value=0 range=(-0.1745329 0.1745329) clamped=true
      PhysicalOffsetFrame thoracic10_offset: socket_parent=/bodyset/thoracic10 translation=(0 0.01957074 0)
          orientation=(0 0 -0.069813)
      PhysicalOffsetFrame thoracic9_offset: socket_parent=/bodyset/thoracic9 translation=(0 0 0)
      SpatialTransform: axes_held_at_zero=(translation1 translation2 translation3)
        TransformAxis rotation1: coordinates=T9_T10_FE axis=(0 0 1) LinearFunction(coefficients=1 0)
        TransformAxis rotation2: coordinates=T9_T10_LB axis=(1 0 0) LinearFunction(coefficients=1 0)
        TransformAxis rotation3: coordinates=T9_T10_AR axis=(0 1 0) LinearFunction(coefficients=1 0)
    CustomJoint T8_T9_IVDjnt: socket_parent_frame=thoracic9_offset socket_child_frame=thoracic8_offset
      Coordinate T8_T9_FE: default_value=0.0177417 range=(-0.1745329 0.1745329) clamped=true
      Coordinate T8_T9_LB: default_value=0 range=(-0.1745329 0.1745329) clamped=true
      Coordinate T8_T9_AR: default_value=0 range=(-0.1745329 0.1745329) clamped=true
      PhysicalOffsetFrame thoracic9_offset: socket_parent=/bodyset/thoracic9 translation=(0 0.02082363 0)
          orientation=(0 0 -0.087266)
      PhysicalOffsetFrame thoracic8_offset: socket_parent=/bodyset/thoracic8 translation=(0 0 0)
      SpatialTransform: axes_held_at_zero=(translation1 translation2 translation3)
        TransformAxis rotation1: coordinates=T8_T9_FE axis=(0 0 1) LinearFunction(coefficients=1 0)
        TransformAxis rotation2: coordinates=T8_T9_LB axis=(1 0 0) LinearFunction(coefficients=1 0)
        TransformAxis rotation3: coordinates=T8_T9_AR axis=(0 1 0) LinearFunction(coefficients=1 0)
    WeldJoint T7_T8_IVDjnt: socket_parent_frame=thoracic8_offset socket_child_frame=thoracic7_offset
      PhysicalOffsetFrame thoracic8_offset: socket_parent=/bodyset/thoracic8 translation=(0 0.02039283 0)
          orientation=(0 0 -0.10472)
      PhysicalOffsetFrame thoracic7_offset: socket_parent=/bodyset/thoracic7 translation=(0 0 0)
    WeldJoint T6_T7_IVDjnt: socket_parent_frame=thoracic7_offset socket_child_frame=thoracic6_offset
      PhysicalOffsetFrame thoracic7_offset: socket_parent=/bodyset/thoracic7 translation=(0 0.03107444 0)
          orientation=(0 0 -0.10472)
      PhysicalOffsetFrame thoracic6_offset: socket_parent=/bodyset/thoracic6 translation=(0 0 0)
    WeldJoint T5_T6_IVDjnt: socket_parent_frame=thoracic6_offset socket_child_frame=thoracic5_offset
      PhysicalOffsetFrame thoracic6_offset: socket_parent=/bodyset/thoracic6 translation=(0 0.03076051 0)
          orientation=(0 0 -0.10472)
      PhysicalOffsetFrame thoracic5_offset: socket_parent=/bodyset/thoracic5 translation=(0 0 0)
    WeldJoint T4_T5_IVDjnt: socket_parent_frame=thoracic5_offset socket_child_frame=thoracic4_offset
      PhysicalOffsetFrame thoracic5_offset: socket_parent=/bodyset/thoracic5 translation=(0 0.03147344 0)
          orientation=(0 0 -0.10472)
      PhysicalOffsetFrame thoracic4_offset: socket_parent=/bodyset/thoracic4 translation=(0 0 0)
    WeldJoint T3_T4_IVDjnt: socket_parent_frame=thoracic4_offset socket_child_frame=thoracic3_offset
      PhysicalOffsetFrame thoracic4_offset: socket_parent=/bodyset/thoracic4 translation=(0 0.02932625 0)
          orientation=(0 0 -0.069813)
      PhysicalOffsetFrame thoracic3_offset: socket_parent=/bodyset/thoracic3 translation=(0 0 0)
    WeldJoint T2_T3_IVDjnt: socket_parent_frame=thoracic3_offset socket_child_frame=thoracic2_offset
      PhysicalOffsetFrame thoracic3_offset: socket_parent=/bodyset/thoracic3 translation=(0 0.02661229 0)
          orientation=(0 0 -0.05236)
      PhysicalOffsetFrame thoracic2_offset: socket_parent=/bodyset/thoracic2 translation=(0 0 0)
    CustomJoint T1_T2_IVDjnt: socket_parent_frame=thoracic2_offset socket_child_frame=thoracic1_offset
      Coordinate T1_T2_FE: default_value=0.01615365 range=(-0.1745329 0.1745329) clamped=true
      Coordinate T1_T2_LB: default_value=0 range=(-0.1745329 0.1745329) clamped=true
      Coordinate T1_T2_AR: default_value=0 range=(-0.1745329 0.1745329) clamped=true
      PhysicalOffsetFrame thoracic2_offset: socket_parent=/bodyset/thoracic2 translation=(0 0.02428896 0)
          orientation=(0 0 -0.017453)
      PhysicalOffsetFrame thoracic1_offset: socket_parent=/bodyset/thoracic1 translation=(0 0 0)
      SpatialTransform: axes_held_at_zero=(translation1 translation2 translation3)
        TransformAxis rotation1: coordinates=T1_T2_FE axis=(0 0 1) LinearFunction(coefficients=1 0)
        TransformAxis rotation2: coordinates=T1_T2_LB axis=(1 0 0) LinearFunction(coefficients=1 0)
        TransformAxis rotation3: coordinates=T1_T2_AR axis=(0 1 0) LinearFunction(coefficients=1 0)
    CustomJoint T1_head_neck: socket_parent_frame=thoracic1_offset socket_child_frame=head_neck_offset
      Coordinate T1_head_neck_FE: default_value=-0.3281166 range=(-1.570796 0.5235988) clamped=true
      Coordinate T1_head_neck_LB: default_value=0 range=(-0.5235988 0.5235988) clamped=true
      Coordinate T1_head_neck_AR: default_value=0 range=(-1.570796 1.570796) clamped=true
      PhysicalOffsetFrame thoracic1_offset: socket_parent=/bodyset/thoracic1 translation=(-0.007990537 0.02428896 0)
          orientation=(0 0 0.5236)
      PhysicalOffsetFrame head_neck_offset: socket_parent=/bodyset/head_neck translation=(0 0 0)
      SpatialTransform: axes_held_at_zero=(translation1 translation2 translation3)
        TransformAxis rotation1: coordinates=T1_head_neck_FE axis=(0 0 1) LinearFunction(coefficients=1 0)
        TransformAxis rotation2: coordinates=T1_head_neck_LB axis=(1 0 0) LinearFunction(coefficients=1 0)
        TransformAxis rotation3: coordinates=T1_head_neck_AR axis=(0 1 0) LinearFunction(coefficients=1 0)
    CustomJoint hip_r: socket_parent_frame=pelvis_offset socket_child_frame=femur_r_offset
      Coordinate hip_flexion_r: default_value=0.01124401 range=(-2.094395 3.141593) clamped=true
      Coordinate hip_adduction_r: default_value=0.01823006 range=(-2.094395 1.047198) clamped=true
      Coordinate hip_rotation_r: default_value=-0.08266863 range=(-1.5708 1.5708) clamped=true
      PhysicalOffsetFrame pelvis_offset: socket_parent=/bodyset/pelvis translation=(-0.09061816 -0.08294936 0.0995172)
          orientation=(-0.01745329 -0.004869469 -0.0699877)
      PhysicalOffsetFrame femur_r_offset: socket_parent=/bodyset/femur_r translation=(0 0 0)
      SpatialTransform: axes_held_at_zero=(translation1 translation2 translation3)
        TransformAxis rotation1: coordinates=hip_flexion_r axis=(0 0 1) LinearFunction(coefficients=1 0)
        TransformAxis rotation2: coordinates=hip_adduction_r axis=(1 0 0) LinearFunction(coefficients=1 0)
        TransformAxis rotation3: coordinates=hip_rotation_r axis=(0 1 0) LinearFunction(coefficients=1 0)
    CustomJoint knee_r: socket_parent_frame=femur_r_offset socket_child_frame=tibia_r_offset
      Coordinate knee_angle_r: default_value=-0.08097067 range=(-2.617994 0.1745329) clamped=true
      Coordinate knee_angle_y_r: default_value=-0.00847997 range=(-0.1745329 0.1745329) clamped=true
      Coordinate knee_angle_x_r: default_value=-0.00399278 range=(-0.1745329 0.1745329) clamped=true
      PhysicalOffsetFrame femur_r_offset: socket_parent=/bodyset/femur_r
          translation=(-0.003610931 -0.3865251 0.005636851) orientation=(0.0246266 0.009005899 0.002635447)
      PhysicalOffsetFrame tibia_r_offset: socket_parent=/bodyset/tibia_r translation=(0 0 0)
      SpatialTransform: axes_held_at_zero=(translation1 translation2 translation3)
        TransformAxis rotation1: coordinates=knee_angle_r axis=(0 0 1) LinearFunction(coefficients=1 0)
        TransformAxis rotation2: coordinates=knee_angle_y_r axis=(0 1 0) LinearFunction(coefficients=1 0)
        TransformAxis rotation3: coordinates=knee_angle_x_r axis=(1 0 0) LinearFunction(coefficients=1 0)
    CustomJoint ankle_r: socket_parent_frame=tibia_r_offset socket_child_frame=talus_r_offset
      Coordinate ankle_angle_r: default_value=0.01890204 range=(-1.570796 1.047198) clamped=true
      PhysicalOffsetFrame tibia_r_offset: socket_parent=/bodyset/tibia_r
          translation=(0.003680279 -0.4233759 0.003010403) orientation=(0.006859144 -0.005375614 0.06714282)
      PhysicalOffsetFrame talus_r_offset: socket_parent=/bodyset/talus_r translation=(0 0 0)
      SpatialTransform: axes_held_at_zero=(rotation2 rotation3 translation1 translation2 translation3)
        TransformAxis rotation1: coordinates=ankle_angle_r axis=(-0.105014 -0.174022 0.979126)
            LinearFunction(coefficients=1 0)
    CustomJoint subtalar_r: socket_parent_frame=talus_r_offset socket_child_frame=calcn_r_offset
      Coordinate subtalar_angle_r: default_value=0.09083269 range=(-0.3490659 0.8726646) clamped=true
      PhysicalOffsetFrame talus_r_offset: socket_parent=/bodyset/talus_r
          translation=(-0.04006097 -0.04344912 0.01296869) orientation=(0.07682939 -0.0003490659 -0.06606071)
      PhysicalOffsetFrame calcn_r_offset: socket_parent=/bodyset/calcn_r translation=(0 0 0)
      SpatialTransform: axes_held_at_zero=(rotation2 rotation3 translation1 translation2 translation3)
        TransformAxis rotation1: coordinates=subtalar_angle_r axis=(0 1 0) LinearFunction(coefficients=1 0)
    CustomJoint mtp_r: socket_parent_frame=calcn_r_offset socket_child_frame=toes_r_offset
      Coordinate mtp_angle_r: default_value=-0.1302907 range=(-0.2617994 0) clamped=true
      PhysicalOffsetFrame calcn_r_offset: socket_parent=/bodyset/calcn_r
          translation=(0.1721144 -0.002928416 -0.0008967933)
      PhysicalOffsetFrame toes_r_offset: socket_parent=/bodyset/toes_r translation=(0 0 0)
      SpatialTransform: axes_held_at_zero=(rotation2 rotation3 translation1 translation2 translation3)
        TransformAxis rotation1: coordinates=mtp_angle_r axis=(-0.580954 0 0.813936) LinearFunction(coefficients=1 0)
    CustomJoint hip_l: socket_parent_frame=pelvis_offset socket_child_frame=femur_l_offset
      Coordinate hip_flexion_l: default_value=0.0298001 range=(-2.094395 3.141593) clamped=true
      Coordinate hip_adduction_l: default_value=0.01055887 range=(-2.094395 1.047198) clamped=true
      Coordinate hip_rotation_l: default_value=-0.09017932 range=(-1.5708 1.5708) clamped=true
      PhysicalOffsetFrame pelvis_offset: socket_parent=/bodyset/pelvis translation=(-0.09061816 -0.08294936 -0.0995172)
          orientation=(0.01745329 0.004869469 -0.0699877)
      PhysicalOffsetFrame femur_l_offset: socket_parent=/bodyset/femur_l translation=(0 0 0)
      SpatialTransform: axes_held_at_zero=(translation1 translation2 translation3)
        TransformAxis rotation1: coordinates=hip_flexion_l axis=(0 0 1) LinearFunction(coefficients=1 0)
        TransformAxis rotation2: coordinates=hip_adduction_l axis=(-1 0 0) LinearFunction(coefficients=1 0)
        TransformAxis rotation3: coordinates=hip_rotation_l axis=(0 -1 0) LinearFunction(coefficients=1 0)
    CustomJoint knee_l: socket_parent_frame=femur_l_offset socket_child_frame=tibia_l_offset
      Coordinate knee_angle_l: default_value=-0.1083141 range=(-2.617994 0.1745329) clamped=true
      Coordinate knee_angle_y_l: default_value=-0.00930943 range=(-0.1745329 0.1745329) clamped=true
      Coordinate knee_angle_x_l: default_value=-0.00838693 range=(-0.1745329 0.1745329) clamped=true
      PhysicalOffsetFrame femur_l_offset: socket_parent=/bodyset/femur_l
          translation=(-0.003484396 -0.3835984 -0.005439324) orientation=(-0.0246266 -0.009005899 0.002635447)
      PhysicalOffsetFrame tibia_l_offset: socket_parent=/bodyset/tibia_l translation=(0 0 0)
      SpatialTransform: axes_held_at_zero=(translation1 translation2 translation3)
        TransformAxis rotation1: coordinates=knee_angle_l axis=(0 0 1) LinearFunction(coefficients=1 0)
        TransformAxis rotation2: coordinates=knee_angle_y_l axis=(0 1 0) LinearFunction(coefficients=-1 0)
        TransformAxis rotation3: coordinates=knee_angle_x_l axis=(1 0 0) LinearFunction(coefficients=-1 0)
    CustomJoint ankle_l: socket_parent_frame=tibia_l_offset socket_child_frame=talus_l_offset
      Coordinate ankle_angle_l: default_value=0.0870636 range=(-1.570796 0.6981317) clamped=true
      PhysicalOffsetFrame tibia_l_offset: socket_parent=/bodyset/tibia_l
          translation=(0.003832523 -0.4375243 -0.003134937) orientation=(-0.006859144 0.005375614 0.06714282)
      PhysicalOffsetFrame talus_l_offset: socket_parent=/bodyset/talus_l translation=(0 0 0)
      SpatialTransform: axes_held_at_zero=(rotation2 rotation3 translation1 translation2 translation3)
        TransformAxis rotation1: coordinates=ankle_angle_l axis=(0.105014 0.174022 1.047198)
            LinearFunction(coefficients=1 0)
    CustomJoint subtalar_l: socket_parent_frame=talus_l_offset socket_child_frame=calcn_l_offset
      Coordinate subtalar_angle_l: default_value=0.07969267 range=(-0.3490659 0.8726646) clamped=true
      PhysicalOffsetFrame talus_l_offset: socket_parent=/bodyset/talus_l
          translation=(-0.0417182 -0.04490111 -0.01350517) orientation=(-0.07682939 0.0003490659 -0.06606071)
      PhysicalOffsetFrame calcn_l_offset: socket_parent=/bodyset/calcn_l translation=(0 0 0)
      SpatialTransform: axes_held_at_zero=(rotation2 rotation3 translation1 translation2 translation3)
        TransformAxis rotation1: coordinates=subtalar_angle_l axis=(0 -1 0) LinearFunction(coefficients=1 0)
    CustomJoint mtp_l: socket_parent_frame=calcn_l_offset socket_child_frame=toes_l_offset
      Coordinate mtp_angle_l: default_value=-0.1296612 range=(-0.2617994 0) clamped=true
      PhysicalOffsetFrame calcn_l_offset: socket_parent=/bodyset/calcn_l
          translation=(0.1676565 -0.002536876 0.0008486068)
      PhysicalOffsetFrame toes_l_offset: socket_parent=/bodyset/toes_l translation=(0 0 0)
      SpatialTransform: axes_held_at_zero=(rotation2 rotation3 translation1 translation2 translation3)
        TransformAxis rotation1: coordinates=mtp_angle_l axis=(0.580954 0 0.813936) LinearFunction(coefficients=1 0)
    WeldJoint C7_cerv6: socket_parent_frame=head_neck_offset socket_child_frame=cerv6_offset
      PhysicalOffsetFrame head_neck_offset: socket_parent=/bodyset/head_neck translation=(0.003973887 0.01875996 0)
      PhysicalOffsetFrame cerv6_offset: socket_parent=/bodyset/cerv6 translation=(0 0 0)
    WeldJoint C7_cerv5: socket_parent_frame=head_neck_offset socket_child_frame=cerv5_offset
      PhysicalOffsetFrame head_neck_offset: socket_parent=/bodyset/head_neck translation=(0.008366077 0.03923578 0)
      PhysicalOffsetFrame cerv5_offset: socket_parent=/bodyset/cerv5 translation=(0 0 0)
    WeldJoint C7_cerv4: socket_parent_frame=head_neck_offset socket_child_frame=cerv4_offset
      PhysicalOffsetFrame head_neck_offset: socket_parent=/bodyset/head_neck translation=(0.01192166 0.06119866 0)
      PhysicalOffsetFrame cerv4_offset: socket_parent=/bodyset/cerv4 translation=(0 0 0)
    WeldJoint C7_cerv3: socket_parent_frame=head_neck_offset socket_child_frame=cerv3_offset
      PhysicalOffsetFrame head_neck_offset: socket_parent=/bodyset/head_neck translation=(0.01464063 0.07881472 0)
      PhysicalOffsetFrame cerv3_offset: socket_parent=/bodyset/cerv3 translation=(0 0 0)
    WeldJoint C7_cerv2: socket_parent_frame=head_neck_offset socket_child_frame=cerv2_offset
      PhysicalOffsetFrame head_neck_offset: socket_parent=/bodyset/head_neck translation=(0.01453606 0.0974603 0)
      PhysicalOffsetFrame cerv2_offset: socket_parent=/bodyset/cerv2 translation=(0 0 0)
    WeldJoint C7_cerv1: socket_parent_frame=head_neck_offset socket_child_frame=cerv1_offset
      PhysicalOffsetFrame head_neck_offset: socket_parent=/bodyset/head_neck translation=(-0.02269298 0.1178217 0)
      PhysicalOffsetFrame cerv1_offset: socket_parent=/bodyset/cerv1 translation=(0 0 0)
    WeldJoint skull_jaw: socket_parent_frame=skull_offset socket_child_frame=jaw_offset
      PhysicalOffsetFrame skull_offset: socket_parent=/bodyset/skull translation=(0 0 0)
      PhysicalOffsetFrame jaw_offset: socket_parent=/bodyset/jaw translation=(0 0 0)
    CustomJoint C7_skull: socket_parent_frame=head_neck_offset socket_child_frame=skull_offset
      Coordinate skull_z: default_value=0.00243773 range=(-0.3490659 0.3490659) clamped=true
      Coordinate skull_y: default_value=0.00094666 range=(-0.3490659 0.3490659) clamped=true
      Coordinate skull_x: default_value=-7.032e-5 range=(-0.3490659 0.3490659) clamped=true
      PhysicalOffsetFrame head_neck_offset: socket_parent=/bodyset/head_neck translation=(0.02258841 0.1348658 0)
      PhysicalOffsetFrame skull_offset: socket_parent=/bodyset/skull translation=(0 0 0)
      SpatialTransform: axes_held_at_zero=(translation1 translation2 translation3)
        TransformAxis rotation1: coordinates=skull_z axis=(0 0 1) LinearFunction(coefficients=1 0)
        TransformAxis rotation2: coordinates=skull_y axis=(0 1 0) LinearFunction(coefficients=1 0)
        TransformAxis rotation3: coordinates=skull_x axis=(1 0 0) LinearFunction(coefficients=1 0)
    CustomJoint sternoclavicular: socket_parent_frame=thorax_offset socket_child_frame=clavicle_offset
      Coordinate sternoclavicular_r2: default_value=-0.3638641 range=(-1.5741 0.7854) clamped=true
      Coordinate sternoclavicular_r3: default_value=0.1541157 range=(-0.524 0.524) clamped=true
      PhysicalOffsetFrame thorax_offset: socket_parent=/bodyset/thorax translation=(0.008133274 0.007682055 0.0204151)
      PhysicalOffsetFrame clavicle_offset: socket_parent=/bodyset/clavicle translation=(0 0 0)
      SpatialTransform: axes_held_at_zero=(rotation3 translation1 translation2 translation3)
        TransformAxis rotation1: coordinates=sternoclavicular_r2 axis=(0.0153 0.989299 -0.1451)
            LinearFunction(coefficients=1 0)
        TransformAxis rotation2: coordinates=sternoclavicular_r3 axis=(-0.994473 0 -0.104997)
            LinearFunction(coefficients=1 0)
    CustomJoint unrotscap: socket_parent_frame=clavicle_offset socket_child_frame=clavphant_offset
      Coordinate unrotscap_r3: default_value=-0.1541157 range=(-4.7123 4.7123) clamped=true
      Coordinate unrotscap_r2: default_value=0.3638641 range=(-4.7123 4.7123) clamped=true
      PhysicalOffsetFrame clavicle_offset: socket_parent=/bodyset/clavicle translation=(-0.01416296 0.0209884 0.107418)
      PhysicalOffsetFrame clavphant_offset: socket_parent=/bodyset/clavphant translation=(0 0 0)
      SpatialTransform: axes_held_at_zero=(rotation3 translation1 translation2 translation3)
        TransformAxis rotation1: coordinates=unrotscap_r3 axis=(-0.994473 0 -0.104997) LinearFunction(coefficients=1 0)
        TransformAxis rotation2: coordinates=unrotscap_r2 axis=(0.0153 0.989299 -0.1451)
            LinearFunction(coefficients=1 0)
    CustomJoint acromioclavicular: socket_parent_frame=clavphant_offset socket_child_frame=scapula_offset
      Coordinate acromioclavicular_r2: default_value=-0.07367508 range=(-1.5708 1.5708) clamped=true
      Coordinate acromioclavicular_r3: default_value=0.5954161 range=(-4.7123 4.7123) clamped=true
      Coordinate acromioclavicular_r1: default_value=0.2676354 range=(-4.7123 4.7123) clamped=true
      PhysicalOffsetFrame clavphant_offset: socket_parent=/bodyset/clavphant translation=(0 0 0)
      PhysicalOffsetFrame scapula_offset: socket_parent=/bodyset/scapula translation=(0 0 0)
      SpatialTransform: axes_held_at_zero=(translation1 translation2 translation3)
        TransformAxis rotation1: coordinates=acromioclavicular_r2 axis=(0.157095 0.947269 -0.279291)
            LinearFunction(coefficients=1 0)
        TransformAxis rotation2: coordinates=acromioclavicular_r3 axis=(-0.754084 0.297594 0.585487)
            LinearFunction(coefficients=1 0)
        TransformAxis rotation3: coordinates=acromioclavicular_r1 axis=(0.6377 0.1186 0.7611)
            LinearFunction(coefficients=1 0)
    CustomJoint unrothum: socket_parent_frame=scapula_offset socket_child_frame=scapphant_offset
      Coordinate unrothum_r1: default_value=-0.2676354 range=(-4.7123 4.7123) clamped=true
      Coordinate unrothum_r3: default_value=-0.5954161 range=(-4.7123 4.7123) clamped=true
      Coordinate unrothum_r2: default_value=0.07367508 range=(-4.7123 4.7123) clamped=true
      PhysicalOffsetFrame scapula_offset: socket_parent=/bodyset/scapula
          translation=(-0.01283276 -0.03768973 0.00713293)
      PhysicalOffsetFrame scapphant_offset: socket_parent=/bodyset/scapphant translation=(0 0 0)
      SpatialTransform: axes_held_at_zero=(translation1 translation2 translation3)
        TransformAxis rotation1: coordinates=unrothum_r1 axis=(0.6377 0.1186 0.7611) LinearFunction(coefficients=1 0)
        TransformAxis rotation2: coordinates=unrothum_r3 axis=(-0.754084 0.297594 0.585487)
            LinearFunction(coefficients=1 0)
        TransformAxis rotation3: coordinates=unrothum_r2 axis=(0.157095 0.947269 -0.279291)
            LinearFunction(coefficients=1 0)
    CustomJoint shoulder0: socket_parent_frame=scapphant_offset socket_child_frame=humphant_offset
      Coordinate elv_angle: default_value=-0.2785416 range=(-1.570796 3.141593) clamped=true
      PhysicalOffsetFrame scapphant_offset: socket_parent=/bodyset/scapphant translation=(0 0 0)
      PhysicalOffsetFrame humphant_offset: socket_parent=/bodyset/humphant translation=(0 0 0)
      SpatialTransform: axes_held_at_zero=(rotation2 rotation3 translation1 translation2 translation3)
        TransformAxis rotation1: coordinates=elv_angle axis=(0.0048 0.999089 0.0424) LinearFunction(coefficients=1 0)
    CustomJoint shoulder1: socket_parent_frame=humphant_offset socket_child_frame=humphant1_offset
      Coordinate shoulder_elv: default_value=1.503567 range=(-0.1745329 3.141593) clamped=true
      Coordinate shoulder1_r2: default_value=0.2785416 range=(-4.7123 4.7123) clamped=true
      PhysicalOffsetFrame humphant_offset: socket_parent=/bodyset/humphant translation=(0 0 0)
      PhysicalOffsetFrame humphant1_offset: socket_parent=/bodyset/humphant1 translation=(0 0 0)
      SpatialTransform: axes_held_at_zero=(rotation3 translation1 translation2 translation3)
        TransformAxis rotation1: coordinates=shoulder_elv axis=(-0.998261 0.0023 0.058898)
            LinearFunction(coefficients=1 0)
        TransformAxis rotation2: coordinates=shoulder1_r2 axis=(0.0048 0.999089 0.0424)
            LinearFunction(coefficients=1 0)
    CustomJoint shoulder2: socket_parent_frame=humphant1_offset socket_child_frame=humerus_offset
      Coordinate shoulder_rot: default_value=-0.1330989 range=(-1.570796 1.570796) clamped=true
      PhysicalOffsetFrame humphant1_offset: socket_parent=/bodyset/humphant1 translation=(0 0 0)
      PhysicalOffsetFrame humerus_offset: socket_parent=/bodyset/humerus translation=(0 0 0)
      SpatialTransform: axes_held_at_zero=(rotation2 rotation3 translation1 translation2 translation3)
        TransformAxis rotation1: coordinates=shoulder_rot axis=(0.0048 0.999089 0.0424)
            LinearFunction(coefficients=1 0)
    CustomJoint elbow: socket_parent_frame=humerus_offset socket_child_frame=ulna_offset
      Coordinate elbow_flexion: default_value=0.1367816 range=(-0.3490659 3.141593) clamped=true
      Coordinate elbow_x: default_value=0.03405082 range=(-0.6981317 0.6981317) clamped=true
      Coordinate elbow_y: default_value=0 range=(-0.6981317 0.6981317) clamped=true locked=true
      PhysicalOffsetFrame humerus_offset: socket_parent=/bodyset/humerus translation=(0.006773481 -0.3328244 -0.013658)
      PhysicalOffsetFrame ulna_offset: socket_parent=/bodyset/ulna translation=(0 0 0)
      SpatialTransform: axes_held_at_zero=(translation1 translation2 translation3)
        TransformAxis rotation1: coordinates=elbow_flexion axis=(0.0494 0.0366 0.998108)
            LinearFunction(coefficients=1 0)
        TransformAxis rotation2: coordinates=elbow_x axis=(1 0 0) LinearFunction(coefficients=1 0)
        TransformAxis rotation3: coordinates=elbow_y axis=(0 1 0) LinearFunction(coefficients=1 0)
    CustomJoint radioulnar: socket_parent_frame=ulna_offset socket_child_frame=radius_offset
      Coordinate pro_sup: default_value=-0.04424561 range=(-3.316126 1.570796) clamped=true
      PhysicalOffsetFrame ulna_offset: socket_parent=/bodyset/ulna translation=(0.0003523809 -0.01249356 0.01761816)
      PhysicalOffsetFrame radius_offset: socket_parent=/bodyset/radius translation=(0 0 0)
      SpatialTransform: axes_held_at_zero=(rotation2 rotation3 translation1 translation2 translation3)
        TransformAxis rotation1: coordinates=pro_sup axis=(-0.017161 0.992666 -0.119668)
            LinearFunction(coefficients=1 0)
    CustomJoint radiocarpal: socket_parent_frame=radius_offset socket_child_frame=lunate_offset
      Coordinate deviation: default_value=-0.02167154 range=(-0.4363323 0.6108652) clamped=true
      Coordinate flexion: default_value=0.04694736 range=(-1.22173 1.22173) clamped=true
      PhysicalOffsetFrame radius_offset: socket_parent=/bodyset/radius translation=(0.01585714 -0.2628394 0.02202381)
      PhysicalOffsetFrame lunate_offset: socket_parent=/bodyset/lunate translation=(0 0 0)
      SpatialTransform: axes_held_at_zero=(rotation3 translation1 translation2 translation3)
        TransformAxis rotation1: coordinates=deviation axis=(0 0 1) LinearFunction(coefficients=1 0)
        TransformAxis rotation2: coordinates=flexion axis=(1 0 0) LinearFunction(coefficients=1 0)
    WeldJoint lun_scaph: socket_parent_frame=lunate_offset socket_child_frame=scaphoid_offset
      PhysicalOffsetFrame lunate_offset: socket_parent=/bodyset/lunate
          translation=(0.01482065 -0.005359203 -0.001505475)
      PhysicalOffsetFrame scaphoid_offset: socket_parent=/bodyset/scaphoid translation=(0 0 0)
    WeldJoint lun_pis: socket_parent_frame=lunate_offset socket_child_frame=pisiform_offset
      PhysicalOffsetFrame lunate_offset: socket_parent=/bodyset/lunate translation=(-0.01607281 -0.01186852 -0.0127173)
      PhysicalOffsetFrame pisiform_offset: socket_parent=/bodyset/pisiform translation=(0 0 0)
    WeldJoint lun_triq: socket_parent_frame=lunate_offset socket_child_frame=triquetrum_offset
      PhysicalOffsetFrame lunate_offset: socket_parent=/bodyset/lunate
          translation=(-0.01294661 -0.009002838 -0.001547494)
      PhysicalOffsetFrame triquetrum_offset: socket_parent=/bodyset/triquetrum translation=(0 0 0)
    WeldJoint proximal_distal: socket_parent_frame=lunate_offset socket_child_frame=capitate_offset
      PhysicalOffsetFrame lunate_offset: socket_parent=/bodyset/lunate
          translation=(0.004792549 -0.01807291 0.002793653)
      PhysicalOffsetFrame capitate_offset: socket_parent=/bodyset/capitate translation=(0 0 0)
    WeldJoint cap_trpzm: socket_parent_frame=capitate_offset socket_child_frame=trapezium_offset
      PhysicalOffsetFrame capitate_offset: socket_parent=/bodyset/capitate
          translation=(0.01835983 -0.00548526 -0.01237515)
      PhysicalOffsetFrame trapezium_offset: socket_parent=/bodyset/trapezium translation=(0 0 0)
    WeldJoint cap_trpzd: socket_parent_frame=capitate_offset socket_child_frame=trapezoid_offset
      PhysicalOffsetFrame capitate_offset: socket_parent=/bodyset/capitate
          translation=(0.01097652 -0.004876587 -0.002958127)
      PhysicalOffsetFrame trapezoid_offset: socket_parent=/bodyset/trapezoid translation=(0 0 0)
    WeldJoint cap_ham: socket_parent_frame=capitate_offset socket_child_frame=hamate_offset
      PhysicalOffsetFrame capitate_offset: socket_parent=/bodyset/capitate
          translation=(-0.01316871 -0.002995343 -0.0009004038)
      PhysicalOffsetFrame hamate_offset: socket_parent=/bodyset/hamate translation=(0 0 0)
    CustomJoint CMC1a: socket_parent_frame=trapezium_offset socket_child_frame=firstmc1_offset
      Coordinate thumb_abd: default_value=-0.05970748 range=(-0.7853982 0.2617994)
      Coordinate thumb_flex: default_value=-0.4280313 range=(-0.7853982 1.570796)
      PhysicalOffsetFrame trapezium_offset: socket_parent=/bodyset/trapezium translation=(0 0 0)
      PhysicalOffsetFrame firstmc1_offset: socket_parent=/bodyset/firstmc1 translation=(0 0 0)
      SpatialTransform: axes_held_at_zero=(rotation3 translation1 translation2 translation3)
        TransformAxis rotation1: coordinates=thumb_abd axis=(1 0 0) LinearFunction(coefficients=1 0)
        TransformAxis rotation2: coordinates=thumb_flex axis=(0.05639802 0.9835774 -0.1714491)
            LinearFunction(coefficients=1 0)
    WeldJoint CMC1b: socket_parent_frame=firstmc1_offset socket_child_frame=firstmc_offset
      PhysicalOffsetFrame firstmc1_offset: socket_parent=/bodyset/firstmc1
          translation=(0.008643877 -0.006482907 -0.003001346)
      PhysicalOffsetFrame firstmc_offset: socket_parent=/bodyset/firstmc translation=(0 0 0)
    WeldJoint CMC2: socket_parent_frame=capitate_offset socket_child_frame=secondmc_offset
      PhysicalOffsetFrame capitate_offset: socket_parent=/bodyset/capitate
          translation=(0.01762991 -0.04516425 0.006041109)
      PhysicalOffsetFrame secondmc_offset: socket_parent=/bodyset/secondmc translation=(0 0 0)
    WeldJoint CMC3: socket_parent_frame=capitate_offset socket_child_frame=thirdmc_offset
      PhysicalOffsetFrame capitate_offset: socket_parent=/bodyset/capitate
          translation=(0.0005726568 -0.04710793 0.008856372)
      PhysicalOffsetFrame thirdmc_offset: socket_parent=/bodyset/thirdmc translation=(0 0 0)
    WeldJoint CMC4: socket_parent_frame=capitate_offset socket_child_frame=fourthmc_offset
      PhysicalOffsetFrame capitate_offset: socket_parent=/bodyset/capitate
          translation=(-0.01446169 -0.04864462 0.004217491)
      PhysicalOffsetFrame fourthmc_offset: socket_parent=/bodyset/fourthmc translation=(0 0 0)
    WeldJoint CMC5: socket_parent_frame=capitate_offset socket_child_frame=fifthmc_offset
      PhysicalOffsetFrame capitate_offset: socket_parent=/bodyset/capitate
          translation=(-0.02628699 -0.04163827 -0.005063871)
      PhysicalOffsetFrame fifthmc_offset: socket_parent=/bodyset/fifthmc translation=(0 0 0)
    CustomJoint MCP: socket_parent_frame=firstmc_offset socket_child_frame=proximal_thumb_offset
      Coordinate TCP2M_lateral: default_value=0.00506175 range=(-0.3490659 0.3490659)
      Coordinate TCP2M_flex: default_value=-0.4397325 range=(0 1.396263)
      PhysicalOffsetFrame firstmc_offset: socket_parent=/bodyset/firstmc
          translation=(0.01223357 -0.02164971 -0.009416142)
      PhysicalOffsetFrame proximal_thumb_offset: socket_parent=/bodyset/proximal_thumb translation=(0 0 0)
      SpatialTransform: axes_held_at_zero=(rotation2 translation1 translation2 translation3)
        TransformAxis rotation1: coordinates=TCP2M_lateral axis=(1 0 0) LinearFunction(coefficients=1 0)
        TransformAxis rotation3: coordinates=TCP2M_flex axis=(0 0 1) LinearFunction(coefficients=-1 0)
    CustomJoint IP: socket_parent_frame=proximal_thumb_offset socket_child_frame=distal_thumb_offset
      Coordinate TCP2M2_flex: default_value=-0.1962615 range=(-0.08726646 1.570796)
      PhysicalOffsetFrame proximal_thumb_offset: socket_parent=/bodyset/proximal_thumb
          translation=(0.01265955 -0.02342017 -0.009132962)
      PhysicalOffsetFrame distal_thumb_offset: socket_parent=/bodyset/distal_thumb translation=(0 0 0)
      SpatialTransform: axes_held_at_zero=(rotation1 rotation2 translation1 translation2 translation3)
        TransformAxis rotation3: coordinates=TCP2M2_flex axis=(0 0 -1) LinearFunction(coefficients=1 0)
    CustomJoint 2MCP: socket_parent_frame=secondmc_offset socket_child_frame=2proxph_offset
      Coordinate MCP2_lateral: default_value=0.1253238 range=(-0.3490659 0.3490659)
      Coordinate MCP2_flex: default_value=-0.02884886 range=(-0.1745329 1.570796)
      PhysicalOffsetFrame secondmc_offset: socket_parent=/bodyset/secondmc
          translation=(0.004203085 -0.03390681 0.004345949)
      PhysicalOffsetFrame 2proxph_offset: socket_parent=/bodyset/2proxph translation=(0 0 0)
      SpatialTransform: axes_held_at_zero=(rotation3 translation1 translation2 translation3)
        TransformAxis rotation1: coordinates=MCP2_lateral axis=(0 0 1) LinearFunction(coefficients=1 0)
        TransformAxis rotation2: coordinates=MCP2_flex axis=(1 0 0) LinearFunction(coefficients=1 0)
    CustomJoint 2prox-midph: socket_parent_frame=2proxph_offset socket_child_frame=2midph_offset
      Coordinate PIP_flex: default_value=-0.04691543 range=(-0.08726646 1.570796)
      PhysicalOffsetFrame 2proxph_offset: socket_parent=/bodyset/2proxph
          translation=(0.006489315 -0.03563037 0.006324427)
      PhysicalOffsetFrame 2midph_offset: socket_parent=/bodyset/2midph translation=(0 0 0)
      SpatialTransform: axes_held_at_zero=(rotation2 rotation3 translation1 translation2 translation3)
        TransformAxis rotation1: coordinates=PIP_flex axis=(1 0 0) LinearFunction(coefficients=1 0)
    CustomJoint 2mid-distph: socket_parent_frame=2midph_offset socket_child_frame=2distph_offset
      Coordinate DIP_flex: default_value=-0.02767314 range=(-0.08726646 1.570796)
      PhysicalOffsetFrame 2midph_offset: socket_parent=/bodyset/2midph
          translation=(0.003135685 -0.02341462 0.001147776)
      PhysicalOffsetFrame 2distph_offset: socket_parent=/bodyset/2distph translation=(0 0 0)
      SpatialTransform: axes_held_at_zero=(rotation2 rotation3 translation1 translation2 translation3)
        TransformAxis rotation1: coordinates=DIP_flex axis=(1 0 0) LinearFunction(coefficients=1 0)
    CustomJoint 3MCP: socket_parent_frame=thirdmc_offset socket_child_frame=3proxph_offset
      Coordinate MCP2M_lateral: default_value=0.00600913 range=(-0.3490659 0.3490659)
      Coordinate MCP2M_flex: default_value=-0.02356502 range=(-0.1745329 1.570796)
      PhysicalOffsetFrame thirdmc_offset: socket_parent=/bodyset/thirdmc
          translation=(0.0002881292 -0.03156215 0.002134557)
      PhysicalOffsetFrame 3proxph_offset: socket_parent=/bodyset/3proxph translation=(0 0 0)
      SpatialTransform: axes_held_at_zero=(rotation2 translation1 translation2 translation3)
        TransformAxis rotation1: coordinates=MCP2M_lateral axis=(0 0 1) LinearFunction(coefficients=1 0)
        TransformAxis rotation3: coordinates=MCP2M_flex axis=(1 0 0) LinearFunction(coefficients=1 0)
    CustomJoint 3prox-midph: socket_parent_frame=3proxph_offset socket_child_frame=3midph_offset
      Coordinate MPIP_flex: default_value=-0.05585723 range=(-0.08726646 1.570796)
      PhysicalOffsetFrame 3proxph_offset: socket_parent=/bodyset/3proxph
          translation=(0.001301689 -0.03487817 0.004914863)
      PhysicalOffsetFrame 3midph_offset: socket_parent=/bodyset/3midph translation=(0 0 0)
      SpatialTransform: axes_held_at_zero=(rotation2 rotation3 translation1 translation2 translation3)
        TransformAxis rotation1: coordinates=MPIP_flex axis=(1 0 0) LinearFunction(coefficients=1 0)
    CustomJoint 3mid-distph: socket_parent_frame=3midph_offset socket_child_frame=3distph_offset
      Coordinate MDIP_flex: default_value=-0.05054843 range=(-0.08726646 1.570796)
      PhysicalOffsetFrame 3midph_offset: socket_parent=/bodyset/3midph translation=(0.00125805 -0.02677112 0.001800901)
      PhysicalOffsetFrame 3distph_offset: socket_parent=/bodyset/3distph translation=(0 0 0)
      SpatialTransform: axes_held_at_zero=(rotation2 rotation3 translation1 translation2 translation3)
        TransformAxis rotation1: coordinates=MDIP_flex axis=(1 0 0) LinearFunction(coefficients=1 0)
    CustomJoint 4MCP: socket_parent_frame=fourthmc_offset socket_child_frame=4proxph_offset
      Coordinate RCP2M_lateral: default_value=-0.09518109 range=(-0.3490659 0.3490659)
      Coordinate RCP2M_flex: default_value=-0.1185906 range=(-0.1745329 1.570796)
      PhysicalOffsetFrame fourthmc_offset: socket_parent=/bodyset/fourthmc
          translation=(-0.002196985 -0.02843955 -0.0002076931)
      PhysicalOffsetFrame 4proxph_offset: socket_parent=/bodyset/4proxph translation=(0 0 0)
      SpatialTransform: axes_held_at_zero=(rotation2 translation1 translation2 translation3)
        TransformAxis rotation1: coordinates=RCP2M_lateral axis=(0 0 1) LinearFunction(coefficients=1 0)
        TransformAxis rotation3: coordinates=RCP2M_flex axis=(1 0 0) LinearFunction(coefficients=1 0)
    CustomJoint 4prox-midph: socket_parent_frame=4proxph_offset socket_child_frame=4midph_offset
      Coordinate RPIP_flex: default_value=-0.06997836 range=(-0.08726646 1.570796)
      PhysicalOffsetFrame 4proxph_offset: socket_parent=/bodyset/4proxph
          translation=(-0.002748237 -0.03135779 0.001047726)
      PhysicalOffsetFrame 4midph_offset: socket_parent=/bodyset/4midph translation=(0 0 0)
      SpatialTransform: axes_held_at_zero=(rotation1 rotation2 translation1 translation2 translation3)
        TransformAxis rotation3: coordinates=RPIP_flex axis=(1 0 0) LinearFunction(coefficients=1 0)
    CustomJoint 4mid-distph: socket_parent_frame=4midph_offset socket_child_frame=4distph_offset
      Coordinate RDIP_flex: default_value=-0.027118 range=(-0.08726646 1.570796)
      PhysicalOffsetFrame 4midph_offset: socket_parent=/bodyset/4midph
          translation=(-0.002632982 -0.02816961 0.0006397795)
      PhysicalOffsetFrame 4distph_offset: socket_parent=/bodyset/4distph translation=(0 0 0)
      SpatialTransform: axes_held_at_zero=(rotation1 rotation2 translation1 translation2 translation3)
        TransformAxis rotation3: coordinates=RDIP_flex axis=(1 0 0) LinearFunction(coefficients=1 0)
    CustomJoint 5MCP: socket_parent_frame=fifthmc_offset socket_child_frame=5proxph_offset
      Coordinate LCP2M_lateral: default_value=-0.5334023 range=(-0.3490659 0.3490659)
      Coordinate LCP2M_flex: default_value=-0.1493014 range=(-0.1745329 1.570796)
      PhysicalOffsetFrame fifthmc_offset: socket_parent=/bodyset/fifthmc
          translation=(-0.00191726 -0.02572874 -0.001796005)
      PhysicalOffsetFrame 5proxph_offset: socket_parent=/bodyset/5proxph translation=(0 0 0)
      SpatialTransform: axes_held_at_zero=(rotation2 translation1 translation2 translation3)
        TransformAxis rotation1: coordinates=LCP2M_lateral axis=(0 0 1) LinearFunction(coefficients=1 0)
        TransformAxis rotation3: coordinates=LCP2M_flex axis=(1 0 0) LinearFunction(coefficients=1 0)
    CustomJoint 5prox-midph: socket_parent_frame=5proxph_offset socket_child_frame=5midph_offset
      Coordinate LPIP_flex: default_value=-0.1041087 range=(-0.08726646 1.570796)
      PhysicalOffsetFrame 5proxph_offset: socket_parent=/bodyset/5proxph
          translation=(-0.002391647 -0.01611179 -0.001304329)
      PhysicalOffsetFrame 5midph_offset: socket_parent=/bodyset/5midph translation=(0 0 0)
      SpatialTransform: axes_held_at_zero=(rotation1 rotation2 translation1 translation2 translation3)
        TransformAxis rotation3: coordinates=LPIP_flex axis=(1 0 0) LinearFunction(coefficients=1 0)
    CustomJoint 5mid-distph: socket_parent_frame=5midph_offset socket_child_frame=5distph_offset
      Coordinate LDIP_flex: default_value=-0.04685912 range=(-0.08726646 1.570796)
      PhysicalOffsetFrame 5midph_offset: socket_parent=/bodyset/5midph
          translation=(-0.003060529 -0.02204199 -0.002391072)
      PhysicalOffsetFrame 5distph_offset: socket_parent=/bodyset/5distph translation=(0 0 0)
      SpatialTransform: axes_held_at_zero=(rotation1 rotation2 translation1 translation2 translation3)
        TransformAxis rotation3: coordinates=LDIP_flex axis=(1 0 0) LinearFunction(coefficients=1 0)
    CustomJoint sternoclavicular_l: socket_parent_frame=thorax_offset socket_child_frame=clavicle_l_offset
      Coordinate sternoclavicular_r2_l: default_value=-0.3677057 range=(-1.571 0.7854) clamped=true
      Coordinate sternoclavicular_r3_l: default_value=0.1557428 range=(-0.524 0.524) clamped=true
      PhysicalOffsetFrame thorax_offset: socket_parent=/bodyset/thorax translation=(0.008133274 0.007682055 -0.0204151)
      PhysicalOffsetFrame clavicle_l_offset: socket_parent=/bodyset/clavicle_l translation=(0 0 0)
      SpatialTransform: axes_held_at_zero=(rotation3 translation1 translation2 translation3)
        TransformAxis rotation1: coordinates=sternoclavicular_r2_l axis=(-0.0153 -0.989299 -0.1451)
            LinearFunction(coefficients=1 0)
        TransformAxis rotation2: coordinates=sternoclavicular_r3_l axis=(0.994473 0 -0.104997)
            LinearFunction(coefficients=1 0)
    CustomJoint unrotscap_l: socket_parent_frame=clavicle_l_offset socket_child_frame=clavphant_l_offset
      Coordinate unrotscap_r3_l: default_value=-0.1557428 range=(-4.7123 4.7123) clamped=true
      Coordinate unrotscap_r2_l: default_value=0.3677057 range=(-4.7123 4.7123) clamped=true
      PhysicalOffsetFrame clavicle_l_offset: socket_parent=/bodyset/clavicle_l
          translation=(-0.01420646 0.0209884 -0.1060493)
      PhysicalOffsetFrame clavphant_l_offset: socket_parent=/bodyset/clavphant_l translation=(0 0 0)
      SpatialTransform: axes_held_at_zero=(rotation3 translation1 translation2 translation3)
        TransformAxis rotation1: coordinates=unrotscap_r3_l axis=(0.994473 0 -0.104997)
            LinearFunction(coefficients=1 0)
        TransformAxis rotation2: coordinates=unrotscap_r2_l axis=(-0.0153 -0.989299 -0.1451)
            LinearFunction(coefficients=1 0)
    CustomJoint acromioclavicular_l: socket_parent_frame=clavphant_l_offset socket_child_frame=scapula_l_offset
      Coordinate acromioclavicular_r2_l: default_value=-0.07445292 range=(-1.5708 1.5708) clamped=true
      Coordinate acromioclavicular_r3_l: default_value=0.6017023 range=(-4.7123 4.7123) clamped=true
      Coordinate acromioclavicular_r1_l: default_value=0.2704611 range=(-4.7123 4.7123) clamped=true
      PhysicalOffsetFrame clavphant_l_offset: socket_parent=/bodyset/clavphant_l translation=(0 0 0)
      PhysicalOffsetFrame scapula_l_offset: socket_parent=/bodyset/scapula_l translation=(0 0 0)
      SpatialTransform: axes_held_at_zero=(translation1 translation2 translation3)
        TransformAxis rotation1: coordinates=acromioclavicular_r2_l axis=(-0.157095 -0.947269 -0.279291)
            LinearFunction(coefficients=1 0)
        TransformAxis rotation2: coordinates=acromioclavicular_r3_l axis=(0.754084 -0.297594 0.585487)
            LinearFunction(coefficients=1 0)
        TransformAxis rotation3: coordinates=acromioclavicular_r1_l axis=(-0.6377 -0.1186 0.7611)
            LinearFunction(coefficients=1 0)
    CustomJoint unrothum_l: socket_parent_frame=scapula_l_offset socket_child_frame=scapphant_l_offset
      Coordinate unrothum_r1_l: default_value=-0.2704611 range=(-4.7123 4.7123) clamped=true
      Coordinate unrothum_r3_l: default_value=-0.6017023 range=(-4.7123 4.7123) clamped=true
      Coordinate unrothum_r2_l: default_value=0.07445292 range=(-4.7123 4.7123) clamped=true
      PhysicalOffsetFrame scapula_l_offset: socket_parent=/bodyset/scapula_l
          translation=(-0.01283276 -0.03768973 -0.007042046)
      PhysicalOffsetFrame scapphant_l_offset: socket_parent=/bodyset/scapphant_l translation=(0 0 0)
      SpatialTransform: axes_held_at_zero=(translation1 translation2 translation3)
        TransformAxis rotation1: coordinates=unrothum_r1_l axis=(-0.6377 -0.1186 0.7611)
            LinearFunction(coefficients=1 0)
        TransformAxis rotation2: coordinates=unrothum_r3_l axis=(0.754084 -0.297594 0.585487)
            LinearFunction(coefficients=1 0)
        TransformAxis rotation3: coordinates=unrothum_r2_l axis=(-0.157095 -0.947269 -0.279291)
            LinearFunction(coefficients=1 0)
    CustomJoint shoulder0_l: socket_parent_frame=scapphant_l_offset socket_child_frame=humphant_l_offset
      Coordinate elv_angle_l: default_value=-0.2789904 range=(-1.570796 3.141593) clamped=true
      PhysicalOffsetFrame scapphant_l_offset: socket_parent=/bodyset/scapphant_l translation=(0 0 0)
      PhysicalOffsetFrame humphant_l_offset: socket_parent=/bodyset/humphant_l translation=(0 0 0)
      SpatialTransform: axes_held_at_zero=(rotation2 rotation3 translation1 translation2 translation3)
        TransformAxis rotation1: coordinates=elv_angle_l axis=(-0.0048 -0.999089 0.0424)
            LinearFunction(coefficients=1 0)
    CustomJoint shoulder1_l: socket_parent_frame=humphant_l_offset socket_child_frame=humphant1_l_offset
      Coordinate shoulder_elv_l: default_value=1.519442 range=(-0.1745329 3.141593) clamped=true
      Coordinate shoulder1_r2_l: default_value=0.00874051 range=(-4.7123 4.7123) clamped=true
      PhysicalOffsetFrame humphant_l_offset: socket_parent=/bodyset/humphant_l translation=(0 0 0)
      PhysicalOffsetFrame humphant1_l_offset: socket_parent=/bodyset/humphant1_l translation=(0 0 0)
      SpatialTransform: axes_held_at_zero=(rotation3 translation1 translation2 translation3)
        TransformAxis rotation1: coordinates=shoulder_elv_l axis=(0.998261 -0.0023 0.058898)
            LinearFunction(coefficients=1 0)
        TransformAxis rotation2: coordinates=shoulder1_r2_l axis=(-0.0048 -0.999089 0.0424)
            LinearFunction(coefficients=1 0)
    CustomJoint shoulder2_l: socket_parent_frame=humphant1_l_offset socket_child_frame=humerus_l_offset
      Coordinate shoulder_rot_l: default_value=0.00880445 range=(-1.570796 1.570796) clamped=true
      PhysicalOffsetFrame humphant1_l_offset: socket_parent=/bodyset/humphant1_l translation=(0 0 0)
      PhysicalOffsetFrame humerus_l_offset: socket_parent=/bodyset/humerus_l translation=(0 0 0)
      SpatialTransform: axes_held_at_zero=(rotation2 rotation3 translation1 translation2 translation3)
        TransformAxis rotation1: coordinates=shoulder_rot_l axis=(-0.0048 -0.999089 0.0424)
            LinearFunction(coefficients=1 0)
    CustomJoint elbow_l: socket_parent_frame=humerus_l_offset socket_child_frame=ulna_l_offset
      Coordinate elbow_flexion_l: default_value=0.1403683 range=(-0.3490659 3.141593) clamped=true
      Coordinate elbow_x_l: default_value=0.03404831 range=(-0.6981317 0.6981317) clamped=true
      Coordinate elbow_y_l: default_value=0 range=(-0.6981317 0.6981317) clamped=true locked=true
      PhysicalOffsetFrame humerus_l_offset: socket_parent=/bodyset/humerus_l
          translation=(0.006691923 -0.330882 0.01349355)
      PhysicalOffsetFrame ulna_l_offset: socket_parent=/bodyset/ulna_l translation=(0 0 0)
      SpatialTransform: axes_held_at_zero=(translation1 translation2 translation3)
        TransformAxis rotation1: coordinates=elbow_flexion_l axis=(-0.0494 -0.0366 0.998108)
            LinearFunction(coefficients=1 0)
        TransformAxis rotation2: coordinates=elbow_x_l axis=(-1 0 0) LinearFunction(coefficients=1 0)
        TransformAxis rotation3: coordinates=elbow_y_l axis=(0 -1 0) LinearFunction(coefficients=1 0)
    CustomJoint radioulnar_l: socket_parent_frame=ulna_l_offset socket_child_frame=radius_l_offset
      Coordinate pro_sup_l: default_value=0.07656358 range=(-3.316126 1.570796) clamped=true
      PhysicalOffsetFrame ulna_l_offset: socket_parent=/bodyset/ulna_l
          translation=(0.0003336727 -0.01260796 -0.0166828)
      PhysicalOffsetFrame radius_l_offset: socket_parent=/bodyset/radius_l translation=(0 0 0)
      SpatialTransform: axes_held_at_zero=(rotation2 rotation3 translation1 translation2 translation3)
        TransformAxis rotation1: coordinates=pro_sup_l axis=(0.017161 -0.992666 -0.119668)
            LinearFunction(coefficients=1 0)
    CustomJoint radiocarpal_l: socket_parent_frame=radius_l_offset socket_child_frame=lunate_l_offset
      Coordinate deviation_l: default_value=-0.03363195 range=(-0.4363323 0.6108652) clamped=true
      Coordinate flexion_l: default_value=0.07253482 range=(-1.22173 1.22173) clamped=true
      PhysicalOffsetFrame radius_l_offset: socket_parent=/bodyset/radius_l
          translation=(0.01501527 -0.2652462 -0.02085455)
      PhysicalOffsetFrame lunate_l_offset: socket_parent=/bodyset/lunate_l translation=(0 0 0)
      SpatialTransform: axes_held_at_zero=(rotation3 translation1 translation2 translation3)
        TransformAxis rotation1: coordinates=deviation_l axis=(0 0 1) LinearFunction(coefficients=1 0)
        TransformAxis rotation2: coordinates=flexion_l axis=(1 0 0) LinearFunction(coefficients=-1 0)
    WeldJoint lun_scaph_l: socket_parent_frame=lunate_l_offset socket_child_frame=scaphoid_l_offset
      PhysicalOffsetFrame lunate_l_offset: socket_parent=/bodyset/lunate_l
          translation=(0.01448269 -0.005236997 0.001471146)
      PhysicalOffsetFrame scaphoid_l_offset: socket_parent=/bodyset/scaphoid_l translation=(0 0 0)
    WeldJoint lun_pis_l: socket_parent_frame=lunate_l_offset socket_child_frame=pisiform_l_offset
      PhysicalOffsetFrame lunate_l_offset: socket_parent=/bodyset/lunate_l
          translation=(-0.0157063 -0.01159788 0.01242731)
      PhysicalOffsetFrame pisiform_l_offset: socket_parent=/bodyset/pisiform_l translation=(0 0 0)
    WeldJoint lun_triq_l: socket_parent_frame=lunate_l_offset socket_child_frame=triquetrum_l_offset
      PhysicalOffsetFrame lunate_l_offset: socket_parent=/bodyset/lunate_l
          translation=(-0.01265138 -0.008797545 0.001512206)
      PhysicalOffsetFrame triquetrum_l_offset: socket_parent=/bodyset/triquetrum_l translation=(0 0 0)
    WeldJoint proximal_distal_l: socket_parent_frame=lunate_l_offset socket_child_frame=capitate_l_offset
      PhysicalOffsetFrame lunate_l_offset: socket_parent=/bodyset/lunate_l
          translation=(0.004683264 -0.01766079 -0.002729949)
      PhysicalOffsetFrame capitate_l_offset: socket_parent=/bodyset/capitate_l translation=(0 0 0)
    WeldJoint cap_trpzm_l: socket_parent_frame=capitate_l_offset socket_child_frame=trapezium_l_offset
      PhysicalOffsetFrame capitate_l_offset: socket_parent=/bodyset/capitate_l
          translation=(0.01794117 -0.005360179 0.01209296)
      PhysicalOffsetFrame trapezium_l_offset: socket_parent=/bodyset/trapezium_l translation=(0 0 0)
    WeldJoint cap_trpzd_l: socket_parent_frame=capitate_l_offset socket_child_frame=trapezoid_l_offset
      PhysicalOffsetFrame capitate_l_offset: socket_parent=/bodyset/capitate_l
          translation=(0.01072622 -0.004765386 0.002890672)
      PhysicalOffsetFrame trapezoid_l_offset: socket_parent=/bodyset/trapezoid_l translation=(0 0 0)
    WeldJoint cap_ham_l: socket_parent_frame=capitate_l_offset socket_child_frame=hamate_l_offset
      PhysicalOffsetFrame capitate_l_offset: socket_parent=/bodyset/capitate_l
          translation=(-0.01286842 -0.00292704 0.0008798718)
      PhysicalOffsetFrame hamate_l_offset: socket_parent=/bodyset/hamate_l translation=(0 0 0)
    CustomJoint CMC1a_l: socket_parent_frame=trapezium_l_offset socket_child_frame=firstmc1_l_offset
      Coordinate thumb_l_abd: default_value=-0.1116962 range=(-0.7853982 0.2617994)
      Coordinate thumb_l_flex: default_value=-0.3948035 range=(-0.7853982 1.570796)
      PhysicalOffsetFrame trapezium_l_offset: socket_parent=/bodyset/trapezium_l translation=(0 0 0)
      PhysicalOffsetFrame firstmc1_l_offset: socket_parent=/bodyset/firstmc1_l translation=(0 0 0)
      SpatialTransform: axes_held_at_zero=(rotation3 translation1 translation2 translation3)
        TransformAxis rotation1: coordinates=thumb_l_abd axis=(1 0 0) LinearFunction(coefficients=-1 0)
        TransformAxis rotation2: coordinates=thumb_l_flex axis=(-0.05639802 -0.9835774 -0.1714491)
            LinearFunction(coefficients=1 0)
    WeldJoint CMC1b_l: socket_parent_frame=firstmc1_l_offset socket_child_frame=firstmc_l_offset
      PhysicalOffsetFrame firstmc1_l_offset: socket_parent=/bodyset/firstmc1_l
          translation=(0.008446769 -0.006335077 0.002932906)
      PhysicalOffsetFrame firstmc_l_offset: socket_parent=/bodyset/firstmc_l translation=(0 0 0)
    WeldJoint CMC2_l: socket_parent_frame=capitate_l_offset socket_child_frame=secondmc_l_offset
      PhysicalOffsetFrame capitate_l_offset: socket_parent=/bodyset/capitate_l
          translation=(0.01722789 -0.04413437 -0.005903353)
      PhysicalOffsetFrame secondmc_l_offset: socket_parent=/bodyset/secondmc_l translation=(0 0 0)
    WeldJoint CMC3_l: socket_parent_frame=capitate_l_offset socket_child_frame=thirdmc_l_offset
      PhysicalOffsetFrame capitate_l_offset: socket_parent=/bodyset/capitate_l
          translation=(0.0005595985 -0.04603372 -0.008654419)
      PhysicalOffsetFrame thirdmc_l_offset: socket_parent=/bodyset/thirdmc_l translation=(0 0 0)
    WeldJoint CMC4_l: socket_parent_frame=capitate_l_offset socket_child_frame=fourthmc_l_offset
      PhysicalOffsetFrame capitate_l_offset: socket_parent=/bodyset/capitate_l
          translation=(-0.01413191 -0.04753537 -0.00412132)
      PhysicalOffsetFrame fourthmc_l_offset: socket_parent=/bodyset/fourthmc_l translation=(0 0 0)
    WeldJoint CMC5_l: socket_parent_frame=capitate_l_offset socket_child_frame=fifthmc_l_offset
      PhysicalOffsetFrame capitate_l_offset: socket_parent=/bodyset/capitate_l
          translation=(-0.02568756 -0.04068879 0.004948399)
      PhysicalOffsetFrame fifthmc_l_offset: socket_parent=/bodyset/fifthmc_l translation=(0 0 0)
    CustomJoint MCP_l: socket_parent_frame=firstmc_l_offset socket_child_frame=proximal_thumb_l_offset
      Coordinate TCP2M_l_lateral: default_value=-0.03397476 range=(-0.3490659 0.3490659)
      Coordinate TCP2M_l_flex: default_value=-0.3867908 range=(0 1.396263)
      PhysicalOffsetFrame firstmc_l_offset: socket_parent=/bodyset/firstmc_l
          translation=(0.01207938 -0.02137684 0.009297462)
      PhysicalOffsetFrame proximal_thumb_l_offset: socket_parent=/bodyset/proximal_thumb_l translation=(0 0 0)
      SpatialTransform: axes_held_at_zero=(rotation2 translation1 translation2 translation3)
        TransformAxis rotation1: coordinates=TCP2M_l_lateral axis=(1 0 0) LinearFunction(coefficients=-1 0)
        TransformAxis rotation3: coordinates=TCP2M_l_flex axis=(0 0 1) LinearFunction(coefficients=-1 0)
    CustomJoint IP_l: socket_parent_frame=proximal_thumb_l_offset socket_child_frame=distal_thumb_l_offset
      Coordinate TCP2M2_l_flex: default_value=-0.1812077 range=(-0.08726646 1.570796)
      PhysicalOffsetFrame proximal_thumb_l_offset: socket_parent=/bodyset/proximal_thumb_l
          translation=(0.01175607 -0.02174873 0.008481165)
      PhysicalOffsetFrame distal_thumb_l_offset: socket_parent=/bodyset/distal_thumb_l translation=(0 0 0)
      SpatialTransform: axes_held_at_zero=(rotation1 rotation2 translation1 translation2 translation3)
        TransformAxis rotation3: coordinates=TCP2M2_l_flex axis=(0 0 -1) LinearFunction(coefficients=1 0)
    CustomJoint 2MCP_l: socket_parent_frame=secondmc_l_offset socket_child_frame=2proxph_l_offset
      Coordinate MCP2_l_lateral: default_value=0.1492049 range=(-0.3490659 0.3490659)
      Coordinate MCP2_l_flex: default_value=0.03776452 range=(-0.1745329 1.570796)
      PhysicalOffsetFrame secondmc_l_offset: socket_parent=/bodyset/secondmc_l
          translation=(0.004107242 -0.03313363 -0.004246848)
      PhysicalOffsetFrame 2proxph_l_offset: socket_parent=/bodyset/2proxph_l translation=(0 0 0)
      SpatialTransform: axes_held_at_zero=(rotation3 translation1 translation2 translation3)
        TransformAxis rotation1: coordinates=MCP2_l_lateral axis=(0 0 1) LinearFunction(coefficients=1 0)
        TransformAxis rotation2: coordinates=MCP2_l_flex axis=(1 0 0) LinearFunction(coefficients=-1 0)
    CustomJoint 2prox-midph_l: socket_parent_frame=2proxph_l_offset socket_child_frame=2midph_l_offset
      Coordinate PIP_l_flex: default_value=-0.01678627 range=(-0.08726646 1.570796)
      PhysicalOffsetFrame 2proxph_l_offset: socket_parent=/bodyset/2proxph_l
          translation=(0.006252218 -0.03432856 -0.006093355)
      PhysicalOffsetFrame 2midph_l_offset: socket_parent=/bodyset/2midph_l translation=(0 0 0)
      SpatialTransform: axes_held_at_zero=(rotation2 rotation3 translation1 translation2 translation3)
        TransformAxis rotation1: coordinates=PIP_l_flex axis=(1 0 0) LinearFunction(coefficients=-1 0)
    CustomJoint 2mid-distph_l: socket_parent_frame=2midph_l_offset socket_child_frame=2distph_l_offset
      Coordinate DIP_l_flex: default_value=-0.01504182 range=(-0.08726646 1.570796)
      PhysicalOffsetFrame 2midph_l_offset: socket_parent=/bodyset/2midph_l
          translation=(0.003142972 -0.02346903 -0.001150443)
      PhysicalOffsetFrame 2distph_l_offset: socket_parent=/bodyset/2distph_l translation=(0 0 0)
      SpatialTransform: axes_held_at_zero=(rotation2 rotation3 translation1 translation2 translation3)
        TransformAxis rotation1: coordinates=DIP_l_flex axis=(1 0 0) LinearFunction(coefficients=-1 0)
    CustomJoint 3MCP_l: socket_parent_frame=thirdmc_l_offset socket_child_frame=3proxph_l_offset
      Coordinate MCP2M_l_lateral: default_value=0.01781893 range=(-0.3490659 0.3490659)
      Coordinate MCP2M_l_flex: default_value=0.02071103 range=(-0.1745329 1.570796)
      PhysicalOffsetFrame thirdmc_l_offset: socket_parent=/bodyset/thirdmc_l
          translation=(0.000281559 -0.03084244 -0.002085883)
      PhysicalOffsetFrame 3proxph_l_offset: socket_parent=/bodyset/3proxph_l translation=(0 0 0)
      SpatialTransform: axes_held_at_zero=(rotation2 translation1 translation2 translation3)
        TransformAxis rotation1: coordinates=MCP2M_l_lateral axis=(0 0 1) LinearFunction(coefficients=1 0)
        TransformAxis rotation3: coordinates=MCP2M_l_flex axis=(1 0 0) LinearFunction(coefficients=-1 0)
    CustomJoint 3prox-midph_l: socket_parent_frame=3proxph_l_offset socket_child_frame=3midph_l_offset
      Coordinate MPIP_l_flex: default_value=-0.03222614 range=(-0.08726646 1.570796)
      PhysicalOffsetFrame 3proxph_l_offset: socket_parent=/bodyset/3proxph_l
          translation=(0.001290857 -0.03458793 -0.004873963)
      PhysicalOffsetFrame 3midph_l_offset: socket_parent=/bodyset/3midph_l translation=(0 0 0)
      SpatialTransform: axes_held_at_zero=(rotation2 rotation3 translation1 translation2 translation3)
        TransformAxis rotation1: coordinates=MPIP_l_flex axis=(1 0 0) LinearFunction(coefficients=-1 0)
    CustomJoint 3mid-distph_l: socket_parent_frame=3midph_l_offset socket_child_frame=3distph_l_offset
      Coordinate MDIP_l_flex: default_value=-0.033789 range=(-0.08726646 1.570796)
      PhysicalOffsetFrame 3midph_l_offset: socket_parent=/bodyset/3midph_l
          translation=(0.001260557 -0.02682447 -0.00180449)
      PhysicalOffsetFrame 3distph_l_offset: socket_parent=/bodyset/3distph_l translation=(0 0 0)
      SpatialTransform: axes_held_at_zero=(rotation2 rotation3 translation1 translation2 translation3)
        TransformAxis rotation1: coordinates=MDIP_l_flex axis=(1 0 0) LinearFunction(coefficients=-1 0)
    CustomJoint 4MCP_l: socket_parent_frame=fourthmc_l_offset socket_child_frame=4proxph_l_offset
      Coordinate RCP2M_l_lateral: default_value=-0.03561524 range=(-0.3490659 0.3490659)
      Coordinate RCP2M_l_flex: default_value=-0.09575366 range=(-0.1745329 1.570796)
      PhysicalOffsetFrame fourthmc_l_offset: socket_parent=/bodyset/fourthmc_l
          translation=(-0.002146887 -0.02779104 0.0002029571)
      PhysicalOffsetFrame 4proxph_l_offset: socket_parent=/bodyset/4proxph_l translation=(0 0 0)
      SpatialTransform: axes_held_at_zero=(rotation2 translation1 translation2 translation3)
        TransformAxis rotation1: coordinates=RCP2M_l_lateral axis=(0 0 1) LinearFunction(coefficients=1 0)
        TransformAxis rotation3: coordinates=RCP2M_l_flex axis=(1 0 0) LinearFunction(coefficients=-1 0)
    CustomJoint 4prox-midph_l: socket_parent_frame=4proxph_l_offset socket_child_frame=4midph_l_offset
      Coordinate RPIP_l_flex: default_value=-0.05954775 range=(-0.08726646 1.570796)
      PhysicalOffsetFrame 4proxph_l_offset: socket_parent=/bodyset/4proxph_l
          translation=(-0.002929684 -0.03342813 -0.001116901)
      PhysicalOffsetFrame 4midph_l_offset: socket_parent=/bodyset/4midph_l translation=(0 0 0)
      SpatialTransform: axes_held_at_zero=(rotation1 rotation2 translation1 translation2 translation3)
        TransformAxis rotation3: coordinates=RPIP_l_flex axis=(1 0 0) LinearFunction(coefficients=-1 0)
    CustomJoint 4mid-distph_l: socket_parent_frame=4midph_l_offset socket_child_frame=4distph_l_offset
      Coordinate RDIP_l_flex: default_value=-0.02396979 range=(-0.08726646 1.570796)
      PhysicalOffsetFrame 4midph_l_offset: socket_parent=/bodyset/4midph_l
          translation=(-0.002617464 -0.02800359 -0.0006360088)
      PhysicalOffsetFrame 4distph_l_offset: socket_parent=/bodyset/4distph_l translation=(0 0 0)
      SpatialTransform: axes_held_at_zero=(rotation1 rotation2 translation1 translation2 translation3)
        TransformAxis rotation3: coordinates=RDIP_l_flex axis=(1 0 0) LinearFunction(coefficients=-1 0)
    CustomJoint 5MCP_l: socket_parent_frame=fifthmc_l_offset socket_child_frame=5proxph_l_offset
      Coordinate LCP2M_l_lateral: default_value=-0.5492856 range=(-0.3490659 0.3490659)
      Coordinate LCP2M_l_flex: default_value=-0.1756805 range=(-0.1745329 1.570796)
      PhysicalOffsetFrame fifthmc_l_offset: socket_parent=/bodyset/fifthmc_l
          translation=(-0.00187354 -0.02514204 0.001755051)
      PhysicalOffsetFrame 5proxph_l_offset: socket_parent=/bodyset/5proxph_l translation=(0 0 0)
      SpatialTransform: axes_held_at_zero=(rotation2 translation1 translation2 translation3)
        TransformAxis rotation1: coordinates=LCP2M_l_lateral axis=(0 0 1) LinearFunction(coefficients=1 0)
        TransformAxis rotation3: coordinates=LCP2M_l_flex axis=(1 0 0) LinearFunction(coefficients=-1 0)
    CustomJoint 5prox-midph_l: socket_parent_frame=5proxph_l_offset socket_child_frame=5midph_l_offset
      Coordinate LPIP_l_flex: default_value=-0.1032843 range=(-0.08726646 1.570796)
      PhysicalOffsetFrame 5proxph_l_offset: socket_parent=/bodyset/5proxph_l
          translation=(-0.002336594 -0.01574092 0.001274305)
      PhysicalOffsetFrame 5midph_l_offset: socket_parent=/bodyset/5midph_l translation=(0 0 0)
      SpatialTransform: axes_held_at_zero=(rotation1 rotation2 translation1 translation2 translation3)
        TransformAxis rotation3: coordinates=LPIP_l_flex axis=(1 0 0) LinearFunction(coefficients=-1 0)
    CustomJoint 5mid-distph_l: socket_parent_frame=5midph_l_offset socket_child_frame=5distph_l_offset
      Coordinate LDIP_l_flex: default_value=-0.03834403 range=(-0.08726646 1.570796)
      PhysicalOffsetFrame 5midph_l_offset: socket_parent=/bodyset/5midph_l
          translation=(-0.003187847 -0.02295894 0.002490541)
      PhysicalOffsetFrame 5distph_l_offset: socket_parent=/bodyset/5distph_l translation=(0 0 0)
      SpatialTransform: axes_held_at_zero=(rotation1 rotation2 translation1 translation2 translation3)
        TransformAxis rotation3: coordinates=LDIP_l_flex axis=(1 0 0) LinearFunction(coefficients=-1 0)
    CustomJoint T1_rib: socket_parent_frame=thoracic1_offset socket_child_frame=thorax_offset
      Coordinate ribs_bending: default_value=0.04048211 range=(-0.3490659 0.3490659) clamped=true locked=true
      PhysicalOffsetFrame thoracic1_offset: socket_parent=/bodyset/thoracic1 translation=(-0.001558491 0.0109042 0)
      PhysicalOffsetFrame thorax_offset: socket_parent=/bodyset/thorax translation=(-0.09322521 0.03447006 0)
          orientation=(0 0 -0.35)
      SpatialTransform: axes_held_at_zero=(rotation2 rotation3 translation1 translation2 translation3)
        TransformAxis rotation1: coordinates=ribs_bending axis=(0 0 1) LinearFunction(coefficients=1 0)
  ConstraintSet:
    CoordinateCouplerConstraint sternoclavicular_r2_con: isEnforced=false independent_coordinate_names=shoulder_elv
        dependent_coordinate_name=sternoclavicular_r2 scale_factor=1
      coupled_coordinates_function: SimmSpline f0: x=(0 2.61799) y=(0 -0.633555)
    CoordinateCouplerConstraint sternoclavicular_r3_con: isEnforced=false independent_coordinate_names=shoulder_elv
        dependent_coordinate_name=sternoclavicular_r3
      coupled_coordinates_function: SimmSpline f1: x=(0 3.14159) y=(0 0.322013)
    CoordinateCouplerConstraint unrotscap_r2_con: independent_coordinate_names=shoulder_elv
        dependent_coordinate_name=unrotscap_r2
      coupled_coordinates_function: SimmSpline f2: x=(0 2.61799) y=(0 0.633555)
    CoordinateCouplerConstraint unrotscap_r3_con: independent_coordinate_names=shoulder_elv
        dependent_coordinate_name=unrotscap_r3
      coupled_coordinates_function: SimmSpline f3: x=(0 3.14159) y=(0 -0.322013)
    CoordinateCouplerConstraint acromioclavicular_r1_con: independent_coordinate_names=shoulder_elv
        dependent_coordinate_name=acromioclavicular_r1
      coupled_coordinates_function: SimmSpline f4: x=(0 2.61799) y=(0 0.466003)
    CoordinateCouplerConstraint acromioclavicular_r2_con: isEnforced=false independent_coordinate_names=shoulder_elv
        dependent_coordinate_name=acromioclavicular_r2
      coupled_coordinates_function: SimmSpline f5: x=(0 2.61799) y=(0 -0.128282)
    CoordinateCouplerConstraint acromioclavicular_r3_con: independent_coordinate_names=shoulder_elv
        dependent_coordinate_name=acromioclavicular_r3
      coupled_coordinates_function: SimmSpline f6: x=(0 2.61799) y=(0 1.03673)
    CoordinateCouplerConstraint unrothum_r1_con: independent_coordinate_names=shoulder_elv
        dependent_coordinate_name=unrothum_r1
      coupled_coordinates_function: SimmSpline f7: x=(0 2.61799) y=(0 -0.466003)
    CoordinateCouplerConstraint unrothum_r2_con: independent_coordinate_names=shoulder_elv
        dependent_coordinate_name=unrothum_r2
      coupled_coordinates_function: SimmSpline f8: x=(0 2.61799) y=(0 0.128282)
    CoordinateCouplerConstraint unrothum_r3_con: independent_coordinate_names=shoulder_elv
        dependent_coordinate_name=unrothum_r3
      coupled_coordinates_function: SimmSpline f9: x=(0 2.61799) y=(0 -1.03673)
    CoordinateCouplerConstraint shoulder1_r2_con: independent_coordinate_names=elv_angle
        dependent_coordinate_name=shoulder1_r2
      coupled_coordinates_function: SimmSpline f11: x=(-1.5708 3.14159) y=(1.5708 -3.14159)
    CoordinateCouplerConstraint sternoclavicular_r2_con_l: isEnforced=false independent_coordinate_names=shoulder_elv_l
        dependent_coordinate_name=sternoclavicular_r2_l
      coupled_coordinates_function: SimmSpline f0_l: x=(0 2.61799) y=(0 -0.633555)
    CoordinateCouplerConstraint sternoclavicular_r3_con_l: isEnforced=false independent_coordinate_names=shoulder_elv_l
        dependent_coordinate_name=sternoclavicular_r3_l
      coupled_coordinates_function: SimmSpline f1_l: x=(0 3.14159) y=(0 0.322013)
    CoordinateCouplerConstraint unrotscap_r2_con_l: independent_coordinate_names=shoulder_elv_l
        dependent_coordinate_name=unrotscap_r2_l
      coupled_coordinates_function: SimmSpline f2_l: x=(0 2.61799) y=(0 0.633555)
    CoordinateCouplerConstraint unrotscap_r3_con_l: independent_coordinate_names=shoulder_elv_l
        dependent_coordinate_name=unrotscap_r3_l
      coupled_coordinates_function: SimmSpline f3_l: x=(0 3.14159) y=(0 -0.322013)
    CoordinateCouplerConstraint acromioclavicular_r1_con_l: independent_coordinate_names=shoulder_elv_l
        dependent_coordinate_name=acromioclavicular_r1_l
      coupled_coordinates_function: SimmSpline f4_l: x=(0 2.61799) y=(0 0.466003)
    CoordinateCouplerConstraint acromioclavicular_r2_con_l: isEnforced=false
        independent_coordinate_names=shoulder_elv_l dependent_coordinate_name=acromioclavicular_r2_l
      coupled_coordinates_function: SimmSpline f5_l: x=(0 2.61799) y=(0 -0.128282)
    CoordinateCouplerConstraint acromioclavicular_r3_con_l: independent_coordinate_names=shoulder_elv_l
        dependent_coordinate_name=acromioclavicular_r3_l
      coupled_coordinates_function: SimmSpline f6_l: x=(0 2.61799) y=(0 1.03673)
    CoordinateCouplerConstraint unrothum_r1_con_l: independent_coordinate_names=shoulder_elv_l
        dependent_coordinate_name=unrothum_r1_l
      coupled_coordinates_function: SimmSpline f7_l: x=(0 2.61799) y=(0 -0.466003)
    CoordinateCouplerConstraint unrothum_r2_con_l: independent_coordinate_names=shoulder_elv_l
        dependent_coordinate_name=unrothum_r2_l
      coupled_coordinates_function: SimmSpline f8_l: x=(0 2.61799) y=(0 0.128282)
    CoordinateCouplerConstraint unrothum_r3_con_l: independent_coordinate_names=shoulder_elv_l
        dependent_coordinate_name=unrothum_r3_l
      coupled_coordinates_function: SimmSpline f9_l: x=(0 2.61799) y=(0 -1.03673)
  ForceSet:
    Thelen2003Muscle glut_med1_r: optimal_force=1 max_isometric_force=819 optimal_fiber_length=0.05243337
        tendon_slack_length=0.07644492 pennation_angle_at_optimal=0.1396263 [radians] max_contraction_velocity=10
        FmaxTendonStrain=0.033 FmaxMuscleStrain=0.6 KshapeActive=0.5 KshapePassive=4 Af=0.3 Flen=1.8
        activation_time_constant=0.01 [seconds] deactivation_time_constant=0.04 [seconds]
      PathPoint P1: pelvis (-0.04801585 0.02839708 0.1290947)
      PathPoint P2: femur_r (-0.02471857 -0.01043969 0.06293031)
    Thelen2003Muscle glut_med2_r: optimal_force=1 max_isometric_force=573 optimal_fiber_length=0.08214778
        tendon_slack_length=0.05152464 pennation_angle_at_optimal=0 max_contraction_velocity=10 FmaxTendonStrain=0.033
        FmaxMuscleStrain=0.6 KshapeActive=0.5 KshapePassive=4 Af=0.3 Flen=1.8 activation_time_constant=0.01
        deactivation_time_constant=0.04
      PathPoint P1: pelvis (-0.1006215 0.04156809 0.08179203)
      PathPoint P2: femur_r (-0.02925409 -0.005175233 0.05975544)
    Thelen2003Muscle glut_med3_r: optimal_force=1 max_isometric_force=653 optimal_fiber_length=0.06491625
        tendon_slack_length=0.05325946 pennation_angle_at_optimal=0.3316126 max_contraction_velocity=10
        FmaxTendonStrain=0.033 FmaxMuscleStrain=0.6 KshapeActive=0.5 KshapePassive=4 Af=0.3 Flen=1.8
        activation_time_constant=0.01 deactivation_time_constant=0.04
      PathPoint P1: pelvis (-0.1439299 0.009808201 0.06919221)
      PathPoint P2: femur_r (-0.03503687 -0.004193724 0.05873495)
    Thelen2003Muscle glut_min1_r: optimal_force=1 max_isometric_force=270 optimal_fiber_length=0.06799871
        tendon_slack_length=0.0159997 pennation_angle_at_optimal=0.1745329 max_contraction_velocity=10
        FmaxTendonStrain=0.033 FmaxMuscleStrain=0.6 KshapeActive=0.5 KshapePassive=4 Af=0.3 Flen=1.8
        activation_time_constant=0.01 deactivation_time_constant=0.04
      PathPoint P1: pelvis (-0.05495932 -0.007472915 0.1127577)
      PathPoint P2: femur_r (-0.008163932 -0.009279729 0.06349725)
    Thelen2003Muscle glut_min2_r: optimal_force=1 max_isometric_force=285 optimal_fiber_length=0.05542236
        tendon_slack_length=0.02573181 pennation_angle_at_optimal=0 max_contraction_velocity=10 FmaxTendonStrain=0.033
        FmaxMuscleStrain=0.6 KshapeActive=0.5 KshapePassive=4 Af=0.3 Flen=1.8 activation_time_constant=0.01
        deactivation_time_constant=0.04
      PathPoint P1: pelvis (-0.07449518 -0.006071744 0.1058171)
      PathPoint P2: femur_r (-0.01088524 -0.009279729 0.06349725)
    Thelen2003Muscle glut_min3_r: optimal_force=1 max_isometric_force=323 optimal_fiber_length=0.03788691
        tendon_slack_length=0.05084823 pennation_angle_at_optimal=0.01745329 max_contraction_velocity=10
        FmaxTendonStrain=0.033 FmaxMuscleStrain=0.6 KshapeActive=0.5 KshapePassive=4 Af=0.3 Flen=1.8
        activation_time_constant=0.01 deactivation_time_constant=0.04
      PathPoint P1: pelvis (-0.09815005 -0.005884921 0.09140206)
      PathPoint P2: femur_r (-0.01530737 -0.007405937 0.06236337)
    Thelen2003Muscle semimem_r: optimal_force=1 max_isometric_force=1288 optimal_fiber_length=0.07064461
        tendon_slack_length=0.3170177 pennation_angle_at_optimal=0.2617994 max_contraction_velocity=10
        FmaxTendonStrain=0.033 FmaxMuscleStrain=0.6 KshapeActive=0.5 KshapePassive=4 Af=0.3 Flen=1.8
        activation_time_constant=0.01 deactivation_time_constant=0.04
      PathPoint P1: pelvis (-0.1402816 -0.09104813 0.07635703)
      ConditionalPathPoint P2: tibia_r (-0.02939228 -0.02872706 -0.0159715)
          socket_coordinate=/jointset/knee_r/knee_angle_r range=(-0.558505 0.174533) [radians]
      PathPoint P3: tibia_r (-0.02280436 -0.03894765 -0.01652894)
    Thelen2003Muscle semiten_r: optimal_force=1 max_isometric_force=410 optimal_fiber_length=0.1760069
        tendon_slack_length=0.2237302 pennation_angle_at_optimal=0.08726646 max_contraction_velocity=10
        FmaxTendonStrain=0.033 FmaxMuscleStrain=0.6 KshapeActive=0.5 KshapePassive=4 Af=0.3 Flen=1.8
        activation_time_constant=0.01 deactivation_time_constant=0.04
      PathPoint P1: pelvis (-0.1486962 -0.1026405 0.0644833)
      ConditionalPathPoint P2: tibia_r (-0.03549878 -0.0233392 -0.01923168)
          socket_coordinate=/jointset/knee_r/knee_angle_r range=(-0.331613 0.174533)
      PathPoint P3: tibia_r (-0.02805781 -0.04311916 -0.01932458)
      PathPoint P4: tibia_r (-0.009544046 -0.06089908 -0.02069284)
      PathPoint P5: tibia_r (0.002280436 -0.07804225 -0.01630089)
    Thelen2003Muscle bifemlh_r: optimal_force=1 max_isometric_force=896 optimal_fiber_length=0.09623023
        tendon_slack_length=0.2878078 pennation_angle_at_optimal=0 max_contraction_velocity=10 FmaxTendonStrain=0.033
        FmaxMuscleStrain=0.6 KshapeActive=0.5 KshapePassive=4 Af=0.3 Flen=1.8 activation_time_constant=0.01
        deactivation_time_constant=0.04
      PathPoint P1: pelvis (-0.1482372 -0.09581211 0.07414672)
      PathPoint P2: tibia_r (-0.02542264 -0.02938829 0.02485675)
      PathPoint P3: tibia_r (-0.01976378 -0.04596003 0.02896998)
    Thelen2003Muscle bifemsh_r: optimal_force=1 max_isometric_force=804 optimal_fiber_length=0.1516874
        tendon_slack_length=0.07803574 pennation_angle_at_optimal=0.4014257 max_contraction_velocity=10
        FmaxTendonStrain=0.033 FmaxMuscleStrain=0.6 KshapeActive=0.5 KshapePassive=4 Af=0.3 Flen=1.8
        activation_time_constant=0.01 deactivation_time_constant=0.04
      PathPoint P1: femur_r (0.005669397 -0.1883606 0.02653278)
      PathPoint P2: tibia_r (-0.02542264 -0.02938829 0.02485675)
      PathPoint P3: tibia_r (-0.01976378 -0.04596003 0.02896998)
    Thelen2003Muscle sar_r: optimal_force=1 max_isometric_force=156 optimal_fiber_length=0.4681647
        tendon_slack_length=0.09003166 pennation_angle_at_optimal=0 max_contraction_velocity=10 FmaxTendonStrain=0.033
        FmaxMuscleStrain=0.6 KshapeActive=0.5 KshapePassive=4 Af=0.3 Flen=1.8 activation_time_constant=0.01
        deactivation_time_constant=0.04
      PathPoint P1: pelvis (-0.01800595 -0.001214349 0.1326184)
      PathPoint P2: femur_r (-0.003401638 -0.3183661 -0.04773632)
      PathPoint P3: tibia_r (-0.004729793 -0.03420471 -0.03369977)
      PathPoint P4: tibia_r (0.005067635 -0.04808251 -0.0323484)
      PathPoint P5: tibia_r (0.02052392 -0.06857269 -0.02128407)
    Thelen2003Muscle add_long_r: optimal_force=1 max_isometric_force=627 optimal_fiber_length=0.1296981
        tendon_slack_length=0.1033825 pennation_angle_at_optimal=0.1047198 max_contraction_velocity=10
        FmaxTendonStrain=0.033 FmaxMuscleStrain=0.6 KshapeActive=0.5 KshapePassive=4 Af=0.3 Flen=1.8
        activation_time_constant=0.01 deactivation_time_constant=0.04
      PathPoint P1: pelvis (-0.03718875 -0.07809196 0.0180455)
      PathPoint P2: femur_r (0.005669397 -0.1883606 0.02653278)
    Thelen2003Muscle add_brev_r: optimal_force=1 max_isometric_force=429 optimal_fiber_length=0.1312838
        tendon_slack_length=0.01974193 pennation_angle_at_optimal=0 max_contraction_velocity=10 FmaxTendonStrain=0.033
        FmaxMuscleStrain=0.6 KshapeActive=0.5 KshapePassive=4 Af=0.3 Flen=1.8 activation_time_constant=0.01
        deactivation_time_constant=0.04
      PathPoint P1: pelvis (-0.06908163 -0.08547147 0.01751161)
      PathPoint P2: femur_r (0.001020491 -0.1067169 0.03333605)
    Thelen2003Muscle add_mag1_r: optimal_force=1 max_isometric_force=381 optimal_fiber_length=0.08702285
        tendon_slack_length=0.06001576 pennation_angle_at_optimal=0.08726646 max_contraction_velocity=10
        FmaxTendonStrain=0.033 FmaxMuscleStrain=0.6 KshapeActive=0.5 KshapePassive=4 Af=0.3 Flen=1.8
        activation_time_constant=0.01 deactivation_time_constant=0.04
      PathPoint P1: pelvis (-0.08614609 -0.109665 0.02722842)
      PathPoint P2: femur_r (-0.005102457 -0.1080553 0.03843851)
    Thelen2003Muscle add_mag2_r: optimal_force=1 max_isometric_force=343 optimal_fiber_length=0.1114046
        tendon_slack_length=0.1104839 pennation_angle_at_optimal=0.05235988 max_contraction_velocity=10
        FmaxTendonStrain=0.033 FmaxMuscleStrain=0.6 KshapeActive=0.5 KshapePassive=4 Af=0.3 Flen=1.8
        activation_time_constant=0.01 deactivation_time_constant=0.04
      PathPoint P1: pelvis (-0.097797 -0.1113464 0.03288766)
      PathPoint P2: femur_r (0.006122949 -0.2038863 0.02573906)
    Thelen2003Muscle add_mag3_r: optimal_force=1 max_isometric_force=488 optimal_fiber_length=0.1168633
        tendon_slack_length=0.2221294 pennation_angle_at_optimal=0.08726646 max_contraction_velocity=10
        FmaxTendonStrain=0.033 FmaxMuscleStrain=0.6 KshapeActive=0.5 KshapePassive=4 Af=0.3 Flen=1.8
        activation_time_constant=0.01 deactivation_time_constant=0.04
      PathPoint P1: pelvis (-0.1307255 -0.1066105 0.05212907)
      PathPoint P2: femur_r (0.007937156 -0.3423685 -0.03016119)
    Thelen2003Muscle tfl_r: optimal_force=1 max_isometric_force=233 optimal_fiber_length=0.08559884
        tendon_slack_length=0.3829422 pennation_angle_at_optimal=0.05235988 max_contraction_velocity=10
        FmaxTendonStrain=0.033 FmaxMuscleStrain=0.6 KshapeActive=0.5 KshapePassive=4 Af=0.3 Flen=1.8
        activation_time_constant=0.01 deactivation_time_constant=0.04
      PathPoint P1: pelvis (-0.03660032 0.01999005 0.1325116)
      PathPoint P2: femur_r (0.03333605 -0.08878202 0.0676926)
      PathPoint P3: femur_r (0.006122949 -0.3612848 0.04047949)
      PathPoint P4: tibia_r (0.005067635 -0.03975583 0.02508479)
    Thelen2003Muscle pect_r: optimal_force=1 max_isometric_force=266 optimal_fiber_length=0.1002078
        tendon_slack_length=0.03306856 pennation_angle_at_optimal=0 max_contraction_velocity=10 FmaxTendonStrain=0.033
        FmaxMuscleStrain=0.6 KshapeActive=0.5 KshapePassive=4 Af=0.3 Flen=1.8 activation_time_constant=0.01
        deactivation_time_constant=0.04
      PathPoint P1: pelvis (-0.05072263 -0.07173999 0.04815693)
      PathPoint P2: femur_r (-0.01383333 -0.07334555 0.02868715)
    Thelen2003Muscle grac_r: optimal_force=1 max_isometric_force=162 optimal_fiber_length=0.3097329
        tendon_slack_length=0.1108703 pennation_angle_at_optimal=0.05235988 max_contraction_velocity=10
        FmaxTendonStrain=0.033 FmaxMuscleStrain=0.6 KshapeActive=0.5 KshapePassive=4 Af=0.3 Flen=1.8
        activation_time_constant=0.01 deactivation_time_constant=0.04
      PathPoint P1: pelvis (-0.08709935 -0.1108794 0.0298338)
      ConditionalPathPoint P2: tibia_r (-0.02244118 -0.02604129 -0.03187543)
          socket_coordinate=/jointset/knee_r/knee_angle_r range=(-0.436332 0.174533)
      PathPoint P3: tibia_r (-0.01641069 -0.04206608 -0.03023689)
      PathPoint P4: tibia_r (0.005067635 -0.06824615 -0.01925701)
    Thelen2003Muscle glut_max1_r: optimal_force=1 max_isometric_force=573 optimal_fiber_length=0.1353694
        tendon_slack_length=0.1191632 pennation_angle_at_optimal=0.08726646 max_contraction_velocity=10
        FmaxTendonStrain=0.033 FmaxMuscleStrain=0.6 KshapeActive=0.5 KshapePassive=4 Af=0.3 Flen=1.8
        activation_time_constant=0.01 deactivation_time_constant=0.04
      PathPoint P1: pelvis (-0.1406347 0.0571678 0.07474468)
      PathPoint P2: pelvis (-0.1519325 0.001120937 0.0946054)
      PathPoint P3: femur_r (-0.05181829 -0.02212858 0.04444807)
      PathPoint P4: femur_r (-0.03140846 -0.05050314 0.05329233)
    Thelen2003Muscle glut_max2_r: optimal_force=1 max_isometric_force=819 optimal_fiber_length=0.1404019
        tendon_slack_length=0.1212996 pennation_angle_at_optimal=0 max_contraction_velocity=10 FmaxTendonStrain=0.033
        FmaxMuscleStrain=0.6 KshapeActive=0.5 KshapePassive=4 Af=0.3 Flen=1.8 activation_time_constant=0.01
        deactivation_time_constant=0.04
      PathPoint P1: pelvis (-0.1587583 0.01644041 0.06011608)
      PathPoint P2: pelvis (-0.1619358 -0.04857395 0.09759519)
      PathPoint P3: femur_r (-0.04830326 -0.04729093 0.03322267)
      PathPoint P4: femur_r (-0.01768852 -0.09065581 0.04750955)
    Thelen2003Muscle glut_max3_r: optimal_force=1 max_isometric_force=552 optimal_fiber_length=0.1424972
        tendon_slack_length=0.1434867 pennation_angle_at_optimal=0.08726646 max_contraction_velocity=10
        FmaxTendonStrain=0.033 FmaxMuscleStrain=0.6 KshapeActive=0.5 KshapePassive=4 Af=0.3 Flen=1.8
        activation_time_constant=0.01 deactivation_time_constant=0.04
      PathPoint P1: pelvis (-0.1831193 -0.02933119 0.00619313)
      PathPoint P2: pelvis (-0.1799418 -0.09826883 0.04303158)
      PathPoint P3: femur_r (-0.03390299 -0.09288652 0.01530737)
      PathPoint P4: femur_r (-0.006803276 -0.1266148 0.04660244)
    Thelen2003Muscle iliacus_r: optimal_force=1 max_isometric_force=1073 optimal_fiber_length=0.09997095
        tendon_slack_length=0.09997095 pennation_angle_at_optimal=0.1221731 max_contraction_velocity=10
        FmaxTendonStrain=0.033 FmaxMuscleStrain=0.6 KshapeActive=0.5 KshapePassive=4 Af=0.3 Flen=1.8
        activation_time_constant=0.01 deactivation_time_constant=0.04
      PathPoint P1: pelvis (-0.07932031 0.03409518 0.09118851)
      PathPoint P2: pelvis (-0.03036297 -0.05137629 0.08659705)
      ConditionalPathPoint P3: pelvis (-0.03389354 -0.07519621 0.08713094)
          socket_coordinate=/jointset/hip_r/hip_flexion_r range=(-1.5708 0.785398)
      PathPoint P4: femur_r (0.001927595 -0.04845089 0.006463113)
      PathPoint P5: femur_r (-0.02188387 -0.05541069 0.01462704)
    Thelen2003Muscle psoas_r: optimal_force=1 max_isometric_force=1113 optimal_fiber_length=0.09894819
        tendon_slack_length=0.1583171 pennation_angle_at_optimal=0.1396263 max_contraction_velocity=10
        FmaxTendonStrain=0.033 FmaxMuscleStrain=0.6 KshapeActive=0.5 KshapePassive=4 Af=0.3 Flen=1.8
        activation_time_constant=0.01 deactivation_time_constant=0.04
      PathPoint P1: pelvis (-0.07614279 0.08285595 0.03085887)
      PathPoint P2: pelvis (-0.02800925 -0.05324452 0.08104459)
      ConditionalPathPoint P3: pelvis (-0.03389354 -0.07519621 0.08713094)
          socket_coordinate=/jointset/hip_r/hip_flexion_r range=(-1.5708 0.785398)
      PathPoint P4: femur_r (0.001814207 -0.04523868 0.004308742)
      PathPoint P5: femur_r (-0.02131693 -0.05326921 0.01179235)
    Thelen2003Muscle quad_fem_r: optimal_force=1 max_isometric_force=381 optimal_fiber_length=0.05906889
        tendon_slack_length=0.02625284 pennation_angle_at_optimal=0 max_contraction_velocity=10 FmaxTendonStrain=0.033
        FmaxMuscleStrain=0.6 KshapeActive=0.5 KshapePassive=4 Af=0.3 Flen=1.8 activation_time_constant=0.01
        deactivation_time_constant=0.04
      PathPoint P1: pelvis (-0.134515 -0.1075166 0.05552462)
      PathPoint P2: femur_r (-0.04320081 -0.03203291 0.04149999)
    Thelen2003Muscle gem_r: optimal_force=1 max_isometric_force=164 optimal_fiber_length=0.02684431
        tendon_slack_length=0.043622 pennation_angle_at_optimal=0 max_contraction_velocity=10 FmaxTendonStrain=0.033
        FmaxMuscleStrain=0.6 KshapeActive=0.5 KshapePassive=4 Af=0.3 Flen=1.8 activation_time_constant=0.01
        deactivation_time_constant=0.04
      PathPoint P1: pelvis (-0.1333381 -0.07659738 0.07623957)
      PathPoint P2: femur_r (-0.01610109 -0.002944529 0.05023086)
    Thelen2003Muscle peri_r: optimal_force=1 max_isometric_force=444 optimal_fiber_length=0.02723819
        tendon_slack_length=0.1204766 pennation_angle_at_optimal=0.1745329 max_contraction_velocity=10
        FmaxTendonStrain=0.033 FmaxMuscleStrain=0.6 KshapeActive=0.5 KshapePassive=4 Af=0.3 Flen=1.8
        activation_time_constant=0.01 deactivation_time_constant=0.04
      PathPoint P1: pelvis (-0.1642895 0.0002802343 0.02509286)
      PathPoint P2: pelvis (-0.1403993 -0.02578156 0.07015322)
      PathPoint P3: femur_r (-0.01678142 -0.003212214 0.04955053)
    Thelen2003Muscle rect_fem_r: optimal_force=1 max_isometric_force=1169 optimal_fiber_length=0.1028627
        tendon_slack_length=0.2797144 pennation_angle_at_optimal=0.08726646 max_contraction_velocity=10
        FmaxTendonStrain=0.033 FmaxMuscleStrain=0.6 KshapeActive=0.5 KshapePassive=4 Af=0.3 Flen=1.8
        activation_time_constant=0.01 deactivation_time_constant=0.04
      PathPoint P1: pelvis (-0.03471735 -0.02905096 0.1033612)
      ConditionalPathPoint P2: femur_r (0.03787157 -0.3595895 0.002154371)
          socket_coordinate=/jointset/knee_r/knee_angle_r range=(-2.61799 -1.45997)
      MovingPathPoint P3: tibia_r socket_x_coordinate=/jointset/knee_r/knee_angle_r
          socket_y_coordinate=/jointset/knee_r/knee_angle_r socket_z_coordinate=/jointset/knee_r/knee_angle_r
        x_location: MultiplierFunction: scale=0.8446059
          SimmSpline: x=(-2.0944 -1.99997 -1.5708 -1.45752 -1.39626 -1.0472 -0.698132 -0.526391 -0.349066 -0.174533 0 0.00017453 0.00034907 0.0279253 0.0872665 0.174533 2.0944)
              y=(0.0155805 0.0179938 0.0275081 0.0296564 0.0307615 0.0365695 0.0422074 0.0450902 0.048391 0.0534299 0.0617576 0.0617669 0.0617762 0.0633083 0.066994 0.0733035 0.0573481)
        y_location: MultiplierFunction: scale=0.8163415
          SimmSpline: x=(-2.0944 -1.99997 -1.5708 -1.45752 -1.39626 -1.0472 -0.698132 -0.526391 -0.349066 -0.174533 0 0.00017453 0.00034907 0.0279253 0.0872665 0.174533 2.0944)
              y=(0.0234116 0.0237613 0.0251141 0.0252795 0.0253146 0.0249184 0.0242373 0.0238447 0.0234197 0.0227644 0.020984 0.0209814 0.0209788 0.0205225 0.0191754 0.0159554 -0.0673774)
        z_location: MultiplierFunction: scale=0.8446059
          SimmSpline: x=(-2.0944 0.1745) y=(0.0014 0.0014)
    Thelen2003Muscle vas_med_r: optimal_force=1 max_isometric_force=1294 optimal_fiber_length=0.08093168
        tendon_slack_length=0.1145774 pennation_angle_at_optimal=0.08726646 max_contraction_velocity=10
        FmaxTendonStrain=0.033 FmaxMuscleStrain=0.6 KshapeActive=0.5 KshapePassive=4 Af=0.3 Flen=1.8
        activation_time_constant=0.01 deactivation_time_constant=0.04
      PathPoint P1: femur_r (0.01587431 -0.1872899 0.02131693)
      PathPoint P2: femur_r (0.04036611 -0.2470728 0.001020491)
      ConditionalPathPoint P3: femur_r (0.04195354 -0.3611956 -0.01417349)
          socket_coordinate=/jointset/knee_r/knee_angle_r range=(-2.61799 -1.21004)
      ConditionalPathPoint P4: femur_r (0.0310683 -0.3796658 -0.01485382)
          socket_coordinate=/jointset/knee_r/knee_angle_r range=(-2.61799 -1.78006)
      MovingPathPoint P5: tibia_r socket_x_coordinate=/jointset/knee_r/knee_angle_r
          socket_y_coordinate=/jointset/knee_r/knee_angle_r socket_z_coordinate=/jointset/knee_r/knee_angle_r
        x_location: MultiplierFunction: scale=0.8446059
          SimmSpline: x=(-2.0944 -1.99997 -1.5708 -1.45752 -1.39626 -1.0472 -0.698132 -0.526391 -0.349066 -0.174533 0 0.00017453 0.00034907 0.0279253 0.0872665 0.174533 2.0944)
              y=(0.00981097 0.0122243 0.0217371 0.0238851 0.0249902 0.0307959 0.0364187 0.0392871 0.0425654 0.0475764 0.0559586 0.0559681 0.0559776 0.0575419 0.0613368 0.0679503 0.0629332)
        y_location: MultiplierFunction: scale=0.8163415
          SimmSpline: x=(-2.0944 -1.99997 -1.5708 -1.45752 -1.39626 -1.0472 -0.698132 -0.526391 -0.349066 -0.174533 0 0.00017453 0.00034907 0.0279253 0.0872665 0.174533 2.0944)
              y=(0.0224154 0.0227651 0.0241265 0.0242933 0.0243287 0.0239462 0.0233593 0.0230677 0.0228342 0.0226362 0.0217917 0.0217903 0.0217889 0.0215365 0.0206842 0.0183269 -0.0656205)
        z_location: MultiplierFunction: scale=0.8446059
          SimmSpline: x=(-2.0944 2.0944) y=(-0.0146 -0.0146)
    Thelen2003Muscle vas_int_r: optimal_force=1 max_isometric_force=1365 optimal_fiber_length=0.07856375
        tendon_slack_length=0.1228123 pennation_angle_at_optimal=0.05235988 max_contraction_velocity=10
        FmaxTendonStrain=0.033 FmaxMuscleStrain=0.6 KshapeActive=0.5 KshapePassive=4 Af=0.3 Flen=1.8
        activation_time_constant=0.01 deactivation_time_constant=0.04
      PathPoint P1: femur_r (0.0328825 -0.171675 0.03515026)
      PathPoint P2: femur_r (0.03798496 -0.1859515 0.03231556)
      ConditionalPathPoint P3: femur_r (0.03889206 -0.3595895 0.006236337)
          socket_coordinate=/jointset/knee_r/knee_angle_r range=(-2.61799 -1.42)
      MovingPathPoint P4: tibia_r socket_x_coordinate=/jointset/knee_r/knee_angle_r
          socket_y_coordinate=/jointset/knee_r/knee_angle_r socket_z_coordinate=/jointset/knee_r/knee_angle_r
        x_location: MultiplierFunction: scale=0.8446059
          SimmSpline: x=(-2.0944 -1.99997 -1.5708 -1.45752 -1.39626 -1.0472 -0.698132 -0.526391 -0.349066 -0.174533 0 0.00017453 0.00034907 0.0279253 0.0872665 0.174533 2.0944)
              y=(0.0082733 0.0106866 0.0202042 0.022353 0.0234583 0.0292715 0.0349465 0.037871 0.0412569 0.0465287 0.0554632 0.0554735 0.0554837 0.0571717 0.061272 0.0684368 0.0648818)
        y_location: MultiplierFunction: scale=0.8163415
          SimmSpline: x=(-2.0944 -1.99997 -1.5708 -1.45752 -1.39626 -1.0472 -0.698132 -0.526391 -0.349066 -0.174533 0 0.00017453 0.00034907 0.0279253 0.0872665 0.174533 2.0944)
              y=(0.025599 0.0259487 0.0273124 0.0274796 0.0275151 0.0271363 0.0265737 0.0263073 0.0261187 0.0260129 0.0252923 0.0252911 0.0252898 0.0250526 0.0242191 0.0218288 -0.0685706)
        z_location: MultiplierFunction: scale=0.8446059
          SimmSpline: x=(-2.0944 2.0944) y=(0.0018 0.0018)
    Thelen2003Muscle vas_lat_r: optimal_force=1 max_isometric_force=1871 optimal_fiber_length=0.07609386
        tendon_slack_length=0.1422231 pennation_angle_at_optimal=0.08726646 max_contraction_velocity=10
        FmaxTendonStrain=0.033 FmaxMuscleStrain=0.6 KshapeActive=0.5 KshapePassive=4 Af=0.3 Flen=1.8
        activation_time_constant=0.01 deactivation_time_constant=0.04
      PathPoint P1: femur_r (0.005442621 -0.165429 0.03957239)
      PathPoint P2: femur_r (0.03050136 -0.2311902 0.04637567)
      ConditionalPathPoint P3: femur_r (0.04093305 -0.3595895 0.02324453)
          socket_coordinate=/jointset/knee_r/knee_angle_r range=(-2.61799 -1.21004)
      ConditionalPathPoint P4: femur_r (0.02868715 -0.3785951 0.02086338)
          socket_coordinate=/jointset/knee_r/knee_angle_r range=(-2.61799 -1.92004)
      MovingPathPoint P5: tibia_r socket_x_coordinate=/jointset/knee_r/knee_angle_r
          socket_y_coordinate=/jointset/knee_r/knee_angle_r socket_z_coordinate=/jointset/knee_r/knee_angle_r
        x_location: MultiplierFunction: scale=0.8446059
          SimmSpline: x=(-2.0944 -1.99997 -1.5708 -1.45752 -1.39626 -1.0472 -0.698132 -0.526391 -0.349066 -0.174533 0 0.00017453 0.00034907 0.0279253 0.0872665 0.174533 2.0944)
              y=(0.0142897 0.016703 0.0262145 0.0283623 0.0294674 0.0352709 0.0408785 0.0437291 0.0469704 0.0518742 0.0599557 0.0599647 0.0599738 0.0614577 0.0650351 0.0711867 0.0583766)
        y_location: MultiplierFunction: scale=0.8163415
          SimmSpline: x=(-2.0944 -1.99997 -1.5708 -1.45752 -1.39626 -1.0472 -0.698132 -0.526391 -0.349066 -0.174533 0 0.00017453 0.00034907 0.0279253 0.0872665 0.174533 2.0944)
              y=(0.0215318 0.0218815 0.0232362 0.0234019 0.0234371 0.0230439 0.0223842 0.0220151 0.0216359 0.0210971 0.0195864 0.0195842 0.019582 0.01919 0.018008 0.0151073 -0.0653421)
        z_location: MultiplierFunction: scale=0.8446059
          SimmSpline: x=(-2.0944 2.0944) y=(0.0165 0.0165)
    Thelen2003Muscle med_gas_r: optimal_force=1 max_isometric_force=1558 optimal_fiber_length=0.048915
        tendon_slack_length=0.3179475 pennation_angle_at_optimal=0.296706 max_contraction_velocity=10
        FmaxTendonStrain=0.033 FmaxMuscleStrain=0.6 KshapeActive=0.5 KshapePassive=4 Af=0.3 Flen=1.8
        activation_time_constant=0.01 deactivation_time_constant=0.04
      PathPoint P1: femur_r (-0.02154371 -0.3505774 -0.02664617)
      ConditionalPathPoint P2: femur_r (-0.03401638 -0.3588757 -0.02925409)
          socket_coordinate=/jointset/knee_r/knee_angle_r range=(-0.785398 0.174533)
      PathPoint P3: calcn_r (0 0.03252932 -0.003946465)
    Thelen2003Muscle lat_gas_r: optimal_force=1 max_isometric_force=683 optimal_fiber_length=0.05200835
        tendon_slack_length=0.3087996 pennation_angle_at_optimal=0.1396263 max_contraction_velocity=10
        FmaxTendonStrain=0.033 FmaxMuscleStrain=0.6 KshapeActive=0.5 KshapePassive=4 Af=0.3 Flen=1.8
        activation_time_constant=0.01 deactivation_time_constant=0.04
      PathPoint P1: femur_r (-0.02494535 -0.3520943 0.03084152)
      ConditionalPathPoint P2: femur_r (-0.03401638 -0.3585188 0.0310683)
          socket_coordinate=/jointset/knee_r/knee_angle_r range=(-0.785398 0.174533)
      PathPoint P3: calcn_r (0 0.03252932 -0.003946465)
    Thelen2003Muscle soleus_r: optimal_force=1 max_isometric_force=3549 optimal_fiber_length=0.0399384
        tendon_slack_length=0.199692 pennation_angle_at_optimal=0.4363323 max_contraction_velocity=10
        FmaxTendonStrain=0.033 FmaxMuscleStrain=0.6 KshapeActive=0.5 KshapePassive=4 Af=0.3 Flen=1.8
        activation_time_constant=0.01 deactivation_time_constant=0.04
      PathPoint P1: tibia_r (-0.002027054 -0.1251452 0.005996702)
      PathPoint P2: calcn_r (0 0.03252932 -0.003946465)
    Thelen2003Muscle tib_post_r: optimal_force=1 max_isometric_force=1588 optimal_fiber_length=0.02519343
        tendon_slack_length=0.2519343 pennation_angle_at_optimal=0.2094395 max_contraction_velocity=10
        FmaxTendonStrain=0.033 FmaxMuscleStrain=0.6 KshapeActive=0.5 KshapePassive=4 Af=0.3 Flen=1.8
        activation_time_constant=0.01 deactivation_time_constant=0.04
      PathPoint P1: tibia_r (-0.007939295 -0.1100428 0.001604751)
      PathPoint P2: tibia_r (-0.01216232 -0.3306999 -0.01934147)
      PathPoint P3: calcn_r (0.03777458 0.03504772 -0.02129602)
      PathPoint P4: calcn_r (0.0699328 0.01668439 -0.02092371)
    Thelen2003Muscle flex_dig_r: optimal_force=1 max_isometric_force=310 optimal_fiber_length=0.0282365
        tendon_slack_length=0.3321941 pennation_angle_at_optimal=0.1221731 max_contraction_velocity=10
        FmaxTendonStrain=0.033 FmaxMuscleStrain=0.6 KshapeActive=0.5 KshapePassive=4 Af=0.3 Flen=1.8
        activation_time_constant=0.01 deactivation_time_constant=0.04
      PathPoint P1: tibia_r (-0.007010229 -0.1670235 -0.001520291)
      PathPoint P2: tibia_r (-0.01300693 -0.3306999 -0.01655427)
      PathPoint P3: calcn_r (0.03949572 0.03305399 -0.02084925)
      PathPoint P4: calcn_r (0.06413526 0.01846826 -0.0195834)
      PathPoint P5: calcn_r (0.1501925 -0.008499597 0.008637547)
      PathPoint P6: toes_r (-0.001414771 -0.009178096 0.01729718)
      PathPoint P7: toes_r (0.02122156 -0.008354421 0.0252986)
      PathPoint P8: toes_r (0.03283757 -0.007060074 0.02847563)
    Thelen2003Muscle flex_hal_r: optimal_force=1 max_isometric_force=322 optimal_fiber_length=0.03591138
        tendon_slack_length=0.3173563 pennation_angle_at_optimal=0.1745329 max_contraction_velocity=10
        FmaxTendonStrain=0.033 FmaxMuscleStrain=0.6 KshapeActive=0.5 KshapePassive=4 Af=0.3 Flen=1.8
        activation_time_constant=0.01 deactivation_time_constant=0.04
      PathPoint P1: tibia_r (-0.006672386 -0.1905341 0.02060838)
      PathPoint P2: tibia_r (-0.01570967 -0.3329857 -0.01469614)
      PathPoint P3: calcn_r (0.03387936 0.02896159 -0.01794525)
      PathPoint P4: calcn_r (0.09402881 0.007135464 -0.01906217)
      PathPoint P5: calcn_r (0.1563523 -0.005561465 -0.02003017)
      PathPoint P6: toes_r (0.01154155 -0.007530745 -0.03118199)
      PathPoint P7: toes_r (0.04184743 -0.01200213 -0.02129789)
    Thelen2003Muscle tib_ant_r: optimal_force=1 max_isometric_force=905 optimal_fiber_length=0.07978703
        tendon_slack_length=0.1815562 pennation_angle_at_optimal=0.08726646 max_contraction_velocity=10
        FmaxTendonStrain=0.033 FmaxMuscleStrain=0.6 KshapeActive=0.5 KshapePassive=4 Af=0.3 Flen=1.8
        activation_time_constant=0.01 deactivation_time_constant=0.04
      PathPoint P1: tibia_r (0.01511844 -0.1325739 0.009712967)
      PathPoint P2: tibia_r (0.02778753 -0.3225365 -0.01494952)
      PathPoint P3: calcn_r (0.1056239 0.01867813 -0.02271079)
    Thelen2003Muscle per_brev_r: optimal_force=1 max_isometric_force=435 optimal_fiber_length=0.04018467
        tendon_slack_length=0.1293946 pennation_angle_at_optimal=0.08726646 max_contraction_velocity=10
        FmaxTendonStrain=0.033 FmaxMuscleStrain=0.6 KshapeActive=0.5 KshapePassive=4 Af=0.3 Flen=1.8
        activation_time_constant=0.01 deactivation_time_constant=0.04
      PathPoint P1: tibia_r (-0.005912241 -0.216004 0.02744969)
      PathPoint P2: tibia_r (-0.0167232 -0.3415573 0.02390235)
      PathPoint P3: tibia_r (-0.01216232 -0.3506187 0.02440911)
      PathPoint P4: calcn_r (0.04266625 0.02833199 0.01734956)
      PathPoint P5: calcn_r (0.06132708 0.02298039 0.02554033)
    Thelen2003Muscle per_long_r: optimal_force=1 max_isometric_force=943 optimal_fiber_length=0.0400088
        tendon_slack_length=0.2816946 pennation_angle_at_optimal=0.1745329 max_contraction_velocity=10
        FmaxTendonStrain=0.033 FmaxMuscleStrain=0.6 KshapeActive=0.5 KshapePassive=4 Af=0.3 Flen=1.8
        activation_time_constant=0.01 deactivation_time_constant=0.04
      PathPoint P1: tibia_r (0.0004223029 -0.1280023 0.03057473)
      PathPoint P2: tibia_r (-0.01748334 -0.3432716 0.02415573)
      PathPoint P3: tibia_r (-0.01368261 -0.3525779 0.02440911)
      PathPoint P4: calcn_r (0.0396769 0.02413466 0.01645602)
      PathPoint P5: calcn_r (0.06168942 0.01112293 0.0211471)
      PathPoint P6: calcn_r (0.07717972 0.007240398 0.00878647)
      PathPoint P7: calcn_r (0.1089756 0.008919331 -0.01370094)
    Thelen2003Muscle per_tert_r: optimal_force=1 max_isometric_force=180 optimal_fiber_length=0.06326703
        tendon_slack_length=0.08008484 pennation_angle_at_optimal=0.2268928 max_contraction_velocity=10
        FmaxTendonStrain=0.033 FmaxMuscleStrain=0.6 KshapeActive=0.5 KshapePassive=4 Af=0.3 Flen=1.8
        activation_time_constant=0.01 deactivation_time_constant=0.04
      PathPoint P1: tibia_r (0.0008446059 -0.2289022 0.0195104)
      PathPoint P2: tibia_r (0.01934147 -0.3321694 0.01342923)
      PathPoint P3: calcn_r (0.07763265 0.02392479 0.02226402)
    Thelen2003Muscle ext_dig_r: optimal_force=1 max_isometric_force=512 optimal_fiber_length=0.08389695
        tendon_slack_length=0.2837691 pennation_angle_at_optimal=0.1396263 max_contraction_velocity=10
        FmaxTendonStrain=0.033 FmaxMuscleStrain=0.6 KshapeActive=0.5 KshapePassive=4 Af=0.3 Flen=1.8
        activation_time_constant=0.01 deactivation_time_constant=0.04
      PathPoint P1: tibia_r (0.002702739 -0.1127368 0.02331112)
      PathPoint P2: tibia_r (0.02440911 -0.327108 0.006081162)
      PathPoint P3: calcn_r (0.08352077 0.04071412 -7.446161e-5)
      PathPoint P4: calcn_r (0.1463878 0.005771332 0.009680009)
      PathPoint P5: toes_r (0.0002233848 0.005530391 0.01800319)
      PathPoint P6: toes_r (0.03298649 -0.0004706716 0.02941697)
    Thelen2003Muscle ext_hal_r: optimal_force=1 max_isometric_force=162 optimal_fiber_length=0.0909294
        tendon_slack_length=0.249851 pennation_angle_at_optimal=0.1047198 max_contraction_velocity=10
        FmaxTendonStrain=0.033 FmaxMuscleStrain=0.6 KshapeActive=0.5 KshapePassive=4 Af=0.3 Flen=1.8
        activation_time_constant=0.01 deactivation_time_constant=0.04
      PathPoint P1: tibia_r (0.001013527 -0.1442475 0.01925701)
      PathPoint P2: tibia_r (0.02753415 -0.3253121 -0.00717915)
      PathPoint P3: calcn_r (0.08786893 0.04081905 -0.0157114)
      PathPoint P4: calcn_r (0.1171284 0.03242439 -0.01913663)
      PathPoint P5: calcn_r (0.157077 0.01458573 -0.02084925)
      PathPoint P6: toes_r (0.02218956 0.004824384 -0.02882863)
      PathPoint P7: toes_r (0.04192189 0.004000708 -0.02188623)
    Thelen2003Muscle glut_med1_l: optimal_force=1 max_isometric_force=819 optimal_fiber_length=0.05209446
        tendon_slack_length=0.07595079 pennation_angle_at_optimal=0.1396263 max_contraction_velocity=10
        FmaxTendonStrain=0.033 FmaxMuscleStrain=0.6 KshapeActive=0.5 KshapePassive=4 Af=0.3 Flen=1.8
        activation_time_constant=0.01 deactivation_time_constant=0.04
      PathPoint P1: pelvis (-0.04801585 0.02839708 -0.1290947)
      PathPoint P2: femur_l (-0.02385238 -0.01036065 -0.0607251)
    Thelen2003Muscle glut_med2_l: optimal_force=1 max_isometric_force=573 optimal_fiber_length=0.08151974
        tendon_slack_length=0.05113072 pennation_angle_at_optimal=0 max_contraction_velocity=10 FmaxTendonStrain=0.033
        FmaxMuscleStrain=0.6 KshapeActive=0.5 KshapePassive=4 Af=0.3 Flen=1.8 activation_time_constant=0.01
        deactivation_time_constant=0.04
      PathPoint P1: pelvis (-0.1006215 0.04156809 -0.08179203)
      PathPoint P2: femur_l (-0.02822896 -0.005136047 -0.05766149)
    Thelen2003Muscle glut_med3_l: optimal_force=1 max_isometric_force=653 optimal_fiber_length=0.06434306
        tendon_slack_length=0.0527892 pennation_angle_at_optimal=0.3316126 max_contraction_velocity=10
        FmaxTendonStrain=0.033 FmaxMuscleStrain=0.6 KshapeActive=0.5 KshapePassive=4 Af=0.3 Flen=1.8
        activation_time_constant=0.01 deactivation_time_constant=0.04
      PathPoint P1: pelvis (-0.1439299 0.009808201 -0.06919221)
      PathPoint P2: femur_l (-0.03380911 -0.004161969 -0.05667676)
    Thelen2003Muscle glut_min1_l: optimal_force=1 max_isometric_force=270 optimal_fiber_length=0.06725807
        tendon_slack_length=0.01582543 pennation_angle_at_optimal=0.1745329 max_contraction_velocity=10
        FmaxTendonStrain=0.033 FmaxMuscleStrain=0.6 KshapeActive=0.5 KshapePassive=4 Af=0.3 Flen=1.8
        activation_time_constant=0.01 deactivation_time_constant=0.04
      PathPoint P1: pelvis (-0.05495932 -0.007472915 -0.1127577)
      PathPoint P2: femur_l (-0.007877851 -0.009209463 -0.06127217)
    Thelen2003Muscle glut_min2_l: optimal_force=1 max_isometric_force=285 optimal_fiber_length=0.05474155
        tendon_slack_length=0.02541572 pennation_angle_at_optimal=0 max_contraction_velocity=10 FmaxTendonStrain=0.033
        FmaxMuscleStrain=0.6 KshapeActive=0.5 KshapePassive=4 Af=0.3 Flen=1.8 activation_time_constant=0.01
        deactivation_time_constant=0.04
      PathPoint P1: pelvis (-0.07449518 -0.006071744 -0.1058171)
      PathPoint P2: femur_l (-0.0105038 -0.009209463 -0.06127217)
    Thelen2003Muscle glut_min3_l: optimal_force=1 max_isometric_force=323 optimal_fiber_length=0.03738845
        tendon_slack_length=0.05017924 pennation_angle_at_optimal=0.01745329 max_contraction_velocity=10
        FmaxTendonStrain=0.033 FmaxMuscleStrain=0.6 KshapeActive=0.5 KshapePassive=4 Af=0.3 Flen=1.8
        activation_time_constant=0.01 deactivation_time_constant=0.04
      PathPoint P1: pelvis (-0.09815005 -0.005884921 -0.09140206)
      PathPoint P2: femur_l (-0.01477097 -0.00734986 -0.06017802)
    Thelen2003Muscle semimem_l: optimal_force=1 max_isometric_force=1288 optimal_fiber_length=0.07037155
        tendon_slack_length=0.3157923 pennation_angle_at_optimal=0.2617994 max_contraction_velocity=10
        FmaxTendonStrain=0.033 FmaxMuscleStrain=0.6 KshapeActive=0.5 KshapePassive=4 Af=0.3 Flen=1.8
        activation_time_constant=0.01 deactivation_time_constant=0.04
      PathPoint P1: pelvis (-0.1402816 -0.09104813 -0.07635703)
      ConditionalPathPoint P2: tibia_l (-0.03060817 -0.02968706 0.0166322)
          socket_coordinate=/jointset/knee_l/knee_angle_l range=(-0.558505 0.174533)
      PathPoint P3: tibia_l (-0.02374772 -0.04024921 0.0172127)
    Thelen2003Muscle semiten_l: optimal_force=1 max_isometric_force=410 optimal_fiber_length=0.1760819
        tendon_slack_length=0.2238255 pennation_angle_at_optimal=0.08726646 max_contraction_velocity=10
        FmaxTendonStrain=0.033 FmaxMuscleStrain=0.6 KshapeActive=0.5 KshapePassive=4 Af=0.3 Flen=1.8
        activation_time_constant=0.01 deactivation_time_constant=0.04
      PathPoint P1: pelvis (-0.1486962 -0.1026405 -0.0644833)
      ConditionalPathPoint P2: tibia_l (-0.03696728 -0.02411915 0.02002724)
          socket_coordinate=/jointset/knee_l/knee_angle_l range=(-0.331613 0.174533)
      PathPoint P3: tibia_l (-0.02921849 -0.04456012 0.02012399)
      PathPoint P4: tibia_l (-0.009938861 -0.0629342 0.02154886)
      PathPoint P5: tibia_l (0.002374772 -0.08065027 0.01697522)
    Thelen2003Muscle bifemlh_l: optimal_force=1 max_isometric_force=896 optimal_fiber_length=0.09595245
        tendon_slack_length=0.286977 pennation_angle_at_optimal=0 max_contraction_velocity=10 FmaxTendonStrain=0.033
        FmaxMuscleStrain=0.6 KshapeActive=0.5 KshapePassive=4 Af=0.3 Flen=1.8 activation_time_constant=0.01
        deactivation_time_constant=0.04
      PathPoint P1: pelvis (-0.1482372 -0.09581211 -0.07414672)
      PathPoint P2: tibia_l (-0.02647431 -0.03037039 -0.02588502)
      PathPoint P3: tibia_l (-0.02058136 -0.04749592 -0.0301684)
    Thelen2003Muscle bifemsh_l: optimal_force=1 max_isometric_force=804 optimal_fiber_length=0.1518573
        tendon_slack_length=0.0781231 pennation_angle_at_optimal=0.4014257 max_contraction_velocity=10
        FmaxTendonStrain=0.033 FmaxMuscleStrain=0.6 KshapeActive=0.5 KshapePassive=4 Af=0.3 Flen=1.8
        activation_time_constant=0.01 deactivation_time_constant=0.04
      PathPoint P1: femur_l (0.00547073 -0.1869344 -0.02560301)
      PathPoint P2: tibia_l (-0.02647431 -0.03037039 -0.02588502)
      PathPoint P3: tibia_l (-0.02058136 -0.04749592 -0.0301684)
    Thelen2003Muscle sar_l: optimal_force=1 max_isometric_force=156 optimal_fiber_length=0.4673578
        tendon_slack_length=0.08987649 pennation_angle_at_optimal=0 max_contraction_velocity=10 FmaxTendonStrain=0.033
        FmaxMuscleStrain=0.6 KshapeActive=0.5 KshapePassive=4 Af=0.3 Flen=1.8 activation_time_constant=0.01
        deactivation_time_constant=0.04
      PathPoint P1: pelvis (-0.01800595 -0.001214349 -0.1326184)
      PathPoint P2: femur_l (-0.003282438 -0.3159554 0.04606354)
      PathPoint P3: tibia_l (-0.004925453 -0.03534776 0.03509385)
      PathPoint P4: tibia_l (0.005277271 -0.04968934 0.03368658)
      PathPoint P5: tibia_l (0.02137295 -0.07086425 0.02216454)
    Thelen2003Muscle add_long_l: optimal_force=1 max_isometric_force=627 optimal_fiber_length=0.1287867
        tendon_slack_length=0.1026561 pennation_angle_at_optimal=0.1047198 max_contraction_velocity=10
        FmaxTendonStrain=0.033 FmaxMuscleStrain=0.6 KshapeActive=0.5 KshapePassive=4 Af=0.3 Flen=1.8
        activation_time_constant=0.01 deactivation_time_constant=0.04
      PathPoint P1: pelvis (-0.03718875 -0.07809196 -0.0180455)
      PathPoint P2: femur_l (0.00547073 -0.1869344 -0.02560301)
    Thelen2003Muscle add_brev_l: optimal_force=1 max_isometric_force=429 optimal_fiber_length=0.1301347
        tendon_slack_length=0.01956913 pennation_angle_at_optimal=0 max_contraction_velocity=10 FmaxTendonStrain=0.033
        FmaxMuscleStrain=0.6 KshapeActive=0.5 KshapePassive=4 Af=0.3 Flen=1.8 activation_time_constant=0.01
        deactivation_time_constant=0.04
      PathPoint P1: pelvis (-0.06908163 -0.08547147 -0.01751161)
      PathPoint P2: femur_l (0.0009847313 -0.1059088 -0.03216789)
    Thelen2003Muscle add_mag1_l: optimal_force=1 max_isometric_force=381 optimal_fiber_length=0.08603613
        tendon_slack_length=0.05933526 pennation_angle_at_optimal=0.08726646 max_contraction_velocity=10
        FmaxTendonStrain=0.033 FmaxMuscleStrain=0.6 KshapeActive=0.5 KshapePassive=4 Af=0.3 Flen=1.8
        activation_time_constant=0.01 deactivation_time_constant=0.04
      PathPoint P1: pelvis (-0.08614609 -0.109665 -0.02722842)
      PathPoint P2: femur_l (-0.004923657 -0.1072371 -0.03709155)
    Thelen2003Muscle add_mag2_l: optimal_force=1 max_isometric_force=343 optimal_fiber_length=0.1104018
        tendon_slack_length=0.1094894 pennation_angle_at_optimal=0.05235988 max_contraction_velocity=10
        FmaxTendonStrain=0.033 FmaxMuscleStrain=0.6 KshapeActive=0.5 KshapePassive=4 Af=0.3 Flen=1.8
        activation_time_constant=0.01 deactivation_time_constant=0.04
      PathPoint P1: pelvis (-0.097797 -0.1113464 -0.03288766)
      PathPoint P2: femur_l (0.005908388 -0.2023425 -0.02483711)
    Thelen2003Muscle add_mag3_l: optimal_force=1 max_isometric_force=488 optimal_fiber_length=0.1159369
        tendon_slack_length=0.2203687 pennation_angle_at_optimal=0.08726646 max_contraction_velocity=10
        FmaxTendonStrain=0.033 FmaxMuscleStrain=0.6 KshapeActive=0.5 KshapePassive=4 Af=0.3 Flen=1.8
        activation_time_constant=0.01 deactivation_time_constant=0.04
      PathPoint P1: pelvis (-0.1307255 -0.1066105 -0.05212907)
      PathPoint P2: femur_l (0.007659021 -0.339776 0.02910428)
    Thelen2003Muscle tfl_l: optimal_force=1 max_isometric_force=233 optimal_fiber_length=0.08521827
        tendon_slack_length=0.3812396 pennation_angle_at_optimal=0.05235988 max_contraction_velocity=10
        FmaxTendonStrain=0.033 FmaxMuscleStrain=0.6 KshapeActive=0.5 KshapePassive=4 Af=0.3 Flen=1.8
        activation_time_constant=0.01 deactivation_time_constant=0.04
      PathPoint P1: pelvis (-0.03660032 0.01999005 -0.1325116)
      PathPoint P2: femur_l (0.03216789 -0.08810976 -0.06532051)
      PathPoint P3: femur_l (0.005908388 -0.3585492 -0.03906101)
      PathPoint P4: tibia_l (0.005277271 -0.04108439 -0.02612249)
    Thelen2003Muscle pect_l: optimal_force=1 max_isometric_force=266 optimal_fiber_length=0.09929206
        tendon_slack_length=0.03276638 pennation_angle_at_optimal=0 max_contraction_velocity=10 FmaxTendonStrain=0.033
        FmaxMuscleStrain=0.6 KshapeActive=0.5 KshapePassive=4 Af=0.3 Flen=1.8 activation_time_constant=0.01
        deactivation_time_constant=0.04
      PathPoint P1: pelvis (-0.05072263 -0.07173999 -0.04815693)
      PathPoint P2: femur_l (-0.01334858 -0.07279018 -0.02768189)
    Thelen2003Muscle grac_l: optimal_force=1 max_isometric_force=162 optimal_fiber_length=0.3095534
        tendon_slack_length=0.110806 pennation_angle_at_optimal=0.05235988 max_contraction_velocity=10
        FmaxTendonStrain=0.033 FmaxMuscleStrain=0.6 KshapeActive=0.5 KshapePassive=4 Af=0.3 Flen=1.8
        activation_time_constant=0.01 deactivation_time_constant=0.04
      PathPoint P1: pelvis (-0.08709935 -0.1108794 -0.0298338)
      ConditionalPathPoint P2: tibia_l (-0.02336952 -0.02691154 0.03319404)
          socket_coordinate=/jointset/knee_l/knee_angle_l range=(-0.436332 0.174533)
      PathPoint P3: tibia_l (-0.01708956 -0.04347184 0.03148772)
      PathPoint P4: tibia_l (0.005277271 -0.0705268 0.02005363)
    Thelen2003Muscle glut_max1_l: optimal_force=1 max_isometric_force=573 optimal_fiber_length=0.134607
        tendon_slack_length=0.118492 pennation_angle_at_optimal=0.08726646 max_contraction_velocity=10
        FmaxTendonStrain=0.033 FmaxMuscleStrain=0.6 KshapeActive=0.5 KshapePassive=4 Af=0.3 Flen=1.8
        activation_time_constant=0.01 deactivation_time_constant=0.04
      PathPoint P1: pelvis (-0.1406347 0.0571678 -0.07474468)
      PathPoint P2: pelvis (-0.1519325 0.001120937 -0.0946054)
      PathPoint P3: femur_l (-0.05000247 -0.02196103 -0.04289052)
      PathPoint P4: femur_l (-0.03030784 -0.05012073 -0.05142486)
    Thelen2003Muscle glut_max2_l: optimal_force=1 max_isometric_force=819 optimal_fiber_length=0.1396042
        tendon_slack_length=0.1206104 pennation_angle_at_optimal=0 max_contraction_velocity=10 FmaxTendonStrain=0.033
        FmaxMuscleStrain=0.6 KshapeActive=0.5 KshapePassive=4 Af=0.3 Flen=1.8 activation_time_constant=0.01
        deactivation_time_constant=0.04
      PathPoint P1: pelvis (-0.1587583 0.01644041 -0.06011608)
      PathPoint P2: pelvis (-0.1619358 -0.04857395 -0.09759519)
      PathPoint P3: femur_l (-0.04661062 -0.04693284 -0.03205848)
      PathPoint P4: femur_l (-0.01706868 -0.08996937 -0.04584471)
    Thelen2003Muscle glut_max3_l: optimal_force=1 max_isometric_force=552 optimal_fiber_length=0.141641
        tendon_slack_length=0.1426246 pennation_angle_at_optimal=0.08726646 max_contraction_velocity=10
        FmaxTendonStrain=0.033 FmaxMuscleStrain=0.6 KshapeActive=0.5 KshapePassive=4 Af=0.3 Flen=1.8
        activation_time_constant=0.01 deactivation_time_constant=0.04
      PathPoint P1: pelvis (-0.1831193 -0.02933119 -0.00619313)
      PathPoint P2: pelvis (-0.1799418 -0.09826883 -0.04303158)
      PathPoint P3: femur_l (-0.03271496 -0.09218318 -0.01477097)
      PathPoint P4: femur_l (-0.006564875 -0.125656 -0.0449694)
    Thelen2003Muscle iliacus_l: optimal_force=1 max_isometric_force=1073 optimal_fiber_length=0.09948114
        tendon_slack_length=0.09948114 pennation_angle_at_optimal=0.1221731 max_contraction_velocity=10
        FmaxTendonStrain=0.033 FmaxMuscleStrain=0.6 KshapeActive=0.5 KshapePassive=4 Af=0.3 Flen=1.8
        activation_time_constant=0.01 deactivation_time_constant=0.04
      PathPoint P1: pelvis (-0.07932031 0.03409518 -0.09118851)
      PathPoint P2: pelvis (-0.03036297 -0.05137629 -0.08659705)
      ConditionalPathPoint P3: pelvis (-0.03389354 -0.07519621 -0.08713094)
          socket_coordinate=/jointset/hip_l/hip_flexion_l range=(-1.5708 0.785398)
      PathPoint P4: femur_l (0.001860048 -0.04808402 -0.006236632)
      PathPoint P5: femur_l (-0.02111702 -0.05499112 -0.01411448)
    Thelen2003Muscle psoas_l: optimal_force=1 max_isometric_force=1113 optimal_fiber_length=0.09857741
        tendon_slack_length=0.1577239 pennation_angle_at_optimal=0.1396263 max_contraction_velocity=10
        FmaxTendonStrain=0.033 FmaxMuscleStrain=0.6 KshapeActive=0.5 KshapePassive=4 Af=0.3 Flen=1.8
        activation_time_constant=0.01 deactivation_time_constant=0.04
      PathPoint P1: pelvis (-0.07614279 0.08285595 -0.03085887)
      PathPoint P2: pelvis (-0.02800925 -0.05324452 -0.08104459)
      ConditionalPathPoint P3: pelvis (-0.03389354 -0.07519621 -0.08713094)
          socket_coordinate=/jointset/hip_l/hip_flexion_l range=(-1.5708 0.785398)
      PathPoint P4: femur_l (0.001750633 -0.04489613 -0.004157754)
      PathPoint P5: femur_l (-0.02056994 -0.05286586 -0.01137912)
    Thelen2003Muscle quad_fem_l: optimal_force=1 max_isometric_force=381 optimal_fiber_length=0.05805904
        tendon_slack_length=0.02580402 pennation_angle_at_optimal=0 max_contraction_velocity=10 FmaxTendonStrain=0.033
        FmaxMuscleStrain=0.6 KshapeActive=0.5 KshapePassive=4 Af=0.3 Flen=1.8 activation_time_constant=0.01
        deactivation_time_constant=0.04
      PathPoint P1: pelvis (-0.134515 -0.1075166 -0.05552462)
      PathPoint P2: femur_l (-0.04168696 -0.03179036 -0.04004574)
    Thelen2003Muscle gem_l: optimal_force=1 max_isometric_force=164 optimal_fiber_length=0.02634983
        tendon_slack_length=0.04281847 pennation_angle_at_optimal=0 max_contraction_velocity=10 FmaxTendonStrain=0.033
        FmaxMuscleStrain=0.6 KshapeActive=0.5 KshapePassive=4 Af=0.3 Flen=1.8 activation_time_constant=0.01
        deactivation_time_constant=0.04
      PathPoint P1: pelvis (-0.1333381 -0.07659738 -0.07623957)
      PathPoint P2: femur_l (-0.01553687 -0.002922233 -0.04847066)
    Thelen2003Muscle peri_l: optimal_force=1 max_isometric_force=444 optimal_fiber_length=0.02705216
        tendon_slack_length=0.1196538 pennation_angle_at_optimal=0.1745329 max_contraction_velocity=10
        FmaxTendonStrain=0.033 FmaxMuscleStrain=0.6 KshapeActive=0.5 KshapePassive=4 Af=0.3 Flen=1.8
        activation_time_constant=0.01 deactivation_time_constant=0.04
      PathPoint P1: pelvis (-0.1642895 0.0002802343 -0.02509286)
      PathPoint P2: pelvis (-0.1403993 -0.02578156 -0.07015322)
      PathPoint P3: femur_l (-0.01619336 -0.003187891 -0.04781418)
    Thelen2003Muscle rect_fem_l: optimal_force=1 max_isometric_force=1169 optimal_fiber_length=0.1020152
        tendon_slack_length=0.2774097 pennation_angle_at_optimal=0.08726646 max_contraction_velocity=10
        FmaxTendonStrain=0.033 FmaxMuscleStrain=0.6 KshapeActive=0.5 KshapePassive=4 Af=0.3 Flen=1.8
        activation_time_constant=0.01 deactivation_time_constant=0.04
      PathPoint P1: pelvis (-0.03471735 -0.02905096 -0.1033612)
      ConditionalPathPoint P2: femur_l (0.03654447 -0.3568667 -0.002078877)
          socket_coordinate=/jointset/knee_l/knee_angle_l range=(-2.61799 -1.45997)
      MovingPathPoint P3: tibia_l socket_x_coordinate=/jointset/knee_l/knee_angle_l
          socket_y_coordinate=/jointset/knee_l/knee_angle_l socket_z_coordinate=/jointset/knee_l/knee_angle_l
        x_location: MultiplierFunction: scale=0.8795452
          SimmSpline: x=(-2.0944 -1.99997 -1.5708 -1.45752 -1.39626 -1.0472 -0.698132 -0.526391 -0.349066 -0.174533 0 0.00017453 0.00034907 0.0279253 0.0872665 0.174533 2.0944)
              y=(0.0155805 0.0179938 0.0275081 0.0296564 0.0307615 0.0365695 0.0422074 0.0450902 0.048391 0.0534299 0.0617576 0.0617669 0.0617762 0.0633083 0.066994 0.0733035 0.0573481)
        y_location: MultiplierFunction: scale=0.843622
          SimmSpline: x=(-2.0944 -1.99997 -1.5708 -1.45752 -1.39626 -1.0472 -0.698132 -0.526391 -0.349066 -0.174533 0 0.00017453 0.00034907 0.0279253 0.0872665 0.174533 2.0944)
              y=(0.0234116 0.0237613 0.0251141 0.0252795 0.0253146 0.0249184 0.0242373 0.0238447 0.0234197 0.0227644 0.020984 0.0209814 0.0209788 0.0205225 0.0191754 0.0159554 -0.0673774)
        z_location: MultiplierFunction: scale=0.8795452
          SimmSpline: x=(-2.0944 0.1745) y=(-0.0014 -0.0014)
    Thelen2003Muscle vas_med_l: optimal_force=1 max_isometric_force=1294 optimal_fiber_length=0.07990683
        tendon_slack_length=0.1131265 pennation_angle_at_optimal=0.08726646 max_contraction_velocity=10
        FmaxTendonStrain=0.033 FmaxMuscleStrain=0.6 KshapeActive=0.5 KshapePassive=4 Af=0.3 Flen=1.8
        activation_time_constant=0.01 deactivation_time_constant=0.04
      PathPoint P1: femur_l (0.01531804 -0.1858718 -0.02056994)
      PathPoint P2: femur_l (0.03895159 -0.2452019 -0.0009847313)
      ConditionalPathPoint P3: femur_l (0.0404834 -0.3584606 0.01367682)
          socket_coordinate=/jointset/knee_l/knee_angle_l range=(-2.61799 -1.21004)
      ConditionalPathPoint P4: femur_l (0.0299796 -0.376791 0.01433331) socket_coordinate=/jointset/knee_l/knee_angle_l
          range=(-2.61799 -1.78006)
      MovingPathPoint P5: tibia_l socket_x_coordinate=/jointset/knee_l/knee_angle_l
          socket_y_coordinate=/jointset/knee_l/knee_angle_l socket_z_coordinate=/jointset/knee_l/knee_angle_l
        x_location: MultiplierFunction: scale=0.8795452
          SimmSpline: x=(-2.0944 -1.99997 -1.5708 -1.45752 -1.39626 -1.0472 -0.698132 -0.526391 -0.349066 -0.174533 0 0.00017453 0.00034907 0.0279253 0.0872665 0.174533 2.0944)
              y=(0.00981097 0.0122243 0.0217371 0.0238851 0.0249902 0.0307959 0.0364187 0.0392871 0.0425654 0.0475764 0.0559586 0.0559681 0.0559776 0.0575419 0.0613368 0.0679503 0.0629332)
        y_location: MultiplierFunction: scale=0.843622
          SimmSpline: x=(-2.0944 -1.99997 -1.5708 -1.45752 -1.39626 -1.0472 -0.698132 -0.526391 -0.349066 -0.174533 0 0.00017453 0.00034907 0.0279253 0.0872665 0.174533 2.0944)
              y=(0.0224154 0.0227651 0.0241265 0.0242933 0.0243287 0.0239462 0.0233593 0.0230677 0.0228342 0.0226362 0.0217917 0.0217903 0.0217889 0.0215365 0.0206842 0.0183269 -0.0656205)
        z_location: MultiplierFunction: scale=0.8795452
          SimmSpline: x=(-2.0944 2.0944) y=(0.0146 0.0146)
    Thelen2003Muscle vas_int_l: optimal_force=1 max_isometric_force=1365 optimal_fiber_length=0.07761779
        tendon_slack_length=0.1213336 pennation_angle_at_optimal=0.05235988 max_contraction_velocity=10
        FmaxTendonStrain=0.033 FmaxMuscleStrain=0.6 KshapeActive=0.5 KshapePassive=4 Af=0.3 Flen=1.8
        activation_time_constant=0.01 deactivation_time_constant=0.04
      PathPoint P1: femur_l (0.03173023 -0.1703751 -0.03391852)
      PathPoint P2: femur_l (0.03665389 -0.1845435 -0.03118316)
      ConditionalPathPoint P3: femur_l (0.0375292 -0.3568667 -0.006017802)
          socket_coordinate=/jointset/knee_l/knee_angle_l range=(-2.61799 -1.42)
      MovingPathPoint P4: tibia_l socket_x_coordinate=/jointset/knee_l/knee_angle_l
          socket_y_coordinate=/jointset/knee_l/knee_angle_l socket_z_coordinate=/jointset/knee_l/knee_angle_l
        x_location: MultiplierFunction: scale=0.8795452
          SimmSpline: x=(-2.0944 -1.99997 -1.5708 -1.45752 -1.39626 -1.0472 -0.698132 -0.526391 -0.349066 -0.174533 0 0.00017453 0.00034907 0.0279253 0.0872665 0.174533 2.0944)
              y=(0.0082733 0.0106866 0.0202042 0.022353 0.0234583 0.0292715 0.0349465 0.037871 0.0412569 0.0465287 0.0554632 0.0554735 0.0554837 0.0571717 0.061272 0.0684368 0.0648818)
        y_location: MultiplierFunction: scale=0.843622
          SimmSpline: x=(-2.0944 -1.99997 -1.5708 -1.45752 -1.39626 -1.0472 -0.698132 -0.526391 -0.349066 -0.174533 0 0.00017453 0.00034907 0.0279253 0.0872665 0.174533 2.0944)
              y=(0.025599 0.0259487 0.0273124 0.0274796 0.0275151 0.0271363 0.0265737 0.0263073 0.0261187 0.0260129 0.0252923 0.0252911 0.0252898 0.0250526 0.0242191 0.0218288 -0.0685706)
        z_location: MultiplierFunction: scale=0.8795452
          SimmSpline: x=(-2.0944 2.0944) y=(-0.0018 -0.0018)
    Thelen2003Muscle vas_lat_l: optimal_force=1 max_isometric_force=1871 optimal_fiber_length=0.07524167
        tendon_slack_length=0.1406303 pennation_angle_at_optimal=0.08726646 max_contraction_velocity=10
        FmaxTendonStrain=0.033 FmaxMuscleStrain=0.6 KshapeActive=0.5 KshapePassive=4 Af=0.3 Flen=1.8
        activation_time_constant=0.01 deactivation_time_constant=0.04
      PathPoint P1: femur_l (0.0052519 -0.1641764 -0.03818569)
      PathPoint P2: femur_l (0.02943252 -0.2294396 -0.04475057)
      ConditionalPathPoint P3: femur_l (0.03949867 -0.3568667 -0.02242999)
          socket_coordinate=/jointset/knee_l/knee_angle_l range=(-2.61799 -1.21004)
      ConditionalPathPoint P4: femur_l (0.02768189 -0.3757284 -0.02013228)
          socket_coordinate=/jointset/knee_l/knee_angle_l range=(-2.61799 -1.92004)
      MovingPathPoint P5: tibia_l socket_x_coordinate=/jointset/knee_l/knee_angle_l
          socket_y_coordinate=/jointset/knee_l/knee_angle_l socket_z_coordinate=/jointset/knee_l/knee_angle_l
        x_location: MultiplierFunction: scale=0.8795452
          SimmSpline: x=(-2.0944 -1.99997 -1.5708 -1.45752 -1.39626 -1.0472 -0.698132 -0.526391 -0.349066 -0.174533 0 0.00017453 0.00034907 0.0279253 0.0872665 0.174533 2.0944)
              y=(0.0142897 0.016703 0.0262145 0.0283623 0.0294674 0.0352709 0.0408785 0.0437291 0.0469704 0.0518742 0.0599557 0.0599647 0.0599738 0.0614577 0.0650351 0.0711867 0.0583766)
        y_location: MultiplierFunction: scale=0.843622
          SimmSpline: x=(-2.0944 -1.99997 -1.5708 -1.45752 -1.39626 -1.0472 -0.698132 -0.526391 -0.349066 -0.174533 0 0.00017453 0.00034907 0.0279253 0.0872665 0.174533 2.0944)
              y=(0.0215318 0.0218815 0.0232362 0.0234019 0.0234371 0.0230439 0.0223842 0.0220151 0.0216359 0.0210971 0.0195864 0.0195842 0.019582 0.01919 0.018008 0.0151073 -0.0653421)
        z_location: MultiplierFunction: scale=0.8795452
          SimmSpline: x=(-2.0944 2.0944) y=(-0.0165 -0.0165)
    Thelen2003Muscle med_gas_l: optimal_force=1 max_isometric_force=1558 optimal_fiber_length=0.05087665
        tendon_slack_length=0.3306983 pennation_angle_at_optimal=0.296706 max_contraction_velocity=10
        FmaxTendonStrain=0.033 FmaxMuscleStrain=0.6 KshapeActive=0.5 KshapePassive=4 Af=0.3 Flen=1.8
        activation_time_constant=0.01 deactivation_time_constant=0.04
      PathPoint P1: femur_l (-0.02078877 -0.3479229 0.02571243)
      ConditionalPathPoint P2: femur_l (-0.03282438 -0.3561583 0.02822896)
          socket_coordinate=/jointset/knee_l/knee_angle_l range=(-0.785398 0.174533)
      PathPoint P3: calcn_l (0 0.02818004 0.003734414)
    Thelen2003Muscle lat_gas_l: optimal_force=1 max_isometric_force=683 optimal_fiber_length=0.05413906
        tendon_slack_length=0.3214507 pennation_angle_at_optimal=0.1396263 max_contraction_velocity=10
        FmaxTendonStrain=0.033 FmaxMuscleStrain=0.6 KshapeActive=0.5 KshapePassive=4 Af=0.3 Flen=1.8
        activation_time_constant=0.01 deactivation_time_constant=0.04
      PathPoint P1: femur_l (-0.02407121 -0.3494283 -0.02976077)
      ConditionalPathPoint P2: femur_l (-0.03282438 -0.3558041 -0.0299796)
          socket_coordinate=/jointset/knee_l/knee_angle_l range=(-0.785398 0.174533)
      PathPoint P3: calcn_l (0 0.02818004 0.003734414)
    Thelen2003Muscle soleus_l: optimal_force=1 max_isometric_force=3549 optimal_fiber_length=0.04196967
        tendon_slack_length=0.2098483 pennation_angle_at_optimal=0.4363323 max_contraction_velocity=10
        FmaxTendonStrain=0.033 FmaxMuscleStrain=0.6 KshapeActive=0.5 KshapePassive=4 Af=0.3 Flen=1.8
        activation_time_constant=0.01 deactivation_time_constant=0.04
      PathPoint P1: tibia_l (-0.002110908 -0.1293273 -0.006244771)
      PathPoint P2: calcn_l (0 0.02818004 0.003734414)
    Thelen2003Muscle tib_post_l: optimal_force=1 max_isometric_force=1588 optimal_fiber_length=0.02622073
        tendon_slack_length=0.2622073 pennation_angle_at_optimal=0.2094395 max_contraction_velocity=10
        FmaxTendonStrain=0.033 FmaxMuscleStrain=0.6 KshapeActive=0.5 KshapePassive=4 Af=0.3 Flen=1.8
        activation_time_constant=0.01 deactivation_time_constant=0.04
      PathPoint P1: tibia_l (-0.008267725 -0.1137202 -0.001671136)
      PathPoint P2: tibia_l (-0.01266545 -0.3417513 0.02014158)
      PathPoint P3: calcn_l (0.03679619 0.03036172 0.02015174)
      PathPoint P4: calcn_l (0.06812149 0.01445363 0.01979944)
    Thelen2003Muscle flex_dig_l: optimal_force=1 max_isometric_force=310 optimal_fiber_length=0.02881586
        tendon_slack_length=0.3390101 pennation_angle_at_optimal=0.1221731 max_contraction_velocity=10
        FmaxTendonStrain=0.033 FmaxMuscleStrain=0.6 KshapeActive=0.5 KshapePassive=4 Af=0.3 Flen=1.8
        activation_time_constant=0.01 deactivation_time_constant=0.04
      PathPoint P1: tibia_l (-0.007300225 -0.1726051 0.001583181)
      PathPoint P2: tibia_l (-0.013545 -0.3417513 0.01723909)
      PathPoint P3: calcn_l (0.03847276 0.02863455 0.01972898)
      PathPoint P4: calcn_l (0.06247411 0.01599899 0.01853115)
      PathPoint P5: calcn_l (0.1463024 -0.007363171 -0.008173434)
      PathPoint P6: toes_l (-0.001338752 -0.01036026 -0.0195251)
      PathPoint P7: toes_l (0.02008128 -0.00943049 -0.02855712)
      PathPoint P8: toes_l (0.03107314 -0.007969428 -0.03214336)
    Thelen2003Muscle flex_hal_l: optimal_force=1 max_isometric_force=322 optimal_fiber_length=0.03669888
        tendon_slack_length=0.3243157 pennation_angle_at_optimal=0.1745329 max_contraction_velocity=10
        FmaxTendonStrain=0.033 FmaxMuscleStrain=0.6 KshapeActive=0.5 KshapePassive=4 Af=0.3 Flen=1.8
        activation_time_constant=0.01 deactivation_time_constant=0.04
      PathPoint P1: tibia_l (-0.006948407 -0.1969014 -0.0214609)
      PathPoint P2: tibia_l (-0.01635954 -0.3441134 0.01530409)
      PathPoint P3: calcn_l (0.03300186 0.02508932 0.01698101)
      PathPoint P4: calcn_l (0.0915934 0.006181428 0.01803792)
      PathPoint P5: calcn_l (0.1523027 -0.004817877 0.01895391)
      PathPoint P6: toes_l (0.0109214 -0.008500723 0.03519831)
      PathPoint P7: toes_l (0.03959888 -0.01354803 0.02404111)
    Thelen2003Muscle tib_ant_l: optimal_force=1 max_isometric_force=905 optimal_fiber_length=0.08276001
        tendon_slack_length=0.1883212 pennation_angle_at_optimal=0.08726646 max_contraction_velocity=10
        FmaxTendonStrain=0.033 FmaxMuscleStrain=0.6 KshapeActive=0.5 KshapePassive=4 Af=0.3 Flen=1.8
        activation_time_constant=0.01 deactivation_time_constant=0.04
      PathPoint P1: tibia_l (0.01574386 -0.1370042 -0.01011477)
      PathPoint P2: tibia_l (0.02893704 -0.3333151 0.01556795)
      PathPoint P3: calcn_l (0.1028882 0.0161808 0.0214905)
    Thelen2003Muscle per_brev_l: optimal_force=1 max_isometric_force=435 optimal_fiber_length=0.04189057
        tendon_slack_length=0.1348876 pennation_angle_at_optimal=0.08726646 max_contraction_velocity=10
        FmaxTendonStrain=0.033 FmaxMuscleStrain=0.6 KshapeActive=0.5 KshapePassive=4 Af=0.3 Flen=1.8
        activation_time_constant=0.01 deactivation_time_constant=0.04
      PathPoint P1: tibia_l (-0.006156816 -0.2232224 -0.02858522)
      PathPoint P2: tibia_l (-0.01741499 -0.3529715 -0.02489113)
      PathPoint P3: tibia_l (-0.01266545 -0.3623357 -0.02541886)
      PathPoint P4: calcn_l (0.04156117 0.0245439 -0.01641733)
      PathPoint P5: calcn_l (0.05973867 0.01990783 -0.024168)
    Thelen2003Muscle per_long_l: optimal_force=1 max_isometric_force=943 optimal_fiber_length=0.04103431
        tendon_slack_length=0.288915 pennation_angle_at_optimal=0.1745329 max_contraction_velocity=10
        FmaxTendonStrain=0.033 FmaxMuscleStrain=0.6 KshapeActive=0.5 KshapePassive=4 Af=0.3 Flen=1.8
        activation_time_constant=0.01 deactivation_time_constant=0.04
      PathPoint P1: tibia_l (0.0004397726 -0.1322799 -0.03183954)
      PathPoint P2: tibia_l (-0.01820659 -0.3547431 -0.02515499)
      PathPoint P3: tibia_l (-0.01424863 -0.3643604 -0.02541886)
      PathPoint P4: calcn_l (0.03864924 0.02090777 -0.0155718)
      PathPoint P5: calcn_l (0.06009163 0.009635755 -0.02001082)
      PathPoint P6: calcn_l (0.07518071 0.006272331 -0.008314356)
      PathPoint P7: calcn_l (0.106153 0.007726784 0.01296476)
    Thelen2003Muscle per_tert_l: optimal_force=1 max_isometric_force=180 optimal_fiber_length=0.06603614
        tendon_slack_length=0.08359005 pennation_angle_at_optimal=0.2268928 max_contraction_velocity=10
        FmaxTendonStrain=0.033 FmaxMuscleStrain=0.6 KshapeActive=0.5 KshapePassive=4 Af=0.3 Flen=1.8
        activation_time_constant=0.01 deactivation_time_constant=0.04
      PathPoint P1: tibia_l (0.0008795452 -0.2365516 -0.02031749)
      PathPoint P2: tibia_l (0.02014158 -0.3432698 -0.01398477)
      PathPoint P3: calcn_l (0.07562191 0.02072596 -0.02106773)
    Thelen2003Muscle ext_dig_l: optimal_force=1 max_isometric_force=512 optimal_fiber_length=0.0860487
        tendon_slack_length=0.2910471 pennation_angle_at_optimal=0.1396263 max_contraction_velocity=10
        FmaxTendonStrain=0.033 FmaxMuscleStrain=0.6 KshapeActive=0.5 KshapePassive=4 Af=0.3 Flen=1.8
        activation_time_constant=0.01 deactivation_time_constant=0.04
      PathPoint P1: tibia_l (0.002814545 -0.1165042 -0.02427545)
      PathPoint P2: tibia_l (0.02541886 -0.3380393 -0.006332725)
      PathPoint P3: calcn_l (0.08135753 0.0352705 7.046064e-5)
      PathPoint P4: calcn_l (0.1425963 0.004999684 -0.009159883)
      PathPoint P5: toes_l (0.0002113819 0.006242719 -0.02032204)
      PathPoint P6: toes_l (0.03121406 -0.0005312952 -0.03320595)
    Thelen2003Muscle ext_hal_l: optimal_force=1 max_isometric_force=162 optimal_fiber_length=0.09323868
        tendon_slack_length=0.2561964 pennation_angle_at_optimal=0.1047198 max_contraction_velocity=10
        FmaxTendonStrain=0.033 FmaxMuscleStrain=0.6 KshapeActive=0.5 KshapePassive=4 Af=0.3 Flen=1.8
        activation_time_constant=0.01 deactivation_time_constant=0.04
      PathPoint P1: tibia_l (0.001055454 -0.149068 -0.02005363)
      PathPoint P2: tibia_l (0.02867317 -0.3361834 0.007476134)
      PathPoint P3: calcn_l (0.08559307 0.0353614 0.0148672)
      PathPoint P4: calcn_l (0.1140947 0.02808913 0.01810838)
      PathPoint P5: calcn_l (0.1530086 0.01263557 0.01972898)
      PathPoint P6: toes_l (0.02099727 0.005445776 0.03254183)
      PathPoint P7: toes_l (0.03966934 0.004516009 0.02470523)
    Thelen2003Muscle ercspn_r: max_isometric_force=2500 optimal_fiber_length=0.08368662 tendon_slack_length=0.02092165
        pennation_angle_at_optimal=0
      PathPoint: pelvis (-0.1647603 0.04100762 0.04655526)
      PathPoint pathpoint_0: thorax (-0.09708493 -0.297638 0.01932079)
    Thelen2003Muscle ercspn_l: max_isometric_force=2500 optimal_fiber_length=0.08401883 tendon_slack_length=0.02100471
        pennation_angle_at_optimal=0
      PathPoint: pelvis (-0.1647603 0.04100762 -0.04655526)
      PathPoint pathpoint_0: thorax (-0.09708493 -0.297638 -0.01932079)
    Thelen2003Muscle intobl_r: max_isometric_force=900 optimal_fiber_length=0.08075751 tendon_slack_length=0.08075751
        pennation_angle_at_optimal=0
      PathPoint: pelvis (-0.04707437 0.06538801 0.1235423)
      PathPoint pathpoint_0: thorax (0.06365171 -0.242212 0.01202538)
    Thelen2003Muscle intobl_l: max_isometric_force=900 optimal_fiber_length=0.08128856 tendon_slack_length=0.08128856
        pennation_angle_at_optimal=0
      PathPoint: pelvis (-0.04707437 0.06538801 -0.1235423)
      PathPoint pathpoint_0: thorax (0.06365171 -0.242212 -0.01202538)
    Thelen2003Muscle extobl_r: max_isometric_force=900 optimal_fiber_length=0.08930349 tendon_slack_length=0.1041874
        pennation_angle_at_optimal=0
      PathPoint: pelvis (-0.03530577 -0.05940968 0.01067781)
      PathPoint pathpoint_0: thorax (0.05722224 -0.297638 0.08818616)
    Thelen2003Muscle extobl_l: max_isometric_force=900 optimal_fiber_length=0.08910128 tendon_slack_length=0.1039515
        pennation_angle_at_optimal=0
      PathPoint: pelvis (-0.03530577 -0.05940968 -0.01067781)
      PathPoint pathpoint_0: thorax (0.05722224 -0.297638 -0.08818616)
    ObjectGroup R_hip_abd: members=(glut_max1_r glut_med1_r glut_med2_r glut_med3_r glut_min1_r glut_min2_r glut_min3_r peri_r sar_r tfl_r)
    ObjectGroup R_hip_flex: members=(add_brev_r add_long_r glut_med1_r glut_min1_r grac_r iliacus_r pect_r psoas_r rect_fem_r sar_r tfl_r)
    ObjectGroup R_hip_inrot: members=(glut_med1_r glut_min1_r iliacus_r psoas_r tfl_r)
    ObjectGroup R_hip_exrot: members=(gem_r glut_med3_r glut_min3_r peri_r quad_fem_r)
    ObjectGroup R_hip_ext: members=(add_long_r add_mag1_r add_mag2_r add_mag3_r bifemlh_r glut_max1_r glut_max2_r glut_max3_r glut_med3_r glut_min3_r semimem_r semiten_r)
    ObjectGroup R_hip_add: members=(add_brev_r add_long_r add_mag1_r add_mag2_r add_mag3_r bifemlh_r grac_r pect_r semimem_r semiten_r)
    ObjectGroup R_knee_bend: members=(bifemlh_r bifemsh_r grac_r lat_gas_r med_gas_r sar_r semimem_r semiten_r)
    ObjectGroup R_knee_ext: members=(rect_fem_r vas_int_r vas_lat_r vas_med_r)
    ObjectGroup R_ankle_pf: members=(flex_dig_r flex_hal_r lat_gas_r med_gas_r per_brev_r per_long_r soleus_r tib_post_r)
    ObjectGroup R_inverter: members=(ext_hal_r flex_dig_r flex_hal_r tib_ant_r tib_post_r)
    ObjectGroup R_ankle_df: members=(ext_dig_r ext_hal_r per_tert_r tib_ant_r)
    ObjectGroup R_everter: members=(ext_dig_r per_brev_r per_long_r per_tert_r)
    ObjectGroup L_hip_abd: members=(glut_max1_l glut_med1_l glut_med2_l glut_med3_l glut_min1_l glut_min2_l glut_min3_l peri_l sar_l tfl_l)
    ObjectGroup L_hip_flex: members=(add_brev_l add_long_l glut_med1_l glut_min1_l grac_l iliacus_l pect_l psoas_l rect_fem_l sar_l tfl_l)
    ObjectGroup L_hip_inrot: members=(glut_med1_l glut_min1_l iliacus_l psoas_l tfl_l)
    ObjectGroup L_hip_exrot: members=(gem_l glut_med3_l glut_min3_l peri_l quad_fem_l)
    ObjectGroup L_hip_ext: members=(add_long_l add_mag1_l add_mag2_l add_mag3_l bifemlh_l glut_max1_l glut_max2_l glut_max3_l glut_med3_l glut_min3_l semimem_l semiten_l)
    ObjectGroup L_hip_add: members=(add_brev_l add_long_l add_mag1_l add_mag2_l add_mag3_l bifemlh_l grac_l pect_l semimem_l semiten_l)
    ObjectGroup L_knee_bend: members=(bifemlh_l bifemsh_l grac_l lat_gas_l med_gas_l sar_l semimem_l semiten_l)
    ObjectGroup L_knee_ext: members=(rect_fem_l vas_int_l vas_lat_l vas_med_l)
    ObjectGroup L_ankle_pf: members=(flex_dig_l flex_hal_l lat_gas_l med_gas_l per_brev_l per_long_l soleus_l tib_post_l)
    ObjectGroup L_inverter: members=(ext_hal_l flex_dig_l flex_hal_l tib_ant_l tib_post_l)
    ObjectGroup L_ankle_df: members=(ext_dig_l ext_hal_l per_tert_l tib_ant_l)
    ObjectGroup L_everter: members=(ext_dig_l per_brev_l per_long_l per_tert_l)
    ObjectGroup back_ext: members=(ercspn_l ercspn_r)
    ObjectGroup back_rlb: members=(ercspn_r extobl_r intobl_r)
    ObjectGroup back_introt: members=(ercspn_r extobl_l intobl_r)
    ObjectGroup back_llb: members=(ercspn_l extobl_l intobl_l)
    ObjectGroup back_extrot: members=(ercspn_l extobl_r intobl_l)
    ObjectGroup back_flex: members=(extobl_l extobl_r intobl_l intobl_r)
  MarkerSet:
    Marker C7: head_neck (-0.02926394 0.01234218 0.001828807) fixed=true
    Marker T8: thoracic8 (-0.05352154 0.009706704 -1.244033e-10) fixed=true
    Marker T12: thoracic12 (-0.05481538 0.01597627 2.30924e-10) fixed=true
    Marker RASI: pelvis (0.007929368 -0.008083735 0.132148) fixed=true
    Marker RPSI: pelvis (-0.2054055 0.06847087 0.0605181) fixed=true
    Marker LPSI: pelvis (-0.2054055 0.06847087 -0.0605181) fixed=true
    Marker LASI: pelvis (0.008269589 -0.002959928 -0.1280195) fixed=true
    Marker RHIPJ: pelvis (-0.09310827 -0.08163766 0.07063915) fixed=true
    Marker LHIPJ: pelvis (-0.09310827 -0.08172583 -0.07132376) fixed=true
    Marker MHIPJ: pelvis (-0.09310827 -0.08168174 -0.0003423054) fixed=true
    Marker Spine1: lumbar4 (0.007532329 0.0114008 -0.003872694)
    Marker LSHO: scapula_l (-0.01053779 0.007395597 0.006435802) fixed=true
    Marker RSHO: scapula (-0.01053779 0.007395597 -0.006518861) fixed=true
    Marker RCLAV: clavicle (0.008707288 -0.007280796 0.04650216)
    Marker LCLAV: clavicle_l (0.008383478 -0.004452504 -0.04906428)
    Marker CLAV: thorax (0.01630461 -0.003744785 0) fixed=true
    Marker STRN: thorax (0.1056824 -0.1946516 -0.0021166)
    Marker RELB: humerus (-0.0009367161 -0.3264538 0.03385371) fixed=true
    Marker RELBIN: humerus (0.0077063 -0.3373504 -0.05867307) fixed=true
    Marker ROWR: ulna (-0.01364278 -0.2621062 0.0410988) fixed=true
    Marker T10: thoracic10 (-0.05407866 0.01037048 2.19432e-10) fixed=true
    Marker RIWR: radius (0.04778417 -0.248671 0.02412285) fixed=true
    Marker RWRIST: radius (0.01428959 -0.256747 0.02119305)
    Marker MPSI: pelvis (-0.2027916 0.06848608 -0.0002600597)
    Marker MASI: pelvis (0.008099479 -0.005521832 0.002064242) fixed=true
    Marker RELC: humerus (0.009184764 -0.3348561 -0.01327768)
    Marker LELB: humerus_l (-0.0001731079 -0.3230622 -0.03364482) fixed=true
    Marker LELBIN: humerus_l (0.004644613 -0.3347435 0.05804618) fixed=true
    Marker LOWR: ulna_l (-0.01291851 -0.2645058 -0.03891685) fixed=true
    Marker LIWR: radius_l (0.04524728 -0.2509484 -0.02284211) fixed=true
    Marker LWRIST: radius_l (0.01406048 -0.2567806 -0.02091227)
    Marker LELC: humerus_l (0.006585372 -0.335854 0.01497729)
    Marker CENTER: pelvis (-0.09865299 0.03147452 0.001032121) fixed=true
    Marker ROOT: pelvis (-0.07325813 -0.001094729 0.002286234)
    Marker Spine2: thoracic11 (0.06493317 -0.02441023 -0.006857521)
    Marker Spine3: thoracic9 (0.08728131 -0.005599882 -0.004236151)
    Marker NECK: head_neck (0.02850204 -0.007479532 0.009863738)
    Marker LCOL: scapula_l (-0.04612997 -0.06797508 0.06726024)
    Marker RCOL: scapula (-0.05098513 -0.06994365 -0.06605701)
    Marker LSHOULDER: humerus_l (-0.02436474 -0.08004959 0.01434769)
    Marker RSHOULDER: humerus (-0.0147387 -0.07150634 -0.01898593)
    Marker Virtual_LWRIST: radius_l (0.01599761 -0.2514227 -0.02253809) fixed=true
    Marker Virtual_RWRIST: radius (0.01689455 -0.2491413 0.02380174) fixed=true
    Marker Virtual_RELC: humerus (0.003384792 -0.3319021 -0.01240968) fixed=true
    Marker Virtual_LELC: humerus_l (0.002235753 -0.3289029 0.01220068) fixed=true
    Marker Tracking_L5: lumbar5 (-0.05812558 -0.007427245 -0.0005079822)
    Marker Tracking_L4: lumbar4 (-0.06514623 0.006128395 -0.00017721)
    Marker Tracking_L3: lumbar3 (-0.06239398 0.01592851 -0.0004751265)
    Marker Tracking_L2: lumbar2 (-0.05968312 0.01820983 -0.000477969)
    Marker Tracking_L1: lumbar1 (-0.05723725 0.02110707 -0.0007533978)
    Marker Tracking_T11: thoracic11 (-0.05423699 0.01146544 -0.001149655)
    Marker Tracking_T9: thoracic9 (-0.05478371 0.01614898 0.0001279349)
    Marker Tracking_T7: thoracic7 (-0.05555032 0.008633625 0.001180387)
    Marker Tracking_T6: thoracic6 (-0.05487206 0.01040805 0.001160015)
    Marker Tracking_T5: thoracic5 (-0.05324531 0.007012581 0.0005498806)
    Marker Tracking_T4: thoracic4 (-0.05140604 0.01491195 0.0009382068)
    Marker Tracking_T3: thoracic3 (-0.04960115 0.00876656 0.001414085)
    Marker Tracking_T2: thoracic2 (-0.0465963 0.002918108 0.002089169)
    Marker T1: thoracic1 (-0.0433519 0.003475125 -4.986074e-18) fixed=true
    Marker RKNE: tibia_r (0.008896163 0.008307062 0.04485644) fixed=true
    Marker RKNI: tibia_r (0.01272188 0.002279064 -0.06893901) fixed=true
    Marker LKNE: tibia_l (0.009273347 -0.0001992571 -0.04211178) fixed=true
    Marker LKNI: tibia_l (0.01303239 -0.005008879 0.06870294) fixed=true
    Marker Virtual_LKJC: femur_l (0.007323172 -0.3871603 0.007919172) fixed=true
    Marker Virtual_RKJC: femur_r (0.007568711 -0.3818542 -0.006323157) fixed=true
    Marker LKJC: tibia_l (0.005016723 0.005109808 0.003775341)
    Marker RKJC: tibia_r (0.005935719 -0.001172302 -0.0002798007)
    Marker LANK: talus_l (0.001178991 0.009519838 -0.03737637) fixed=true
    Marker RANK: talus_r (0.003221619 0.004260671 0.03579988) fixed=true
    Marker LANI: talus_l (-0.005628036 0.02869214 0.02809106) fixed=true
    Marker RANI: talus_r (-0.006852822 0.02333466 -0.02711757) fixed=true
    Marker Virtual_LAJC: tibia_l (-0.001362772 -0.4189777 -0.00767053) fixed=true
    Marker Virtual_RAJC: tibia_r (0.0006530541 -0.4098064 0.007394748) fixed=true
    Marker LAJC: tibia_l (0.007348943 -0.420434 0.008523677)
    Marker RAJC: tibia_r (0.006200017 -0.4190413 -0.0106121)
    Marker LFOOT: toes_l (-0.0006588688 0.006016251 -0.01404537) fixed=true
    Marker RFOOT: toes_r (0.002341775 0.003480822 0.01900187) fixed=true
    Marker LHEE: calcn_l (-0.01704194 -0.0004293483 0.005709344) fixed=true
    Marker RHEE: calcn_r (-0.01675035 -0.01247308 -0.005092697) fixed=true
    Marker LMT5: toes_l (-0.01069272 0.02160355 -0.06670777) fixed=true
    Marker RMT5: toes_r (-0.01129992 0.01913845 0.05909611) fixed=true
    Marker RMT1: calcn_r (0.1678035 0.01077505 -0.02843075) fixed=true
    Marker LMT1: calcn_l (0.1634572 0.00933441 0.02690314) fixed=true
    Marker RTOE: toes_r (0.04592978 0.00836234 -0.04382164) fixed=true
    Marker LTOE: toes_l (0.04346188 0.009439429 0.04946597) fixed=true
    Marker LBHD: skull (-0.07565161 0.1114106 -0.04643608) fixed=true
    Marker RFHD: skull (0.05732001 0.111863 0.05536483) fixed=true
    Marker RBHD: skull (-0.07430052 0.1115673 0.04643613) fixed=true
    Marker LFHD: skull (0.0594844 0.1121197 -0.05522105) fixed=true
    Marker HEAD: skull (0.0400259 -0.05472435 9.546718e-5)
    Marker Virtual_Ground_RAJC: calcn_r (0.03817636 -0.02942566 -0.008828299) fixed=true
    Marker Virtual_Ground_LAJC: calcn_l (0.03718757 -0.02549135 0.008353937) fixed=true
    Marker Virtual_Ground_RHEE: calcn_r (-0.01692849 -0.03321578 -0.005390517) fixed=true
    Marker Virtual_Ground_LHEE: calcn_l (-0.01648999 -0.02877473 0.005100871) fixed=true
    Marker Virtual_Ground_RFOOT: calcn_r (0.1749633 -0.01574023 0.01112781) fixed=true
    Marker Virtual_Ground_LFOOT: calcn_l (0.1704317 -0.01363568 -0.01052992) fixed=true
    Marker Virtual_Ground_LTOE: toes_l (0.03847715 -0.01621672 0.03981593) fixed=true
    Marker Virtual_Ground_RTOE: toes_r (0.040662 -0.01436631 -0.03527272) fixed=true
    Marker Virtual_Ground_RMT1: calcn_r (0.1678034 -0.0157393 -0.02843081) fixed=true
    Marker Virtual_Ground_RMT5: toes_r (-0.01129992 -0.01436631 0.05909611) fixed=true
    Marker Virtual_Ground_LMT1: calcn_l (0.1634572 -0.0136355 0.02690314) fixed=true
    Marker Virtual_Ground_LMT5: toes_l (-0.01069275 -0.01621672 -0.06670783) fixed=true
    Marker right_thumb1: trapezium (0.01145967 -0.01109378 -0.0001818951) fixed=true
    Marker right_thumb2: firstmc (0.02335572 -0.02318949 -0.01419145) fixed=true
    Marker right_thumb3: proximal_thumb (0.01322557 -0.02740118 -0.01403964) fixed=true
    Marker rthumb: distal_thumb (0.01121273 -0.03475654 -0.01621649) fixed=true
    Marker right_index1: secondmc (0.01088542 -0.03481674 0.004260845) fixed=true
    Marker right_index2: 2proxph (0.008716574 -0.03455455 0.00426419) fixed=true
    Marker right_index3: 2midph (0.003798125 -0.0222353 -0.004531405) fixed=true
    Marker rindex: 2distph (-0.001461648 -0.02464288 -0.006092367) fixed=true
    Marker right_middle1: thirdmc (0.0055889 -0.04301048 0.004768889) fixed=true
    Marker right_middle2: 3proxph (0.004055409 -0.04382495 0.005800565) fixed=true
    Marker right_middle3: 3midph (0.001798275 -0.03314091 0.001831837) fixed=true
    Marker rmiddle: 3distph (-0.003124802 -0.03557071 -0.001791307) fixed=true
    Marker right_ring1: fourthmc (-0.00636097 -0.03142451 -0.001825088) fixed=true
    Marker right_ring2: 4proxph (-0.003761645 -0.03224023 0.0023788) fixed=true
    Marker right_ring3: 4midph (-0.002571693 -0.02548249 -0.001031674) fixed=true
    Marker rring: 4distph (-0.002765006 -0.02356552 -0.0006397526) fixed=true
    Marker right_pinky1: fifthmc (-0.01207698 -0.02933245 0.001988454) fixed=true
    Marker right_pinky2: 5proxph (-0.006823954 -0.02309215 0.0004173133) fixed=true
    Marker right_pinky3: 5midph (-0.005040324 -0.03142933 -0.003070568)
    Marker rpinky: 5distph (0.0009772468 -0.02795388 -0.003142647) fixed=true
    Marker left_thumb1: trapezium_l (0.007182653 -0.01129606 0.001917602) fixed=true
    Marker left_thumb2: firstmc_l (0.02083295 -0.02294551 0.013311) fixed=true
    Marker left_thumb3: proximal_thumb_l (0.01337999 -0.02714555 0.01042383) fixed=true
    Marker lthumb: distal_thumb_l (0.01264357 -0.03718678 0.0135218) fixed=true
    Marker left_index1: secondmc_l (0.01275151 -0.03366224 -0.004244531) fixed=true
    Marker left_index2: 2proxph_l (0.00982295 -0.03339321 -0.004151134) fixed=true
    Marker left_index3: 2midph_l (0.001778704 -0.02225693 0.002890803) fixed=true
    Marker lindex: 2distph_l (0.001465389 -0.0248042 0.0009417613) fixed=true
    Marker left_middle1: thirdmc_l (0.003643413 -0.04027168 -0.004324396) fixed=true
    Marker left_middle2: 3proxph_l (0.001582958 -0.04142139 -0.005419853) fixed=true
    Marker left_middle3: 3midph_l (0.001477704 -0.03121757 -0.001714853) fixed=true
    Marker lmiddle: 3distph_l (0.0006453938 -0.03350547 -0.001917898) fixed=true
    Marker left_ring1: fourthmc_l (-0.006694482 -0.03259425 0.0004798201) fixed=true
    Marker left_ring2: 4proxph_l (-0.00401 -0.03436883 -0.002535855) fixed=true
    Marker left_ring3: 4midph_l (-0.002556536 -0.0253323 0.001025593) fixed=true
    Marker lring: 4distph_l (-0.002777363 -0.02367083 0.0006426116) fixed=true
    Marker left_pinky1: fifthmc_l (-0.01152905 -0.02738127 0.002397576) fixed=true
    Marker left_pinky2: 5proxph_l (-0.004621804 -0.0219352 0.001683091) fixed=true
    Marker left_pinky3: 5midph_l (-0.002991058 -0.03165408 0.003789821)
    Marker lpinky: 5distph_l (0.003789568 -0.0261923 0.002456537) fixed=true
