# OpenSim document version 40000
ScaleTool scale:
  mass: 91.06725
  height: 1762.187
  age: 99
  GenericModelMaker:
    model_file: full_body.osim
  ModelScaler:
    apply: true
    scaling_order: manualScale measurements
    marker_file: BMLmovi/Subject_11_F_MoSh/static.trc
    time_range: 0 0.5
    preserve_mass_distribution: true
    output_model_file: BMLmovi/Subject_11_F_MoSh/scale.osim
    MeasurementSet:
      Measurement pelvisX: apply=true
        MarkerPair: markers=(MPSI MASI)
        BodyScale pelvis: axes=X
      Measurement pelvisY: apply=true
        MarkerPair: markers=(MHIPJ CENTER)
        BodyScale pelvis: axes=Y
      Measurement pelvisZ: apply=true
        MarkerPair: markers=(RASI LASI)
        MarkerPair: markers=(RPSI LPSI)
        BodyScale pelvis: axes=Z
      Measurement Torso_Y_L5L1: apply=true
        MarkerPair: markers=(MPSI T12)
        BodyScale lumbar5: axes=Y
        BodyScale lumbar4: axes=Y
        BodyScale lumbar3: axes=Y
        BodyScale lumbar2: axes=Y
        BodyScale lumbar1: axes=Y
        BodyScale thoracic12: axes=Y
      Measurement Torso_Y_T12T11: apply=true
        MarkerPair: markers=(T12 T10)
        BodyScale thoracic11: axes=Y
        BodyScale thoracic10: axes=Y
      Measurement Torso_Y_T10T9: apply=true
        MarkerPair: markers=(T10 T8)
        BodyScale thoracic9: axes=Y
        BodyScale thoracic8: axes=Y
      Measurement Torso_Y_T8T1: apply=true
        MarkerPair: markers=(T8 C7)
        BodyScale thoracic7: axes=Y
        BodyScale thoracic6: axes=Y
        BodyScale thoracic5: axes=Y
        BodyScale thoracic4: axes=Y
        BodyScale thoracic3: axes=Y
        BodyScale thoracic2: axes=Y
        BodyScale thoracic1: axes=Y
      Measurement NeckY: apply=true
        MarkerPair: markers=(C7 HEAD)
        BodyScale head_neck: axes=Y
        BodyScale cerv6: axes=Y
        BodyScale cerv5: axes=Y
        BodyScale cerv4: axes=Y
        BodyScale cerv3: axes=Y
        BodyScale cerv2: axes=Y
        BodyScale cerv1: axes=Y
      Measurement SkullY: apply=true
        MarkerPair: markers=(HEAD RFHD)
        MarkerPair: markers=(HEAD RBHD)
        MarkerPair: markers=(HEAD LFHD)
        MarkerPair: markers=(HEAD LBHD)
        BodyScale skull: axes=Y
        BodyScale jaw: axes=Y
      Measurement TorsoZ: apply=true
        MarkerPair: markers=(RPSI LPSI)
        BodyScale lumbar5: axes=Z
        BodyScale lumbar4: axes=Z
        BodyScale lumbar3: axes=Z
        BodyScale lumbar2: axes=Z
        BodyScale lumbar1: axes=Z
        BodyScale thoracic12: axes=Z
        BodyScale thoracic11: axes=Z
        BodyScale thoracic10: axes=Z
        BodyScale thoracic9: axes=Z
        BodyScale thoracic8: axes=Z
        BodyScale thoracic7: axes=Z
        BodyScale thoracic6: axes=Z
        BodyScale thoracic5: axes=Z
        BodyScale thoracic4: axes=Z
        BodyScale thoracic3: axes=Z
        BodyScale thoracic2: axes=Z
        BodyScale thoracic1: axes=Z
        BodyScale head_neck: axes=Z
        BodyScale cerv6: axes=Z
        BodyScale cerv5: axes=Z
        BodyScale cerv4: axes=Z
        BodyScale cerv3: axes=Z
        BodyScale cerv2: axes=Z
        BodyScale cerv1: axes=Z
      Measurement TorsoX: apply=true
        MarkerPair: markers=(MPSI CENTER)
        BodyScale lumbar5: axes=X
        BodyScale lumbar4: axes=X
        BodyScale lumbar3: axes=X
        BodyScale lumbar2: axes=X
        BodyScale lumbar1: axes=X
        BodyScale thoracic12: axes=X
        BodyScale thoracic11: axes=X
        BodyScale thoracic10: axes=X
        BodyScale thoracic9: axes=X
        BodyScale thoracic8: axes=X
        BodyScale thoracic7: axes=X
        BodyScale thoracic6: axes=X
        BodyScale thoracic5: axes=X
        BodyScale thoracic4: axes=X
        BodyScale thoracic3: axes=X
        BodyScale thoracic2: axes=X
        BodyScale thoracic1: axes=X
      Measurement cerveX: apply=true
        MarkerPair: markers=(CLAV C7)
        BodyScale head_neck: axes=X
        BodyScale cerv6: axes=X
        BodyScale cerv5: axes=X
        BodyScale cerv4: axes=X
        BodyScale cerv3: axes=X
        BodyScale cerv2: axes=X
        BodyScale cerv1: axes=X
      Measurement SkullX: apply=true
        MarkerPair: markers=(LBHD LFHD)
        MarkerPair: markers=(RBHD RFHD)
        BodyScale skull: axes=X
        BodyScale jaw: axes=X
      Measurement SkullZ: apply=true
        MarkerPair: markers=(LBHD RBHD)
        MarkerPair: markers=(LFHD RFHD)
        BodyScale skull: axes=Z
        BodyScale jaw: axes=Z
      Measurement femurY: apply=true
        MarkerPair: markers=(RHIPJ Virtual_RKJC)
        BodyScale femur_r: axes=Y
      Measurement femurY_l: apply=true
        MarkerPair: markers=(LHIPJ Virtual_LKJC)
        BodyScale femur_l: axes=Y
      Measurement femurXZ: apply=true
        MarkerPair: markers=(RKNI RKNE)
        BodyScale femur_r: axes=(X Z)
      Measurement femurXZ_l: apply=true
        MarkerPair: markers=(LKNE LKNI)
        BodyScale femur_l: axes=(X Z)
      Measurement tibiaY: apply=true
        MarkerPair: markers=(RKJC Virtual_RAJC)
        BodyScale tibia_r: axes=Y
        BodyScale talus_r: axes=Y
      Measurement tibiaY_l: apply=true
        MarkerPair: markers=(LKJC Virtual_LAJC)
        BodyScale tibia_l: axes=Y
        BodyScale talus_l: axes=Y
      Measurement tibiaXZ: apply=true
        MarkerPair: markers=(RANI RANK)
        BodyScale tibia_r: axes=(X Z)
        BodyScale talus_r: axes=(X Z)
      Measurement tibiaXZ_l: apply=true
        MarkerPair: markers=(LANK LANI)
        BodyScale tibia_l: axes=(X Z)
        BodyScale talus_l: axes=(X Z)
      Measurement calcnX: apply=true
        MarkerPair: markers=(Virtual_Ground_RHEE Virtual_Ground_RFOOT)
        BodyScale calcn_r: axes=X
      Measurement footY: apply=true
        MarkerPair: markers=(Virtual_Ground_RAJC Virtual_RAJC)
        BodyScale calcn_r: axes=Y
        BodyScale toes_r: axes=Y
      Measurement calcnZ: apply=true
        MarkerPair: markers=(Virtual_Ground_RMT1 Virtual_Ground_RMT5)
        BodyScale calcn_r: axes=Z
      Measurement calcnX_l: apply=true
        MarkerPair: markers=(Virtual_Ground_LHEE Virtual_Ground_LFOOT)
        BodyScale calcn_l: axes=X
      Measurement footY_l: apply=true
        MarkerPair: markers=(Virtual_Ground_LAJC Virtual_LAJC)
        BodyScale calcn_l: axes=Y
        BodyScale toes_l: axes=Y
      Measurement calcnZ_l: apply=true
        MarkerPair: markers=(Virtual_Ground_LMT1 Virtual_Ground_LMT5)
        BodyScale calcn_l: axes=Z
      Measurement toesX: apply=true
        MarkerPair: markers=(Virtual_Ground_RMT5 Virtual_Ground_RMT1)
        BodyScale toes_r: axes=X
      Measurement toesX_l: apply=true
        MarkerPair: markers=(Virtual_Ground_LMT1 Virtual_Ground_LMT5)
        BodyScale toes_l: axes=X
      Measurement toesYZ: apply=true
        MarkerPair: markers=(Virtual_Ground_RFOOT Virtual_Ground_RTOE)
        BodyScale toes_r: axes=(Y Z)
      Measurement toesYZ_l: apply=true
        MarkerPair: markers=(Virtual_Ground_LFOOT Virtual_Ground_LTOE)
        BodyScale toes_l: axes=(Y Z)
      Measurement ribsX: apply=true
        MarkerPair: markers=(CLAV C7)
        BodyScale thorax: axes=X
      Measurement ribsY: apply=true
        MarkerPair: markers=(T10 C7)
        BodyScale thorax: axes=Y
      Measurement ribsZ: apply=true
        MarkerPair: markers=(RSHO LSHO)
        BodyScale thorax: axes=Z
      Measurement calvY: apply=true
        MarkerPair: markers=(C7 CLAV)
        BodyScale clavicle: axes=Y
        BodyScale clavphant: axes=Y
        BodyScale clavicle_l: axes=Y
        BodyScale clavphant_l: axes=Y
      Measurement scapulaY: apply=true
        MarkerPair: markers=(C7 T10)
        BodyScale scapula: axes=Y
        BodyScale scapphant: axes=Y
        BodyScale humphant: axes=Y
        BodyScale humphant1: axes=Y
        BodyScale scapula_l: axes=Y
        BodyScale scapphant_l: axes=Y
        BodyScale humphant_l: axes=Y
        BodyScale humphant1_l: axes=Y
      Measurement calvX: apply=true
        MarkerPair: markers=(C7 CLAV)
        MarkerPair: markers=(RSHO CLAV)
        BodyScale clavicle: axes=X
        BodyScale clavphant: axes=X
      Measurement calv_l_X: apply=true
        MarkerPair: markers=(C7 CLAV)
        MarkerPair: markers=(LSHO CLAV)
        BodyScale clavicle_l: axes=X
        BodyScale clavphant_l: axes=X
      Measurement scapulaX: apply=true
        MarkerPair: markers=(STRN T10)
        BodyScale scapula: axes=X
        BodyScale scapphant: axes=X
        BodyScale humphant: axes=X
        BodyScale humphant1: axes=X
      Measurement scapula_l_X: apply=true
        MarkerPair: markers=(STRN T10)
        BodyScale scapula_l: axes=X
        BodyScale scapphant_l: axes=X
        BodyScale humphant_l: axes=X
        BodyScale humphant1_l: axes=X
      Measurement calvZ: apply=true
        MarkerPair: markers=(C7 RSHO)
        BodyScale clavicle: axes=Z
        BodyScale clavphant: axes=Z
        BodyScale scapula: axes=Z
        BodyScale scapphant: axes=Z
        BodyScale humphant: axes=Z
        BodyScale humphant1: axes=Z
      Measurement calv_l_Z: apply=true
        MarkerPair: markers=(LSHO C7)
        BodyScale clavicle_l: axes=Z
        BodyScale clavphant_l: axes=Z
        BodyScale scapula_l: axes=Z
        BodyScale scapphant_l: axes=Z
        BodyScale humphant_l: axes=Z
        BodyScale humphant1_l: axes=Z
      Measurement ArmY: apply=true
        MarkerPair: markers=(Virtual_RELC RSHO)
        BodyScale humerus: axes=Y
      Measurement Arm_l_Y: apply=true
        MarkerPair: markers=(Virtual_LELC LSHO)
        BodyScale humerus_l: axes=Y
      Measurement ArmXZ: apply=true
        MarkerPair: markers=(RELB RELBIN)
        BodyScale humerus: axes=(X Z)
      Measurement Arm_l_XZ: apply=true
        MarkerPair: markers=(LELB LELBIN)
        BodyScale humerus_l: axes=(X Z)
      Measurement formArmY: apply=true
        MarkerPair: markers=(Virtual_RWRIST RELC)
        BodyScale ulna: axes=Y
        BodyScale radius: axes=Y
      Measurement formArm_l_Y: apply=true
        MarkerPair: markers=(Virtual_LWRIST LELC)
        BodyScale ulna_l: axes=Y
        BodyScale radius_l: axes=Y
      Measurement formArmXZ: apply=true
        MarkerPair: markers=(RIWR ROWR)
        BodyScale ulna: axes=(X Z)
        BodyScale radius: axes=(X Z)
      Measurement formArm_l_XZ: apply=true
        MarkerPair: markers=(LIWR LOWR)
        BodyScale ulna_l: axes=(X Z)
        BodyScale radius_l: axes=(X Z)
      Measurement Hands_XYZ: apply=true
        MarkerPair: markers=(Virtual_RWRIST right_thumb1)
        MarkerPair: markers=(Virtual_RWRIST right_index1)
        MarkerPair: markers=(Virtual_RWRIST right_middle1)
        MarkerPair: markers=(Virtual_RWRIST right_pinky1)
        MarkerPair: markers=(Virtual_RWRIST right_ring1)
        BodyScale lunate: axes=(X Y Z)
        BodyScale scaphoid: axes=(X Y Z)
        BodyScale pisiform: axes=(X Y Z)
        BodyScale triquetrum: axes=(X Y Z)
        BodyScale capitate: axes=(X Y Z)
        BodyScale trapezium: axes=(X Y Z)
        BodyScale trapezoid: axes=(X Y Z)
        BodyScale hamate: axes=(X Y Z)
        BodyScale firstmc1: axes=(X Y Z)
        BodyScale secondmc: axes=(X Y Z)
        BodyScale thirdmc: axes=(X Y Z)
        BodyScale fourthmc: axes=(X Y Z)
        BodyScale fifthmc: axes=(X Y Z)
      Measurement Hands_XYZ_l: apply=true
        MarkerPair: markers=(Virtual_LWRIST left_thumb1)
        MarkerPair: markers=(Virtual_LWRIST left_index1)
        MarkerPair: markers=(Virtual_LWRIST left_middle1)
        MarkerPair: markers=(Virtual_LWRIST left_pinky1)
        MarkerPair: markers=(Virtual_LWRIST left_ring1)
        BodyScale lunate_l: axes=(X Y Z)
        BodyScale scaphoid_l: axes=(X Y Z)
        BodyScale pisiform_l: axes=(X Y Z)
        BodyScale triquetrum_l: axes=(X Y Z)
        BodyScale capitate_l: axes=(X Y Z)
        BodyScale trapezium_l: axes=(X Y Z)
        BodyScale trapezoid_l: axes=(X Y Z)
        BodyScale hamate_l: axes=(X Y Z)
        BodyScale firstmc1_l: axes=(X Y Z)
        BodyScale secondmc_l: axes=(X Y Z)
        BodyScale thirdmc_l: axes=(X Y Z)
        BodyScale fourthmc_l: axes=(X Y Z)
        BodyScale fifthmc_l: axes=(X Y Z)
      Measurement thumb1_XYZ_l: apply=true
        MarkerPair: markers=(left_thumb1 left_thumb2)
        BodyScale firstmc_l: axes=(X Y Z)
      Measurement thumb2_XYZ_l: apply=true
        MarkerPair: markers=(left_thumb2 left_thumb3)
        BodyScale proximal_thumb_l: axes=(X Y Z)
      Measurement thumb3_XYZ_l: apply=true
        MarkerPair: markers=(left_thumb3 lthumb)
        BodyScale distal_thumb_l: axes=(X Y Z)
      Measurement index1_XYZ_l: apply=true
        MarkerPair: markers=(left_index1 left_index2)
        BodyScale 2proxph_l: axes=(X Y Z)
      Measurement index2_XYZ_l: apply=true
        MarkerPair: markers=(left_index2 left_index3)
        BodyScale 2midph_l: axes=(X Y Z)
      Measurement index3_XYZ_l: apply=true
        MarkerPair: markers=(left_index3 lindex)
        BodyScale 2distph_l: axes=(X Y Z)
      Measurement middle1_XYZ_l: apply=true
        MarkerPair: markers=(left_middle1 left_middle2)
        BodyScale 3proxph_l: axes=(X Y Z)
      Measurement middle2_XYZ_l: apply=true
        MarkerPair: markers=(left_middle2 left_middle3)
        BodyScale 3midph_l: axes=(X Y Z)
      Measurement middle3_XYZ_l: apply=true
        MarkerPair: markers=(left_middle3 lmiddle)
        BodyScale 3distph_l: axes=(X Y Z)
      Measurement ring1_XYZ_l: apply=true
        MarkerPair: markers=(left_ring1 left_ring2)
        BodyScale 4proxph_l: axes=(X Y Z)
      Measurement ring2_XYZ_l: apply=true
        MarkerPair: markers=(left_ring2 left_ring3)
        BodyScale 4midph_l: axes=(X Y Z)
      Measurement ring3_XYZ_l: apply=true
        MarkerPair: markers=(left_ring3 lring)
        BodyScale 4distph_l: axes=(X Y Z)
      Measurement pinky1_XYZ_l: apply=true
        MarkerPair: markers=(left_pinky1 left_pinky2)
        BodyScale 5proxph_l: axes=(X Y Z)
      Measurement pinky2_XYZ_l: apply=true
        MarkerPair: markers=(left_pinky2 left_pinky3)
        BodyScale 5midph_l: axes=(X Y Z)
      Measurement pinky3_XYZ_l: apply=true
        MarkerPair: markers=(left_pinky3 lpinky)
        BodyScale 5distph_l: axes=(X Y Z)
      Measurement thumb1_XYZ: apply=true
        MarkerPair: markers=(right_thumb1 right_thumb2)
        BodyScale firstmc: axes=(X Y Z)
      Measurement thumb2_XYZ: apply=true
        MarkerPair: markers=(right_thumb2 right_thumb3)
        BodyScale proximal_thumb: axes=(X Y Z)
      Measurement thumb3_XYZ: apply=true
        MarkerPair: markers=(right_thumb3 rthumb)
        BodyScale distal_thumb: axes=(X Y Z)
      Measurement index1_XYZ: apply=true
        MarkerPair: markers=(right_index1 right_index2)
        BodyScale 2proxph: axes=(X Y Z)
      Measurement index2_XYZ: apply=true
        MarkerPair: markers=(right_index2 right_index3)
        BodyScale 2midph: axes=(X Y Z)
      Measurement index3_XYZ: apply=true
        MarkerPair: markers=(right_index3 rindex)
        BodyScale 2distph: axes=(X Y Z)
      Measurement middle1_XYZ: apply=true
        MarkerPair: markers=(right_middle1 right_middle2)
        BodyScale 3proxph: axes=(X Y Z)
      Measurement middle2_XYZ: apply=true
        MarkerPair: markers=(right_middle2 right_middle3)
        BodyScale 3midph: axes=(X Y Z)
      Measurement middle3_XYZ: apply=true
        MarkerPair: markers=(right_middle3 rmiddle)
        BodyScale 3distph: axes=(X Y Z)
      Measurement ring1_XYZ: apply=true
        MarkerPair: markers=(right_ring1 right_ring2)
        BodyScale 4proxph: axes=(X Y Z)
      Measurement ring2_XYZ: apply=true
        MarkerPair: markers=(right_ring2 right_ring3)
        BodyScale 4midph: axes=(X Y Z)
      Measurement ring3_XYZ: apply=true
        MarkerPair: markers=(right_ring3 rring)
        BodyScale 4distph: axes=(X Y Z)
      Measurement pinky1_XYZ: apply=true
        MarkerPair: markers=(right_pinky1 right_pinky2)
        BodyScale 5proxph: axes=(X Y Z)
      Measurement pinky2_XYZ: apply=true
        MarkerPair: markers=(right_pinky2 right_pinky3)
        BodyScale 5midph: axes=(X Y Z)
      Measurement pinky3_XYZ: apply=true
        MarkerPair: markers=(right_pinky3 rpinky)
        BodyScale 5distph: axes=(X Y Z)
  MarkerPlacer:
    apply: true
    marker_file: BMLmovi/Subject_11_F_MoSh/static.trc
    time_range: 0 0.5
    output_motion_file: BMLmovi/Subject_11_F_MoSh/static_scale.mot
    output_model_file: BMLmovi/Subject_11_F_MoSh/scale.osim
    output_marker_file: BMLmovi/Subject_11_F_MoSh/scale_simulate.trc
    max_marker_movement: -1
    IKTaskSet:
      IKMarkerTask MASI: apply=true weight=20
      IKMarkerTask MPSI: apply=true weight=20
      IKMarkerTask MHIPJ: apply=true weight=20
      IKMarkerTask CENTER: apply=true weight=20
      IKMarkerTask Virtual_LWRIST: apply=true weight=20
      IKMarkerTask Virtual_RWRIST: apply=true weight=20
      IKMarkerTask Virtual_LAJC: apply=true weight=20
      IKMarkerTask Virtual_RAJC: apply=true weight=20
      IKMarkerTask Virtual_LKJC: apply=true weight=20
      IKMarkerTask Virtual_RKJC: apply=true weight=20
      IKMarkerTask Virtual_Ground_RAJC: apply=true weight=20
      IKMarkerTask Virtual_Ground_LAJC: apply=true weight=20
      IKMarkerTask Virtual_Ground_RFOOT: apply=true weight=1
      IKMarkerTask Virtual_Ground_LFOOT: apply=true weight=1
      IKMarkerTask Virtual_Ground_RTOE: apply=true weight=1
      IKMarkerTask Virtual_Ground_LTOE: apply=true weight=1
      IKMarkerTask Virtual_Ground_RMT1: apply=true weight=1
      IKMarkerTask Virtual_Ground_LMT1: apply=true weight=1
      IKMarkerTask Virtual_Ground_RMT5: apply=true weight=1
      IKMarkerTask Virtual_Ground_LMT5: apply=true weight=1
      IKMarkerTask Virtual_Ground_RHEE: apply=true weight=1
      IKMarkerTask Virtual_Ground_LHEE: apply=true weight=1
      IKMarkerTask Virtual_LELC: apply=true weight=0
      IKMarkerTask Virtual_RELC: apply=true weight=0
      IKMarkerTask ROOT: apply=true weight=0
      IKMarkerTask LPSI: apply=true weight=20
      IKMarkerTask RPSI: apply=true weight=20
      IKMarkerTask RASI: apply=true weight=20
      IKMarkerTask LASI: apply=true weight=20
      IKMarkerTask LHIPJ: apply=true weight=20
      IKMarkerTask RHIPJ: apply=true weight=20
      IKMarkerTask T12: apply=true weight=10
      IKMarkerTask T10: apply=true weight=20
      IKMarkerTask T8: apply=true weight=10
      IKMarkerTask T1: apply=true weight=10
      IKMarkerTask Spine1: apply=true weight=0
      IKMarkerTask STRN: apply=true weight=20
      IKMarkerTask CLAV: apply=true weight=20
      IKMarkerTask Spine2: apply=true weight=0
      IKMarkerTask Spine3: apply=true weight=0
      IKMarkerTask LCOL: apply=true weight=0
      IKMarkerTask RCOL: apply=true weight=0
      IKMarkerTask C7: apply=true weight=20
      IKMarkerTask HEAD: apply=true weight=0
      IKMarkerTask NECK: apply=true weight=0
      IKMarkerTask LBHD: apply=true weight=1
      IKMarkerTask LFHD: apply=true weight=1
      IKMarkerTask RBHD: apply=true weight=1
      IKMarkerTask RFHD: apply=true weight=1
      IKMarkerTask LKJC: apply=true weight=20
      IKMarkerTask RKJC: apply=true weight=20
      IKMarkerTask RKNE: apply=true weight=20
      IKMarkerTask RKNI: apply=true weight=20
      IKMarkerTask LKNE: apply=true weight=20
      IKMarkerTask LKNI: apply=true weight=20
      IKMarkerTask LAJC: apply=true weight=0
      IKMarkerTask RAJC: apply=true weight=0
      IKMarkerTask LANK: apply=true weight=20
      IKMarkerTask RANK: apply=true weight=20
      IKMarkerTask LANI: apply=true weight=20
      IKMarkerTask RANI: apply=true weight=20
      IKMarkerTask LFOOT: apply=true weight=20
      IKMarkerTask RFOOT: apply=true weight=20
      IKMarkerTask LHEE: apply=true weight=20
      IKMarkerTask RHEE: apply=true weight=20
      IKMarkerTask LMT5: apply=true weight=1
      IKMarkerTask RMT5: apply=true weight=1
      IKMarkerTask RMT1: apply=true weight=1
      IKMarkerTask LMT1: apply=true weight=1
      IKMarkerTask RTOE: apply=true weight=10
      IKMarkerTask LTOE: apply=true weight=10
      IKMarkerTask LCLAV: apply=true weight=0
      IKMarkerTask LSHO: apply=true weight=20
      IKMarkerTask RSHO: apply=true weight=20
      IKMarkerTask RCLAV: apply=true weight=0
      IKMarkerTask LELC: apply=true weight=0
      IKMarkerTask RELC: apply=true weight=0
      IKMarkerTask LELB: apply=true weight=20
      IKMarkerTask RELB: apply=true weight=20
      IKMarkerTask LELBIN: apply=true weight=20
      IKMarkerTask RELBIN: apply=true weight=20
      IKMarkerTask LSHOULDER: apply=true weight=0
      IKMarkerTask RSHOULDER: apply=true weight=0
      IKMarkerTask LWRIST: apply=true weight=0
      IKMarkerTask RWRIST: apply=true weight=0
      IKMarkerTask LIWR: apply=true weight=20
      IKMarkerTask RIWR: apply=true weight=20
      IKMarkerTask LOWR: apply=true weight=20
      IKMarkerTask ROWR: apply=true weight=20
      IKMarkerTask left_index1: apply=true weight=20
      IKMarkerTask left_index2: apply=true weight=20
      IKMarkerTask left_index3: apply=true weight=20
      IKMarkerTask left_middle1: apply=true weight=20
      IKMarkerTask left_middle2: apply=true weight=20
      IKMarkerTask left_middle3: apply=true weight=20
      IKMarkerTask left_pinky1: apply=true weight=20
      IKMarkerTask left_pinky2: apply=true weight=20
      IKMarkerTask left_pinky3: apply=true weight=20
      IKMarkerTask left_ring1: apply=true weight=20
      IKMarkerTask left_ring2: apply=true weight=20
      IKMarkerTask left_ring3: apply=true weight=20
      IKMarkerTask left_thumb1: apply=true weight=20
      IKMarkerTask left_thumb2: apply=true weight=20
      IKMarkerTask left_thumb3: apply=true weight=20
      IKMarkerTask right_index1: apply=true weight=20
      IKMarkerTask right_index2: apply=true weight=20
      IKMarkerTask right_index3: apply=true weight=20
      IKMarkerTask right_middle1: apply=true weight=20
      IKMarkerTask right_middle2: apply=true weight=20
      IKMarkerTask right_middle3: apply=true weight=20
      IKMarkerTask right_pinky1: apply=true weight=20
      IKMarkerTask right_pinky2: apply=true weight=20
      IKMarkerTask right_pinky3: apply=true weight=20
      IKMarkerTask right_ring1: apply=true weight=20
      IKMarkerTask right_ring2: apply=true weight=20
      IKMarkerTask right_ring3: apply=true weight=20
      IKMarkerTask right_thumb1: apply=true weight=20
      IKMarkerTask right_thumb2: apply=true weight=20
      IKMarkerTask right_thumb3: apply=true weight=20
      IKMarkerTask rthumb: apply=true weight=20
      IKMarkerTask rindex: apply=true weight=20
      IKMarkerTask rmiddle: apply=true weight=20
      IKMarkerTask rring: apply=true weight=20
      IKMarkerTask rpinky: apply=true weight=20
      IKMarkerTask lthumb: apply=true weight=20
      IKMarkerTask lindex: apply=true weight=20
      IKMarkerTask lmiddle: apply=true weight=20
      IKMarkerTask lring: apply=true weight=20
      IKMarkerTask lpinky: apply=true weight=20
