# OpenSim document version 40000
Model fullBody:
  gravity: 0 -9.80665 0
  length_units: meters
  force_units: N
  Ground
  BodySet:
    Body pelvis: mass=7.533915 [kg] mass_center=(-0.08100019 -0.01277645 0) inertia=(0 0 0 0 0 0)
        meshes=(videoMuscle_sacrum.obj videoMuscle_pelvis.obj videoMuscle_l_pelvis.obj)
    Body lumbar5: mass=2.002996 mass_center=(0.01487777 0.02062118 0) inertia=(0.128557 0.1861384 0.05758153 0 0 0)
        meshes=videoMuscle_lumbar5.obj
    Body lumbar4: mass=1.900776 mass_center=(0.01872358 0.01588889 0) inertia=(0.1184326 0.173272 0.05483956 0 0 0)
        meshes=videoMuscle_lumbar4.obj
    Body lumbar3: mass=1.849074 mass_center=(0.02953184 0.01158053 0) inertia=(0.1124207 0.1695808 0.05705429 0 0 0)
        meshes=videoMuscle_lumbar3.obj
    Body lumbar2: mass=1.801657 mass_center=(0.03744499 0.005871066 0) inertia=(0.1150578 0.1773845 0.06232732 0 0 0)
        meshes=videoMuscle_lumbar2.obj
    Body lumbar1: mass=1.835396 mass_center=(0.04468443 0.0009174253 0) inertia=(0.1173776 0.1848727 0.06749484 0 0 0)
        meshes=videoMuscle_lumbar1.obj
    Body thoracic12: mass=1.811323 mass_center=(0.05663269 -0.001705861 0)
        inertia=(0.1165341 0.1906731 0.0635928 0 0 0) meshes=videoMuscle_thoracic12_s.obj
    Body thoracic11: mass=1.463447 mass_center=(0.06130341 -0.0009193348 0)
        inertia=(0.09544186 0.1603008 0.06485837 0 0 0) meshes=videoMuscle_thoracic11_s.obj
    Body thoracic10: mass=1.412474 mass_center=(0.06558056 0.001784602 0)
        inertia=(0.09385978 0.1579801 0.06412013 0 0 0) meshes=videoMuscle_thoracic10_s.obj
    Body thoracic9: mass=1.18688 mass_center=(0.06983014 0.00382916 0) inertia=(0.07572084 0.1248658 0.04914471 0 0 0)
        meshes=videoMuscle_thoracic9_s.obj
    Body thoracic8: mass=1.117852 mass_center=(0.06505707 0.008374458 0)
        inertia=(0.07645908 0.1228616 0.04640274 0 0 0) meshes=videoMuscle_thoracic8_s.obj
    Body thoracic7: mass=1.154417 mass_center=(0.06036671 0.02007565 0) inertia=(0.07835731 0.121491 0.04302794 0 0 0)
        meshes=videoMuscle_thoracic7_s.obj
    Body thoracic6: mass=1.035511 mass_center=(0.05555228 0.02604143 0) inertia=(0.08225935 0.1228616 0.04060239 0 0 0)
        meshes=videoMuscle_thoracic6_s.obj
    Body thoracic5: mass=1.065055 mass_center=(0.04811866 0.03079384 0) inertia=(0.08457949 0.1215959 0.03701677 0 0 0)
        meshes=videoMuscle_thoracic5_s.obj
    Body thoracic4: mass=0.9546284 mass_center=(0.03950032 0.0320974 0) inertia=(0.08753246 0.1228616 0.03532936 0 0 0)
        meshes=videoMuscle_thoracic4_s.obj
    Body thoracic3: mass=1.031681 mass_center=(0.02652971 0.02743088 0) inertia=(0.08827061 0.1213852 0.03311463 0 0 0)
        meshes=videoMuscle_thoracic3_s.obj
    Body thoracic2: mass=0.8655394 mass_center=(0.02037904 0.02447163 0)
        inertia=(0.07097505 0.0956525 0.02478332 0 0 0) meshes=videoMuscle_thoracic2_s.obj
    Body thoracic1: mass=0.8147214 mass_center=(0.004824576 0.01747996 0)
        inertia=(0.07065873 0.0919622 0.0213031 0 0 0) meshes=videoMuscle_thoracic1_s.obj
    Body head_neck: mass=4.888299 mass_center=(0 0.1194606 0) inertia=(0 0 0 0 0 0) meshes=videoMuscle_rotatedcerv7.obj
    Body femur_r: mass=9.973821 mass_center=(0 -0.1829836 0) inertia=(0 0 0 0 0 0) meshes=videoMuscle_femur_r.obj
    Body tibia_r: mass=3.049904 mass_center=(0 -0.1925728 0) inertia=(0 0 0 0 0 0)
        meshes=(videoMuscle_tibia_r.obj videoMuscle_fibula.obj)
    Body talus_r: mass=0.0615968 mass_center=(0 0 0) inertia=(0 0 0 0 0 0) meshes=videoMuscle_talus.obj
    Body calcn_r: mass=0.7699649 mass_center=(0.09982186 0.03978487 0) inertia=(0 0 0 0 0 0)
        meshes=videoMuscle_foot.obj
    Body toes_r: mass=0.1334195 mass_center=(0.03210686 0.007894431 -0.01906271) inertia=(0 0 0 0 0 0)
        meshes=videoMuscle_bofoot.obj
    Body femur_l: mass=9.973821 mass_center=(0 -0.1835396 0) inertia=(0 0 0 0 0 0) meshes=videoMuscle_femur_l.obj
    Body tibia_l: mass=3.049904 mass_center=(0 -0.1922554 0) inertia=(0 0 0 0 0 0)
        meshes=(videoMuscle_tibia_l.obj videoMuscle_fibula_l.obj)
    Body talus_l: mass=0.0615968 mass_center=(0 0 0) inertia=(0 0 0 0 0 0) meshes=videoMuscle_talus_lv.obj
    Body calcn_l: mass=0.7699649 mass_center=(0.09979933 0.03620852 0) inertia=(0 0 0 0 0 0)
        meshes=videoMuscle_l_foot.obj
    Body toes_l: mass=0.1334195 mass_center=(0.031921 0.007937361 0.01916637) inertia=(0 0 0 0 0 0)
        meshes=videoMuscle_l_bofoot.obj
    Body cerv6: mass=9.11862e-26 mass_center=(0 0 0) inertia=(0 0 0 0 0 0) meshes=videoMuscle_cerv6.obj
    Body cerv5: mass=9.11862e-26 mass_center=(0 0 0) inertia=(0 0 0 0 0 0) meshes=videoMuscle_cerv5.obj
    Body cerv4: mass=9.11862e-26 mass_center=(0 0 0) inertia=(0 0 0 0 0 0) meshes=videoMuscle_cerv4.obj
    Body cerv3: mass=9.11862e-26 mass_center=(0 0 0) inertia=(0 0 0 0 0 0) meshes=videoMuscle_cerv3.obj
    Body cerv2: mass=9.11862e-26 mass_center=(0 0 0) inertia=(0 0 0 0 0 0) meshes=videoMuscle_cerv2.obj
    Body cerv1: mass=9.11862e-26 mass_center=(0 0 0) inertia=(0 0 0 0 0 0) meshes=videoMuscle_cerv1.obj
    Body jaw: mass=9.11862e-26 mass_center=(0 0 0) inertia=(0 0 0 0 0 0) meshes=videoMuscle_jaw.obj
    Body skull: mass=9.11862e-26 mass_center=(0 0 0) inertia=(0 0 0 0 0 0) meshes=videoMuscle_skull.obj
    Body thorax: mass=9.030332e-5 mass_center=(0 0 0) inertia=(0 0 0 0 0 0) meshes=videoMuscle_thorax.obj
      WrapEllipsoid Thorax: xyz_body_rotation=(0.0434587 -0.3319616 0.1898918)
          translation=(-0.04293761 -0.1403527 0.05206654) quadrant=all dimensions=(0.1077306 0.1488792 0.06265824)
      WrapEllipsoid Thorax_l: xyz_body_rotation=(-0.0434587 0.3319616 0.1898918)
          translation=(-0.04293761 -0.1403527 -0.05206654) quadrant=all dimensions=(0.1077306 0.1488792 0.06265824)
    Body clavicle: mass=9.030332e-5 mass_center=(0 0 0) inertia=(0 0 0 0 0 0) meshes=videoMuscle_clavicle.obj
    Body clavphant: mass=9.11862e-26 mass_center=(0 0 0) inertia=(0 0 0 0 0 0)
    Body scapula: mass=9.030332e-5 mass_center=(0 0 0) inertia=(0 0 0 0 0 0) meshes=videoMuscle_scapula.obj
      WrapEllipsoid Deltoid2: active=false xyz_body_rotation=(3.130423 -1.548805 -1.314233)
          translation=(-0.006451766 -0.04167581 0.007056132) quadrant=-y dimensions=(0.03237362 0.0305672 0.03892755)
      WrapTorus Delt3: active=false xyz_body_rotation=(0.6209881 0.32882 -0.5607743)
          translation=(-0.1082339 -0.04718849 -0.02719551) quadrant=all inner_radius=0.04159876 outer_radius=0.06239814
      WrapTorus INFSP: xyz_body_rotation=(0.02530727 0.5883505 0.1518436)
          translation=(-0.06240415 -0.02194044 -0.008232154) quadrant=all inner_radius=0.008439431
          outer_radius=0.02004365
      WrapEllipsoid TMIN: xyz_body_rotation=(-2.097537 -0.2808235 -1.763481)
          translation=(-0.04649721 -0.05722155 -0.02638699) quadrant=x dimensions=(0.02490838 0.03333785 0.05123409)
      WrapCylinder TRIlongglen: xyz_body_rotation=(1.375319 -0.2946116 2.435956)
          translation=(-0.0399342 -0.03406832 -0.009702182) quadrant=x radius=0.002830094 length=0.03276202
    Body scapphant: mass=9.11862e-26 mass_center=(0 0 0) inertia=(0 0 0 0 0 0)
    Body humphant: mass=9.11862e-26 mass_center=(0 0 0) inertia=(0 0 0 0 0 0)
    Body humphant1: mass=9.11862e-26 mass_center=(0 0 0) inertia=(0 0 0 0 0 0)
    Body humerus: mass=1.908831 mass_center=(0 -0.1199603 0) inertia=(0 0 0 0 0 0) meshes=videoMuscle_humerus.obj
      WrapEllipsoid DELT1hh: xyz_body_rotation=(0.05846853 1.004612 0.5703736)
          translation=(-0.01432314 -0.01384414 -0.02699757) quadrant=z dimensions=(0.03152376 0.1070172 0.05152507)
      WrapCylinder delt2hum: xyz_body_rotation=(1.680927 -0.02495821 0.05166175)
          translation=(0.001751751 -0.1044306 0.001133486) quadrant=all radius=0.009689778 length=0.0544673
      WrapEllipsoid delt3hum: xyz_body_rotation=(1.727352 0.07592182 -2.743134)
          translation=(0.001957839 -0.06453332 0.001133486) quadrant=x dimensions=(0.01030446 0.01032255 0.0544168)
      WrapEllipsoid SUPSP: xyz_body_rotation=(0.03804818 0.00855211 -1.306728)
          translation=(0.0002060884 0.008393692 0.0044309) quadrant=all dimensions=(0.02172011 0.02069162 0.02061059)
      WrapEllipsoid INFSP_and_TMIN_hum_head: xyz_body_rotation=(-0.2865831 -0.00907571 -0.06841691)
          translation=(-0.0003091325 0.002834234 0.003915679) quadrant=all
          dimensions=(0.02061366 0.02712924 0.02070581)
      WrapEllipsoid SUBSCAP: xyz_body_rotation=(-0.9245009 0.288852 0.381529)
          translation=(-0.002576104 0.0007630629 -0.004636988) quadrant=all
          dimensions=(0.02060905 0.01794209 0.02983784)
      WrapCylinder TMINhum: xyz_body_rotation=(1.753532 0.06928957 2.746276) translation=(-0.001442618 -0.04959909 0)
          quadrant=x radius=0.0072211 length=0.07615177
      WrapSphere TMAJ_LAT_PEC_CORBhh: translation=(0.0007213092 0 0.006182651) quadrant=all radius=0.0315078
      WrapCylinder TMAJ_LAThum: xyz_body_rotation=(1.536413 -0.06370452 1.41424)
          translation=(0.0007213092 -0.04829098 -0.00566743) quadrant=-x radius=0.007214205 length=0.04359134
      WrapEllipsoid PEC1hh: xyz_body_rotation=(-0.6204646 -0.3104941 0.3637266)
          translation=(-0.003812635 0.0005450449 -0.002576104) quadrant=-z
          dimensions=(0.03128998 0.02119418 0.02097918)
      WrapCylinder PEC12hum: xyz_body_rotation=(1.559277 -0.07749262 -0.9258972)
          translation=(0.002060884 -0.05537657 -0.001751751) quadrant=x radius=0.009275651 length=0.07628117
      WrapSphere PEC23hh: translation=(-0.008861799 0.002289189 -0.0004121767) quadrant=all radius=0.0210052
      WrapCylinder PEC3hum: xyz_body_rotation=(1.440944 -0.0561996 1.751961)
          translation=(0.0009273976 -0.06006395 -0.0004121767) quadrant=-x radius=0.008248363 length=0.07622479
      WrapCylinder LAT_TMAJhh: xyz_body_rotation=(-0.3050835 -0.01832596 -0.6866125)
          translation=(-0.0230819 0.01111892 0.009686153) quadrant=-y radius=0.007404855 length=0.04661613
      WrapSphere LAT_TMAJ2hh: xyz_body_rotation=(-0.1272345 0.2761111 0.01972222)
          translation=(-0.001648707 0.01002883 0.005358297) quadrant=-z radius=0.0315078
      WrapCylinder CORBhum: xyz_body_rotation=(-1.608321 0.09599311 0.8752826)
          translation=(0.002782193 -0.1310288 -0.006079606) quadrant=x radius=0.008246106 length=0.0544735
      WrapEllipsoid TRIlonghh: xyz_body_rotation=(3.001617 -0.853466 2.574186)
          translation=(-0.008037446 -0.004469369 -0.001442618) quadrant=z dimensions=(0.03648233 0.02156061 0.02061906)
      WrapCylinder TRI: xyz_body_rotation=(-0.1401499 -0.00628319 0.1549852)
          translation=(0.002885237 -0.3181972 -0.01226226) quadrant=all radius=0.01695449 length=0.04126509
      WrapEllipsoid ANC: xyz_body_rotation=(0.00750492 -0.1966986 1.049292)
          translation=(0.01380792 -0.3118747 -0.0008243534) quadrant=-x dimensions=(0.02150821 0.02091058 0.0206089)
      WrapEllipsoid BIClong: xyz_body_rotation=(-2.004336 -1.001644 0.9754645)
          translation=(0.003400458 0.007957656 0.0003091325) quadrant=-y dimensions=(0.02577098 0.02151268 0.02089822)
      WrapEllipsoid Elbow_BIC_BRD: xyz_body_rotation=(-0.1286308 0.1375319 0.03071779)
          translation=(0.001957839 -0.315036 -0.01442618) quadrant=x dimensions=(0.01545678 0.01633701 0.1031423)
      WrapEllipsoid Elbow_PT_ECRL: xyz_body_rotation=(-0.1610939 -0.1108284 0.6145304)
          translation=(0.003091325 -0.3130738 -0.007110048) quadrant=x dimensions=(0.01891812 0.02671278 0.03611949)
    Body ulna: mass=0.5485926 mass_center=(0 -0.1235961 0) inertia=(0 0 0 0 0 0) meshes=videoMuscle_ulna.obj
    Body radius: mass=0.5485926 mass_center=(0 -0.1235961 0) inertia=(0 0 0 0 0 0) meshes=videoMuscle_radius.obj
      WrapTorus ECU: xyz_body_rotation=(-0.9866346 -0.1488766 0.222704) translation=(-0.01306544 -0.2485289 0.02797447)
          quadrant=all inner_radius=0.005040529 outer_radius=0.007560793
    Body lunate: mass=0.4131377 mass_center=(0 -0.07938943 0) inertia=(0 0 0 0 0 0) meshes=videoMuscle_lunate.obj
      WrapTorus ECRL: xyz_body_rotation=(1.538333 0.2343977 0.7311184) translation=(0.02588216 -0.01119228 0.02424995)
          quadrant=all inner_radius=0.009326903 outer_radius=0.01865381
      WrapTorus ECRB: xyz_body_rotation=(1.312662 -0.1178097 -0.1162389) translation=(0.01468987 -0.0110757 0.02168505)
          quadrant=all inner_radius=0.009326903 outer_radius=0.01165863
      WrapTorus FCR: xyz_body_rotation=(-1.555961 -0.1532399 -0.1000074)
          translation=(0.003730761 -0.005246383 -0.0221514) quadrant=all inner_radius=0.001165863
          outer_radius=0.002914657
      WrapTorus FCU: xyz_body_rotation=(-1.573763 -0.07976155 0.39235) translation=(-0.01434011 -0.0144567 -0.01993626)
          quadrant=all inner_radius=0.007927868 outer_radius=0.009326903
    Body clavicle_l: mass=9.030332e-5 mass_center=(0 0 0) inertia=(0 0 0 0 0 0) meshes=videoMuscle_clavicle_l.obj
    Body clavphant_l: mass=9.11862e-26 mass_center=(0 0 0) inertia=(0 0 0 0 0 0)
    Body scapula_l: mass=9.030332e-5 mass_center=(0 0 0) inertia=(0 0 0 0 0 0) meshes=videoMuscle_scapula_l.obj
      WrapEllipsoid Deltoid2_l: active=false xyz_body_rotation=(-3.130423 1.548805 -1.314233)
          translation=(-0.006451766 -0.04167581 -0.007019335) quadrant=-y dimensions=(0.03236277 0.03041991 0.03892746)
      WrapTorus Delt3_l: active=false xyz_body_rotation=(-0.6209881 -0.32882 -0.5607743)
          translation=(-0.1082339 -0.04718849 0.02705369) quadrant=all inner_radius=0.04155634 outer_radius=0.06233451
      WrapTorus INFSP_l: xyz_body_rotation=(-0.02530727 -0.5883505 0.1518436)
          translation=(-0.06240415 -0.02194044 0.008189224) quadrant=all inner_radius=0.008432909
          outer_radius=0.02002816
      WrapEllipsoid TMIN_l: xyz_body_rotation=(2.097537 0.2808235 -1.763481)
          translation=(-0.04649721 -0.05722155 0.02624939) quadrant=x dimensions=(0.0248107 0.03333771 0.05117566)
      WrapCylinder TRIlongglen_l: xyz_body_rotation=(-1.375319 0.2946116 2.435956)
          translation=(-0.0399342 -0.03406832 0.009651585) quadrant=x radius=0.002823087 length=0.03275658
    Body scapphant_l: mass=9.11862e-26 mass_center=(0 0 0) inertia=(0 0 0 0 0 0)
    Body humphant_l: mass=9.11862e-26 mass_center=(0 0 0) inertia=(0 0 0 0 0 0)
    Body humphant1_l: mass=9.11862e-26 mass_center=(0 0 0) inertia=(0 0 0 0 0 0)
    Body humerus_l: mass=1.908831 mass_center=(0 -0.1194425 0) inertia=(0 0 0 0 0 0) meshes=videoMuscle_humerus_l.obj
      WrapEllipsoid DELT1hh_l: xyz_body_rotation=(-0.05846853 -1.004612 0.5703736)
          translation=(-0.01418231 -0.01377074 0.02673212) quadrant=-z dimensions=(0.03126904 0.1063092 0.05101873)
      WrapCylinder delt2hum_l: xyz_body_rotation=(-1.680927 0.02495821 0.05166175)
          translation=(0.001734527 -0.1038769 -0.001122341) quadrant=all radius=0.009594845 length=0.05417601
      WrapEllipsoid delt3hum_l: xyz_body_rotation=(-1.727352 -0.07592182 -2.743134)
          translation=(0.001938589 -0.06419115 -0.001122341) quadrant=x dimensions=(0.01020315 0.01022276 0.05412238)
      WrapEllipsoid SUPSP_l: xyz_body_rotation=(-0.03804818 -0.00855211 -1.306728)
          translation=(0.000204062 0.008349187 -0.004387333) quadrant=all dimensions=(0.02159943 0.02049593 0.02040811)
      WrapEllipsoid INFSP_and_TMIN_hum_head_l: xyz_body_rotation=(0.2865831 0.00907571 -0.06841691)
          translation=(-0.000306093 0.002819206 -0.003877178) quadrant=all
          dimensions=(0.02041143 0.02697706 0.02051129)
      WrapEllipsoid SUBSCAP_l: xyz_body_rotation=(0.9245009 -0.288852 0.381529)
          translation=(-0.002550775 0.000759017 0.004591394) quadrant=all dimensions=(0.02040643 0.0178037 0.02963073)
      WrapCylinder TMINhum_l: xyz_body_rotation=(-1.753532 -0.06928957 2.746276)
          translation=(-0.001428434 -0.0493361 0) quadrant=x radius=0.007150854 length=0.07573761
      WrapSphere TMAJ_LAT_PEC_CORBhh_l: translation=(0.0007142169 0 -0.006121859) quadrant=all radius=0.03124905
      WrapCylinder TMAJ_LAThum_l: xyz_body_rotation=(-1.536413 0.06370452 1.41424)
          translation=(0.0007142169 -0.04803493 0.005611704) quadrant=-x radius=0.007143376 length=0.04335939
      WrapEllipsoid PEC1hh_l: xyz_body_rotation=(0.6204646 0.3104941 0.3637266)
          translation=(-0.003775147 0.000542155 0.002550775) quadrant=z dimensions=(0.031017 0.02103772 0.02080655)
      WrapCylinder PEC12hum_l: xyz_body_rotation=(-1.559277 0.07749262 -0.9258972)
          translation=(0.00204062 -0.05508295 0.001734527) quadrant=x radius=0.009184606 length=0.07587503
      WrapSphere PEC23hh_l: translation=(-0.008774665 0.002277051 0.000408124) quadrant=all radius=0.0208327
      WrapCylinder PEC3hum_l: xyz_body_rotation=(-1.440944 0.0561996 1.751961)
          translation=(0.0009182789 -0.05974548 0.000408124) quadrant=-x radius=0.008167716 length=0.07581516
      WrapCylinder LAT_TMAJhh_l: xyz_body_rotation=(0.3050835 0.01832596 -0.6866125)
          translation=(-0.02285494 0.01105996 -0.009590913) quadrant=-y radius=0.007349103 length=0.04618079
      WrapSphere LAT_TMAJ2hh_l: xyz_body_rotation=(0.1272345 -0.2761111 0.01972222)
          translation=(-0.001632496 0.009975652 -0.005305611) quadrant=z radius=0.03124905
      WrapCylinder CORBhum_l: xyz_body_rotation=(1.608321 -0.09599311 0.8752826)
          translation=(0.002754837 -0.1303341 0.006019828) quadrant=x radius=0.008165269 length=0.05418259
      WrapEllipsoid TRIlonghh_l: xyz_body_rotation=(-3.001617 0.853466 2.574186)
          translation=(-0.007958417 -0.004445671 0.001428434) quadrant=-z dimensions=(0.03616204 0.02142963 0.02041729)
      WrapCylinder TRI_l: xyz_body_rotation=(0.1401499 0.00628319 0.1549852)
          translation=(0.002856868 -0.3165101 0.01214169) quadrant=all radius=0.0168278 length=0.04086382
      WrapEllipsoid ANC_l: xyz_body_rotation=(-0.00750492 0.1966986 1.049292)
          translation=(0.01367215 -0.3102211 0.0008162479) quadrant=-x dimensions=(0.02137375 0.0207326 0.02040627)
      WrapEllipsoid BIClong_l: xyz_body_rotation=(2.004336 1.001644 0.9754645)
          translation=(0.003367023 0.007915463 -0.000306093) quadrant=-y dimensions=(0.02551852 0.02137851 0.02071927)
      WrapEllipsoid Elbow_BIC_BRD_l: xyz_body_rotation=(0.1286308 -0.1375319 0.03071779)
          translation=(0.001938589 -0.3133656 0.01428434) quadrant=x dimensions=(0.01530481 0.01624943 0.1021374)
      WrapEllipsoid Elbow_PT_ECRL_l: xyz_body_rotation=(0.1610939 0.1108284 0.6145304)
          translation=(0.00306093 -0.3114138 0.007040138) quadrant=x dimensions=(0.01876558 0.02653291 0.03576944)
    Body ulna_l: mass=0.5485926 mass_center=(0 -0.1244328 0) inertia=(0 0 0 0 0 0) meshes=videoMuscle_ulna_l.obj
    Body radius_l: mass=0.5485926 mass_center=(0 -0.1244328 0) inertia=(0 0 0 0 0 0) meshes=videoMuscle_radius_l.obj
      WrapTorus ECU_l: xyz_body_rotation=(0.9866346 0.1488766 0.222704)
          translation=(-0.01282625 -0.2491173 -0.02746235) quadrant=all inner_radius=0.004969791
          outer_radius=0.007454686
    Body lunate_l: mass=0.4131377 mass_center=(0 -0.07795897 0) inertia=(0 0 0 0 0 0) meshes=videoMuscle_lunate_l.obj
      WrapTorus ECRL_l: xyz_body_rotation=(-1.538333 -0.2343977 0.7311184)
          translation=(0.0254158 -0.01099062 -0.023813) quadrant=all inner_radius=0.009158848 outer_radius=0.0183177
      WrapTorus ECRB_l: xyz_body_rotation=(-1.312662 0.1178097 -0.1162389)
          translation=(0.01442519 -0.01087613 -0.02129432) quadrant=all inner_radius=0.009158848
          outer_radius=0.01144856
      WrapTorus FCR_l: xyz_body_rotation=(1.555961 0.1532399 -0.1000074)
          translation=(0.003663539 -0.005151852 0.02175226) quadrant=all inner_radius=0.001144856
          outer_radius=0.00286214
      WrapTorus FCU_l: xyz_body_rotation=(1.573763 0.07976155 0.39235) translation=(-0.01408173 -0.01419621 0.01957704)
          quadrant=all inner_radius=0.007785021 outer_radius=0.009158848
  JointSet:
    CustomJoint ground_pelvis: socket_parent_frame=ground_offset socket_child_frame=pelvis_offset
      Coordinate pelvis_tilt: default_value=0 range=(-31.41593 31.41593) clamped=true
      Coordinate pelvis_list: default_value=0 range=(-31.41593 31.41593) clamped=true
      Coordinate pelvis_rotation: default_value=0 range=(-31.41593 31.41593) clamped=true
      Coordinate pelvis_tx: default_value=0 range=(-20 20) clamped=true
      Coordinate pelvis_ty: default_value=0 range=(-20 20) clamped=true
      Coordinate pelvis_tz: default_value=0 range=(-20 20) clamped=true
      PhysicalOffsetFrame ground_offset: socket_parent=/ground translation=(0 -0.2351 0) [meters]
      PhysicalOffsetFrame pelvis_offset: socket_parent=/bodyset/pelvis translation=(0 0 0)
      SpatialTransform:
        TransformAxis rotation1: coordinates=pelvis_tilt axis=(0 0 1) LinearFunction(coefficients=1 0)
        TransformAxis rotation2: coordinates=pelvis_list axis=(1 0 0) LinearFunction(coefficients=1 0)
        TransformAxis rotation3: coordinates=pelvis_rotation axis=(0 1 0) LinearFunction(coefficients=1 0)
        TransformAxis translation1: coordinates=pelvis_tx axis=(1 0 0) LinearFunction(coefficients=1 0)
        TransformAxis translation2: coordinates=pelvis_ty axis=(0 1 0) LinearFunction(coefficients=1 0)
        TransformAxis translation3: coordinates=pelvis_tz axis=(0 0 1) LinearFunction(coefficients=1 0)
    CustomJoint L5_S1_IVDjnt: socket_parent_frame=pelvis_offset socket_child_frame=lumbar5_offset
      Coordinate L5_S1_FE: default_value=-6.503807e-9 range=(-1.570796 0.1745329) clamped=true
      Coordinate L5_S1_LB: default_value=0 range=(-0.1745 0.1745) clamped=true
      Coordinate L5_S1_AR: default_value=0 range=(-0.1745 0.1745) clamped=true
      PhysicalOffsetFrame pelvis_offset: socket_parent=/bodyset/pelvis translation=(-0.1237014 0.08649589 0.002351404)
          orientation=(0 0 -0.36652) [radians]
      PhysicalOffsetFrame lumbar5_offset: socket_parent=/bodyset/lumbar5 translation=(0 0 0)
      SpatialTransform: axes_held_at_zero=(translation1 translation2 translation3)
        TransformAxis rotation1: coordinates=L5_S1_FE axis=(0 0 1) LinearFunction(coefficients=1 0)
        TransformAxis rotation2: coordinates=L5_S1_LB axis=(1 0 0) LinearFunction(coefficients=1 0)
        TransformAxis rotation3: coordinates=L5_S1_AR axis=(0 1 0) LinearFunction(coefficients=1 0)
    CustomJoint L4_L5_IVDjnt: socket_parent_frame=lumbar5_offset socket_child_frame=lumbar4_offset
      Coordinate L4_L5_FE: default_value=0 range=(-0.1745329 0.1745329) clamped=true
      Coordinate L4_L5_LB: default_value=0 range=(-0.1745329 0.1745329) clamped=true
      Coordinate L4_L5_AR: default_value=0 range=(-0.1745329 0.1745329) clamped=true
      PhysicalOffsetFrame lumbar5_offset: socket_parent=/bodyset/lumbar5 translation=(0 0.03258168 0)
          orientation=(0 0 0.31416)
      PhysicalOffsetFrame lumbar4_offset: socket_parent=/bodyset/lumbar4 translation=(0 0 0)
      SpatialTransform: axes_held_at_zero=(translation1 translation2 translation3)
        TransformAxis rotation1: coordinates=L4_L5_FE axis=(0 0 1) LinearFunction(coefficients=1 0)
        TransformAxis rotation2: coordinates=L4_L5_LB axis=(1 0 0) LinearFunction(coefficients=1 0)
        TransformAxis rotation3: coordinates=L4_L5_AR axis=(0 1 0) LinearFunction(coefficients=1 0)
    WeldJoint L3_L4_IVDjnt: socket_parent_frame=lumbar4_offset socket_child_frame=lumbar3_offset
      PhysicalOffsetFrame lumbar4_offset: socket_parent=/bodyset/lumbar4 translation=(0 0.03029411 0)
          orientation=(0 0 0.20944)
      PhysicalOffsetFrame lumbar3_offset: socket_parent=/bodyset/lumbar3 translation=(0 0 0)
    WeldJoint L2_L3_IVDjnt: socket_parent_frame=lumbar3_offset socket_child_frame=lumbar2_offset
      PhysicalOffsetFrame lumbar3_offset: socket_parent=/bodyset/lumbar3 translation=(0 0.03026283 0)
          orientation=(0 0 0.12217)
      PhysicalOffsetFrame lumbar2_offset: socket_parent=/bodyset/lumbar2 translation=(0 0 0)
    WeldJoint L1_L2_IVDjnt: socket_parent_frame=lumbar2_offset socket_child_frame=lumbar1_offset
      PhysicalOffsetFrame lumbar2_offset: socket_parent=/bodyset/lumbar2 translation=(0 0.02803205 0)
          orientation=(0 0 0.10472)
      PhysicalOffsetFrame lumbar1_offset: socket_parent=/bodyset/lumbar1 translation=(0 0 0)
    CustomJoint T12_L1_IVDjnt: socket_parent_frame=lumbar1_offset socket_child_frame=thoracic12_offset
      Coordinate T12_L1_FE: default_value=0 range=(-0.1745329 0.1745329) clamped=true
      Coordinate T12_L1_LB: default_value=0 range=(-0.1745329 0.1745329) clamped=true
      Coordinate T12_L1_AR: default_value=0 range=(-0.1745329 0.1745329) clamped=true
      PhysicalOffsetFrame lumbar1_offset: socket_parent=/bodyset/lumbar1 translation=(0 0.02921988 0)
          orientation=(0 0 -0.034907)
      PhysicalOffsetFrame thoracic12_offset: socket_parent=/bodyset/thoracic12 translation=(0 0 0)
      SpatialTransform: axes_held_at_zero=(translation1 translation2 translation3)
        TransformAxis rotation1: coordinates=T12_L1_FE axis=(0 0 1) LinearFunction(coefficients=1 0)
        TransformAxis rotation2: coordinates=T12_L1_LB axis=(1 0 0) LinearFunction(coefficients=1 0)
        TransformAxis rotation3: coordinates=T12_L1_AR axis=(0 1 0) LinearFunction(coefficients=1 0)
    CustomJoint T11_T12_IVDjnt: socket_parent_frame=thoracic12_offset socket_child_frame=thoracic11_offset
      Coordinate T11_T12_FE: default_value=0 range=(-0.1745329 0.1745329) clamped=true
      Coordinate T11_T12_LB: default_value=0 range=(-0.1745329 0.1745329) clamped=true
      Coordinate T11_T12_AR: default_value=0 range=(-0.1745329 0.1745329) clamped=true
      PhysicalOffsetFrame thoracic12_offset: socket_parent=/bodyset/thoracic12 translation=(0 0.02785342 0)
          orientation=(0 0 -0.069813)
      PhysicalOffsetFrame thoracic11_offset: socket_parent=/bodyset/thoracic11 translation=(0 0 0)
      SpatialTransform: axes_held_at_zero=(translation1 translation2 translation3)
        TransformAxis rotation1: coordinates=T11_T12_FE axis=(0 0 1) LinearFunction(coefficients=1 0)
        TransformAxis rotation2: coordinates=T11_T12_LB axis=(1 0 0) LinearFunction(coefficients=1 0)
        TransformAxis rotation3: coordinates=T11_T12_AR axis=(0 1 0) LinearFunction(coefficients=1 0)
    CustomJoint T10_T11_IVDjnt: socket_parent_frame=thoracic11_offset socket_child_frame=thoracic10_offset
      Coordinate T10_T11_FE: default_value=0 range=(-0.1745329 0.1745329) clamped=true
      Coordinate T10_T11_LB: default_value=0 range=(-0.1745329 0.1745329) clamped=true
      Coordinate T10_T11_AR: default_value=0 range=(-0.1745329 0.1745329) clamped=true
      PhysicalOffsetFrame thoracic11_offset: socket_parent=/bodyset/thoracic11 translation=(0 0.01910958 0)
          orientation=(0 0 -0.087266)
      PhysicalOffsetFrame thoracic10_offset: socket_parent=/bodyset/thoracic10 translation=(0 0 0)
      SpatialTransform: axes_held_at_zero=(translation1 translation2 translation3)
        TransformAxis rotation1: coordinates=T10_T11_FE axis=(0 0 1) LinearFunction(coefficients=1 0)
        TransformAxis rotation2: coordinates=T10_T11_LB axis=(1 0 0) LinearFunction(coefficients=1 0)
        TransformAxis rotation3: coordinates=T10_T11_AR axis=(0 1 0) LinearFunction(coefficients=1 0)
    CustomJoint T9_T10_IVDjnt: socket_parent_frame=thoracic10_offset socket_child_frame=thoracic9_offset
      Coordinate T9_T10_FE: default_value=0 range=(-0.1745329 0.1745329) clamped=true
      Coordinate T9_T10_LB: default_value=0 range=(-0.1745329 0.1745329) clamped=true
      Coordinate T9_T10_AR: default_value=0 range=(-0.1745329 0.1745329) clamped=true
      PhysicalOffsetFrame thoracic10_offset: socket_parent=/bodyset/thoracic10 translation=(0 0.01875771 0)
          orientation=(0 0 -0.069813)
      PhysicalOffsetFrame thoracic9_offset: socket_parent=/bodyset/thoracic9 translation=(0 0 0)
      SpatialTransform: axes_held_at_zero=(translation1 translation2 translation3)
        TransformAxis rotation1: coordinates=T9_T10_FE axis=(0 0 1) LinearFunction(coefficients=1 0)
        TransformAxis rotation2: coordinates=T9_T10_LB axis=(1 0 0) LinearFunction(coefficients=1 0)
        TransformAxis rotation3: coordinates=T9_T10_AR axis=(0 1 0) LinearFunction(coefficients=1 0)
    CustomJoint T8_T9_IVDjnt: socket_parent_frame=thoracic9_offset socket_child_frame=thoracic8_offset
      Coordinate T8_T9_FE: default_value=0 range=(-0.1745329 0.1745329) clamped=true
      Coordinate T8_T9_LB: default_value=0 range=(-0.1745329 0.1745329) clamped=true
      Coordinate T8_T9_AR: default_value=0 range=(-0.1745329 0.1745329) clamped=true
      PhysicalOffsetFrame thoracic9_offset: socket_parent=/bodyset/thoracic9 translation=(0 0.02061303 0)
          orientation=(0 0 -0.087266)
      PhysicalOffsetFrame thoracic8_offset: socket_parent=/bodyset/thoracic8 translation=(0 0 0)
      SpatialTransform: axes_held_at_zero=(translation1 translation2 translation3)
        TransformAxis rotation1: coordinates=T8_T9_FE axis=(0 0 1) LinearFunction(coefficients=1 0)
        TransformAxis rotation2: coordinates=T8_T9_LB axis=(1 0 0) LinearFunction(coefficients=1 0)
        TransformAxis rotation3: coordinates=T8_T9_AR axis=(0 1 0) LinearFunction(coefficients=1 0)
    WeldJoint T7_T8_IVDjnt: socket_parent_frame=thoracic8_offset socket_child_frame=thoracic7_offset
      PhysicalOffsetFrame thoracic8_offset: socket_parent=/bodyset/thoracic8 translation=(0 0.02018658 0)
          orientation=(0 0 -0.10472)
      PhysicalOffsetFrame thoracic7_offset: socket_parent=/bodyset/thoracic7 translation=(0 0 0)
    WeldJoint T6_T7_IVDjnt: socket_parent_frame=thoracic7_offset socket_child_frame=thoracic6_offset
      PhysicalOffsetFrame thoracic7_offset: socket_parent=/bodyset/thoracic7 translation=(0 0.03089331 0)
          orientation=(0 0 -0.10472)
      PhysicalOffsetFrame thoracic6_offset: socket_parent=/bodyset/thoracic6 translation=(0 0 0)
    WeldJoint T5_T6_IVDjnt: socket_parent_frame=thoracic6_offset socket_child_frame=thoracic5_offset
      PhysicalOffsetFrame thoracic6_offset: socket_parent=/bodyset/thoracic6 translation=(0 0.0305812 0)
          orientation=(0 0 -0.10472)
      PhysicalOffsetFrame thoracic5_offset: socket_parent=/bodyset/thoracic5 translation=(0 0 0)
    WeldJoint T4_T5_IVDjnt: socket_parent_frame=thoracic5_offset socket_child_frame=thoracic4_offset
      PhysicalOffsetFrame thoracic5_offset: socket_parent=/bodyset/thoracic5 translation=(0 0.03128998 0)
          orientation=(0 0 -0.10472)
      PhysicalOffsetFrame thoracic4_offset: socket_parent=/bodyset/thoracic4 translation=(0 0 0)
    WeldJoint T3_T4_IVDjnt: socket_parent_frame=thoracic4_offset socket_child_frame=thoracic3_offset
      PhysicalOffsetFrame thoracic4_offset: socket_parent=/bodyset/thoracic4 translation=(0 0.0291553 0)
          orientation=(0 0 -0.069813)
      PhysicalOffsetFrame thoracic3_offset: socket_parent=/bodyset/thoracic3 translation=(0 0 0)
    WeldJoint T2_T3_IVDjnt: socket_parent_frame=thoracic3_offset socket_child_frame=thoracic2_offset
      PhysicalOffsetFrame thoracic3_offset: socket_parent=/bodyset/thoracic3 translation=(0 0.02645717 0)
          orientation=(0 0 -0.05236)
      PhysicalOffsetFrame thoracic2_offset: socket_parent=/bodyset/thoracic2 translation=(0 0 0)
    CustomJoint T1_T2_IVDjnt: socket_parent_frame=thoracic2_offset socket_child_frame=thoracic1_offset
      Coordinate T1_T2_FE: default_value=0 range=(-0.1745329 0.1745329) clamped=true
      Coordinate T1_T2_LB: default_value=0 range=(-0.1745329 0.1745329) clamped=true
      Coordinate T1_T2_AR: default_value=0 range=(-0.1745329 0.1745329) clamped=true
      PhysicalOffsetFrame thoracic2_offset: socket_parent=/bodyset/thoracic2 translation=(0 0.02414738 0)
          orientation=(0 0 -0.017453)
      PhysicalOffsetFrame thoracic1_offset: socket_parent=/bodyset/thoracic1 translation=(0 0 0)
      SpatialTransform: axes_held_at_zero=(translation1 translation2 translation3)
        TransformAxis rotation1: coordinates=T1_T2_FE axis=(0 0 1) LinearFunction(coefficients=1 0)
        TransformAxis rotation2: coordinates=T1_T2_LB axis=(1 0 0) LinearFunction(coefficients=1 0)
        TransformAxis rotation3: coordinates=T1_T2_AR axis=(0 1 0) LinearFunction(coefficients=1 0)
    CustomJoint T1_head_neck: socket_parent_frame=thoracic1_offset socket_child_frame=head_neck_offset
      Coordinate T1_head_neck_FE: default_value=-1.626151e-9 range=(-1.570796 0.5235988) clamped=true
      Coordinate T1_head_neck_LB: default_value=0 range=(-0.5235988 0.5235988) clamped=true
      Coordinate T1_head_neck_AR: default_value=0 range=(-1.570796 1.570796) clamped=true
      PhysicalOffsetFrame thoracic1_offset: socket_parent=/bodyset/thoracic1 translation=(-0.007424178 0.02414738 0)
          orientation=(0 0 0.5236)
      PhysicalOffsetFrame head_neck_offset: socket_parent=/bodyset/head_neck translation=(0 0 0)
      SpatialTransform: axes_held_at_zero=(translation1 translation2 translation3)
        TransformAxis rotation1: coordinates=T1_head_neck_FE axis=(0 0 1) LinearFunction(coefficients=1 0)
        TransformAxis rotation2: coordinates=T1_head_neck_LB axis=(1 0 0) LinearFunction(coefficients=1 0)
        TransformAxis rotation3: coordinates=T1_head_neck_AR axis=(0 1 0) LinearFunction(coefficients=1 0)
    CustomJoint hip_r: socket_parent_frame=pelvis_offset socket_child_frame=femur_r_offset
      Coordinate hip_flexion_r: default_value=1.59697e-10 range=(-2.094395 3.141593) clamped=true
      Coordinate hip_adduction_r: default_value=-5.586344e-10 range=(-2.094395 1.047198) clamped=true
      Coordinate hip_rotation_r: default_value=0 range=(-1.5708 1.5708) clamped=true
      PhysicalOffsetFrame pelvis_offset: socket_parent=/bodyset/pelvis translation=(-0.08442212 -0.08453688 0.09696082)
          orientation=(-0.01745329 -0.004869469 -0.0699877)
      PhysicalOffsetFrame femur_r_offset: socket_parent=/bodyset/femur_r translation=(0 0 0)
      SpatialTransform: axes_held_at_zero=(translation1 translation2 translation3)
        TransformAxis rotation1: coordinates=hip_flexion_r axis=(0 0 1) LinearFunction(coefficients=1 0)
        TransformAxis rotation2: coordinates=hip_adduction_r axis=(1 0 0) LinearFunction(coefficients=1 0)
        TransformAxis rotation3: coordinates=hip_rotation_r axis=(0 1 0) LinearFunction(coefficients=1 0)
    CustomJoint knee_r: socket_parent_frame=femur_r_offset socket_child_frame=tibia_r_offset
      Coordinate knee_angle_r: default_value=-6.842115e-9 range=(-2.617994 0.1745329) clamped=true
      Coordinate knee_angle_y_r: default_value=-1.91834e-9 range=(-0.1745329 0.1745329) clamped=true
      Coordinate knee_angle_x_r: default_value=-1.91834e-9 range=(-0.1745329 0.1745329) clamped=true
      PhysicalOffsetFrame femur_r_offset: socket_parent=/bodyset/femur_r
          translation=(-0.003610563 -0.3840055 0.005636277) orientation=(0.0246266 0.009005899 0.002635447)
      PhysicalOffsetFrame tibia_r_offset: socket_parent=/bodyset/tibia_r translation=(0 0 0)
      SpatialTransform: axes_held_at_zero=(translation1 translation2 translation3)
        TransformAxis rotation1: coordinates=knee_angle_r axis=(0 0 1) LinearFunction(coefficients=1 0)
        TransformAxis rotation2: coordinates=knee_angle_y_r axis=(0 1 0) LinearFunction(coefficients=1 0)
        TransformAxis rotation3: coordinates=knee_angle_x_r axis=(1 0 0) LinearFunction(coefficients=1 0)
    CustomJoint ankle_r: socket_parent_frame=tibia_r_offset socket_child_frame=talus_r_offset
      Coordinate ankle_angle_r: default_value=-5.516508e-10 range=(-1.570796 1.047198) clamped=true
      PhysicalOffsetFrame tibia_r_offset: socket_parent=/bodyset/tibia_r
          translation=(0.003484617 -0.4011478 0.002850356) orientation=(0.006859144 -0.005375614 0.06714282)
      PhysicalOffsetFrame talus_r_offset: socket_parent=/bodyset/talus_r translation=(0 0 0)
      SpatialTransform: axes_held_at_zero=(rotation2 rotation3 translation1 translation2 translation3)
        TransformAxis rotation1: coordinates=ankle_angle_r axis=(-0.105014 -0.174022 0.979126)
            LinearFunction(coefficients=1 0)
    CustomJoint subtalar_r: socket_parent_frame=talus_r_offset socket_child_frame=calcn_r_offset
      Coordinate subtalar_angle_r: default_value=2.219246e-9 range=(-0.3490659 0.8726646) clamped=true
      PhysicalOffsetFrame talus_r_offset: socket_parent=/bodyset/talus_r
          translation=(-0.03793114 -0.04116796 0.01227921) orientation=(0.07682939 -0.0003490659 -0.06606071)
      PhysicalOffsetFrame calcn_r_offset: socket_parent=/bodyset/calcn_r translation=(0 0 0)
      SpatialTransform: axes_held_at_zero=(rotation2 rotation3 translation1 translation2 translation3)
        TransformAxis rotation1: coordinates=subtalar_angle_r axis=(0 1 0) LinearFunction(coefficients=1 0)
    CustomJoint mtp_r: socket_parent_frame=calcn_r_offset socket_child_frame=toes_r_offset
      Coordinate mtp_angle_r: default_value=-4.818375e-5 range=(-0.2617994 0) clamped=true
      PhysicalOffsetFrame calcn_r_offset: socket_parent=/bodyset/calcn_r
          translation=(0.1635088 -0.002684616 -0.0009181699)
      PhysicalOffsetFrame toes_r_offset: socket_parent=/bodyset/toes_r translation=(0 0 0)
      SpatialTransform: axes_held_at_zero=(rotation2 rotation3 translation1 translation2 translation3)
        TransformAxis rotation1: coordinates=mtp_angle_r axis=(-0.580954 0 0.813936) LinearFunction(coefficients=1 0)
    CustomJoint hip_l: socket_parent_frame=pelvis_offset socket_child_frame=femur_l_offset
      Coordinate hip_flexion_l: default_value=1.59697e-10 range=(-2.094395 3.141593) clamped=true
      Coordinate hip_adduction_l: default_value=-5.586344e-10 range=(-2.094395 1.047198) clamped=true
      Coordinate hip_rotation_l: default_value=0 range=(-1.5708 1.5708) clamped=true
      PhysicalOffsetFrame pelvis_offset: socket_parent=/bodyset/pelvis
          translation=(-0.08442212 -0.08453688 -0.09696082) orientation=(0.01745329 0.004869469 -0.0699877)
      PhysicalOffsetFrame femur_l_offset: socket_parent=/bodyset/femur_l translation=(0 0 0)
      SpatialTransform: axes_held_at_zero=(translation1 translation2 translation3)
        TransformAxis rotation1: coordinates=hip_flexion_l axis=(0 0 1) LinearFunction(coefficients=1 0)
        TransformAxis rotation2: coordinates=hip_adduction_l axis=(-1 0 0) LinearFunction(coefficients=1 0)
        TransformAxis rotation3: coordinates=hip_rotation_l axis=(0 -1 0) LinearFunction(coefficients=1 0)
    CustomJoint knee_l: socket_parent_frame=femur_l_offset socket_child_frame=tibia_l_offset
      Coordinate knee_angle_l: default_value=-6.842115e-9 range=(-2.617994 0.1745329) clamped=true
      Coordinate knee_angle_y_l: default_value=-1.91834e-9 range=(-0.1745329 0.1745329) clamped=true
      Coordinate knee_angle_x_l: default_value=-1.91834e-9 range=(-0.1745329 0.1745329) clamped=true
      PhysicalOffsetFrame femur_l_offset: socket_parent=/bodyset/femur_l
          translation=(-0.003532314 -0.3742692 -0.005514126) orientation=(-0.0246266 -0.009005899 0.002635447)
      PhysicalOffsetFrame tibia_l_offset: socket_parent=/bodyset/tibia_l translation=(0 0 0)
      SpatialTransform: axes_held_at_zero=(translation1 translation2 translation3)
        TransformAxis rotation1: coordinates=knee_angle_l axis=(0 0 1) LinearFunction(coefficients=1 0)
        TransformAxis rotation2: coordinates=knee_angle_y_l axis=(0 1 0) LinearFunction(coefficients=-1 0)
        TransformAxis rotation3: coordinates=knee_angle_x_l axis=(1 0 0) LinearFunction(coefficients=-1 0)
    CustomJoint ankle_l: socket_parent_frame=tibia_l_offset socket_child_frame=talus_l_offset
      Coordinate ankle_angle_l: default_value=-9.948746e-10 range=(-1.570796 0.6981317) clamped=true
      PhysicalOffsetFrame tibia_l_offset: socket_parent=/bodyset/tibia_l
          translation=(0.003623031 -0.4174821 -0.002963575) orientation=(-0.006859144 0.005375614 0.06714282)
      PhysicalOffsetFrame talus_l_offset: socket_parent=/bodyset/talus_l translation=(0 0 0)
      SpatialTransform: axes_held_at_zero=(rotation2 rotation3 translation1 translation2 translation3)
        TransformAxis rotation1: coordinates=ankle_angle_l axis=(0.105014 0.174022 1.047198)
            LinearFunction(coefficients=1 0)
    CustomJoint subtalar_l: socket_parent_frame=talus_l_offset socket_child_frame=calcn_l_offset
      Coordinate subtalar_angle_l: default_value=2.219246e-9 range=(-0.3490659 0.8726646) clamped=true
      PhysicalOffsetFrame talus_l_offset: socket_parent=/bodyset/talus_l
          translation=(-0.03943781 -0.04284427 -0.01276695) orientation=(-0.07682939 0.0003490659 -0.06606071)
      PhysicalOffsetFrame calcn_l_offset: socket_parent=/bodyset/calcn_l translation=(0 0 0)
      SpatialTransform: axes_held_at_zero=(rotation2 rotation3 translation1 translation2 translation3)
        TransformAxis rotation1: coordinates=subtalar_angle_l axis=(0 -1 0) LinearFunction(coefficients=1 0)
    CustomJoint mtp_l: socket_parent_frame=calcn_l_offset socket_child_frame=toes_l_offset
      Coordinate mtp_angle_l: default_value=-4.818375e-5 range=(-0.2617994 0) clamped=true
      PhysicalOffsetFrame calcn_l_offset: socket_parent=/bodyset/calcn_l
          translation=(0.1603936 -0.002394995 0.0009165979)
      PhysicalOffsetFrame toes_l_offset: socket_parent=/bodyset/toes_l translation=(0 0 0)
      SpatialTransform: axes_held_at_zero=(rotation2 rotation3 translation1 translation2 translation3)
        TransformAxis rotation1: coordinates=mtp_angle_l axis=(0.580954 0 0.813936) LinearFunction(coefficients=1 0)
    WeldJoint C7_cerv6: socket_parent_frame=head_neck_offset socket_child_frame=cerv6_offset
      PhysicalOffsetFrame head_neck_offset: socket_parent=/bodyset/head_neck translation=(0.003437646 0.01636535 0)
      PhysicalOffsetFrame cerv6_offset: socket_parent=/bodyset/cerv6 translation=(0 0 0)
    WeldJoint C7_cerv5: socket_parent_frame=head_neck_offset socket_child_frame=cerv5_offset
      PhysicalOffsetFrame head_neck_offset: socket_parent=/bodyset/head_neck translation=(0.00723715 0.03422754 0)
      PhysicalOffsetFrame cerv5_offset: socket_parent=/bodyset/cerv5 translation=(0 0 0)
    WeldJoint C7_cerv4: socket_parent_frame=head_neck_offset socket_child_frame=cerv4_offset
      PhysicalOffsetFrame head_neck_offset: socket_parent=/bodyset/head_neck translation=(0.01031294 0.05338697 0)
      PhysicalOffsetFrame cerv4_offset: socket_parent=/bodyset/cerv4 translation=(0 0 0)
    WeldJoint C7_cerv3: socket_parent_frame=head_neck_offset socket_child_frame=cerv3_offset
      PhysicalOffsetFrame head_neck_offset: socket_parent=/bodyset/head_neck translation=(0.01266501 0.06875444 0)
      PhysicalOffsetFrame cerv3_offset: socket_parent=/bodyset/cerv3 translation=(0 0 0)
    WeldJoint C7_cerv2: socket_parent_frame=head_neck_offset socket_child_frame=cerv2_offset
      PhysicalOffsetFrame head_neck_offset: socket_parent=/bodyset/head_neck translation=(0.01257455 0.08502 0)
      PhysicalOffsetFrame cerv2_offset: socket_parent=/bodyset/cerv2 translation=(0 0 0)
    WeldJoint C7_cerv1: socket_parent_frame=head_neck_offset socket_child_frame=cerv1_offset
      PhysicalOffsetFrame head_neck_offset: socket_parent=/bodyset/head_neck translation=(-0.01963077 0.1027824 0)
      PhysicalOffsetFrame cerv1_offset: socket_parent=/bodyset/cerv1 translation=(0 0 0)
    WeldJoint skull_jaw: socket_parent_frame=skull_offset socket_child_frame=jaw_offset
      PhysicalOffsetFrame skull_offset: socket_parent=/bodyset/skull translation=(0 0 0)
      PhysicalOffsetFrame jaw_offset: socket_parent=/bodyset/jaw translation=(0 0 0)
    CustomJoint C7_skull: socket_parent_frame=head_neck_offset socket_child_frame=skull_offset
      Coordinate skull_z: default_value=0 range=(-0.3490659 0.3490659) clamped=true
      Coordinate skull_y: default_value=0 range=(-0.3490659 0.3490659) clamped=true
      Coordinate skull_x: default_value=0 range=(-0.3490659 0.3490659) clamped=true
      PhysicalOffsetFrame head_neck_offset: socket_parent=/bodyset/head_neck translation=(0.01954031 0.1176509 0)
      PhysicalOffsetFrame skull_offset: socket_parent=/bodyset/skull translation=(0 0 0)
      SpatialTransform: axes_held_at_zero=(translation1 translation2 translation3)
        TransformAxis rotation1: coordinates=skull_z axis=(0 0 1) LinearFunction(coefficients=1 0)
        TransformAxis rotation2: coordinates=skull_y axis=(0 1 0) LinearFunction(coefficients=1 0)
        TransformAxis rotation3: coordinates=skull_x axis=(1 0 0) LinearFunction(coefficients=1 0)
    CustomJoint sternoclavicular: socket_parent_frame=thorax_offset socket_child_frame=clavicle_offset
      Coordinate sternoclavicular_r2: default_value=-0.3801336 range=(-1.5741 0.7854) clamped=true
      Coordinate sternoclavicular_r3: default_value=0.1610066 range=(-0.524 0.524) clamped=true
      PhysicalOffsetFrame thorax_offset: socket_parent=/bodyset/thorax translation=(0.007035762 0.007640566 0.01870063)
      PhysicalOffsetFrame clavicle_offset: socket_parent=/bodyset/clavicle translation=(0 0 0)
      SpatialTransform: axes_held_at_zero=(rotation3 translation1 translation2 translation3)
        TransformAxis rotation1: coordinates=sternoclavicular_r2 axis=(0.0153 0.989299 -0.1451)
            LinearFunction(coefficients=1 0)
        TransformAxis rotation2: coordinates=sternoclavicular_r3 axis=(-0.994473 0 -0.104997)
            LinearFunction(coefficients=1 0)
    CustomJoint unrotscap: socket_parent_frame=clavicle_offset socket_child_frame=clavphant_offset
      Coordinate unrotscap_r3: default_value=-0.1610066 range=(-4.7123 4.7123) clamped=true
      Coordinate unrotscap_r2: default_value=0.3801336 range=(-4.7123 4.7123) clamped=true
      PhysicalOffsetFrame clavicle_offset: socket_parent=/bodyset/clavicle
          translation=(-0.01230029 0.0181562 0.09962009)
      PhysicalOffsetFrame clavphant_offset: socket_parent=/bodyset/clavphant translation=(0 0 0)
      SpatialTransform: axes_held_at_zero=(rotation3 translation1 translation2 translation3)
        TransformAxis rotation1: coordinates=unrotscap_r3 axis=(-0.994473 0 -0.104997) LinearFunction(coefficients=1 0)
        TransformAxis rotation2: coordinates=unrotscap_r2 axis=(0.0153 0.989299 -0.1451)
            LinearFunction(coefficients=1 0)
    CustomJoint acromioclavicular: socket_parent_frame=clavphant_offset socket_child_frame=scapula_offset
      Coordinate acromioclavicular_r2: default_value=-0.07696931 range=(-1.5708 1.5708) clamped=true
      Coordinate acromioclavicular_r3: default_value=0.6220389 range=(-4.7123 4.7123) clamped=true
      Coordinate acromioclavicular_r1: default_value=0.2796022 range=(-4.7123 4.7123) clamped=true
      PhysicalOffsetFrame clavphant_offset: socket_parent=/bodyset/clavphant translation=(0 0 0)
      PhysicalOffsetFrame scapula_offset: socket_parent=/bodyset/scapula translation=(0 0 0)
      SpatialTransform: axes_held_at_zero=(translation1 translation2 translation3)
        TransformAxis rotation1: coordinates=acromioclavicular_r2 axis=(0.157095 0.947269 -0.279291)
            LinearFunction(coefficients=1 0)
        TransformAxis rotation2: coordinates=acromioclavicular_r3 axis=(-0.754084 0.297594 0.585487)
            LinearFunction(coefficients=1 0)
        TransformAxis rotation3: coordinates=acromioclavicular_r1 axis=(0.6377 0.1186 0.7611)
            LinearFunction(coefficients=1 0)
    CustomJoint unrothum: socket_parent_frame=scapula_offset socket_child_frame=scapphant_offset
      Coordinate unrothum_r1: default_value=-0.2796022 range=(-4.7123 4.7123) clamped=true
      Coordinate unrothum_r3: default_value=-0.6220389 range=(-4.7123 4.7123) clamped=true
      Coordinate unrothum_r2: default_value=0.07696931 range=(-4.7123 4.7123) clamped=true
      PhysicalOffsetFrame scapula_offset: socket_parent=/bodyset/scapula
          translation=(-0.01062317 -0.03748618 0.006615124)
      PhysicalOffsetFrame scapphant_offset: socket_parent=/bodyset/scapphant translation=(0 0 0)
      SpatialTransform: axes_held_at_zero=(translation1 translation2 translation3)
        TransformAxis rotation1: coordinates=unrothum_r1 axis=(0.6377 0.1186 0.7611) LinearFunction(coefficients=1 0)
        TransformAxis rotation2: coordinates=unrothum_r3 axis=(-0.754084 0.297594 0.585487)
            LinearFunction(coefficients=1 0)
        TransformAxis rotation3: coordinates=unrothum_r2 axis=(0.157095 0.947269 -0.279291)
            LinearFunction(coefficients=1 0)
    CustomJoint shoulder0: socket_parent_frame=scapphant_offset socket_child_frame=humphant_offset
      Coordinate elv_angle: default_value=5.025469e-10 range=(-1.570796 3.141593) clamped=true
      PhysicalOffsetFrame scapphant_offset: socket_parent=/bodyset/scapphant translation=(0 0 0)
      PhysicalOffsetFrame humphant_offset: socket_parent=/bodyset/humphant translation=(0 0 0)
      SpatialTransform: axes_held_at_zero=(rotation2 rotation3 translation1 translation2 translation3)
        TransformAxis rotation1: coordinates=elv_angle axis=(0.0048 0.999089 0.0424) LinearFunction(coefficients=1 0)
    CustomJoint shoulder1: socket_parent_frame=humphant_offset socket_child_frame=humphant1_offset
      Coordinate shoulder_elv: default_value=1.570796 range=(-0.1745329 3.141593) clamped=true
      Coordinate shoulder1_r2: default_value=-5.02547e-10 range=(-4.7123 4.7123) clamped=true
      PhysicalOffsetFrame humphant_offset: socket_parent=/bodyset/humphant translation=(0 0 0)
      PhysicalOffsetFrame humphant1_offset: socket_parent=/bodyset/humphant1 translation=(0 0 0)
      SpatialTransform: axes_held_at_zero=(rotation3 translation1 translation2 translation3)
        TransformAxis rotation1: coordinates=shoulder_elv axis=(-0.998261 0.0023 0.058898)
            LinearFunction(coefficients=1 0)
        TransformAxis rotation2: coordinates=shoulder1_r2 axis=(0.0048 0.999089 0.0424)
            LinearFunction(coefficients=1 0)
    CustomJoint shoulder2: socket_parent_frame=humphant1_offset socket_child_frame=humerus_offset
      Coordinate shoulder_rot: default_value=-1.71996e-12 range=(-1.570796 1.570796) clamped=true
      PhysicalOffsetFrame humphant1_offset: socket_parent=/bodyset/humphant1 translation=(0 0 0)
      PhysicalOffsetFrame humerus_offset: socket_parent=/bodyset/humerus translation=(0 0 0)
      SpatialTransform: axes_held_at_zero=(rotation2 rotation3 translation1 translation2 translation3)
        TransformAxis rotation1: coordinates=shoulder_rot axis=(0.0048 0.999089 0.0424)
            LinearFunction(coefficients=1 0)
    CustomJoint elbow: socket_parent_frame=humerus_offset socket_child_frame=ulna_offset
      Coordinate elbow_flexion: default_value=3.237372e-9 range=(-0.3490659 3.141593) clamped=true
      Coordinate elbow_x: default_value=0 range=(-0.6981317 0.6981317) clamped=true
      Coordinate elbow_y: default_value=0 range=(-0.6981317 0.6981317) clamped=true
      PhysicalOffsetFrame humerus_offset: socket_parent=/bodyset/humerus
          translation=(0.006285695 -0.3165621 -0.01267443)
      PhysicalOffsetFrame ulna_offset: socket_parent=/bodyset/ulna translation=(0 0 0)
      SpatialTransform: axes_held_at_zero=(translation1 translation2 translation3)
        TransformAxis rotation1: coordinates=elbow_flexion axis=(0.0494 0.0366 0.998108)
            LinearFunction(coefficients=1 0)
        TransformAxis rotation2: coordinates=elbow_x axis=(1 0 0) LinearFunction(coefficients=1 0)
        TransformAxis rotation3: coordinates=elbow_y axis=(0 1 0) LinearFunction(coefficients=1 0)
    CustomJoint radioulnar: socket_parent_frame=ulna_offset socket_child_frame=radius_offset
      Coordinate pro_sup: default_value=-3.534157e-10 range=(-3.316126 1.570796) clamped=true
      PhysicalOffsetFrame ulna_offset: socket_parent=/bodyset/ulna translation=(0.0003206243 -0.011828 0.01603041)
      PhysicalOffsetFrame radius_offset: socket_parent=/bodyset/radius translation=(0 0 0)
      SpatialTransform: axes_held_at_zero=(rotation2 rotation3 translation1 translation2 translation3)
        TransformAxis rotation1: coordinates=pro_sup axis=(-0.017161 0.992666 -0.119668)
            LinearFunction(coefficients=1 0)
    CustomJoint radiocarpal: socket_parent_frame=radius_offset socket_child_frame=lunate_offset
      Coordinate deviation: default_value=6.041194e-10 range=(-0.4363323 0.6108652) clamped=true
      Coordinate flexion: default_value=0 range=(-1.22173 1.22173) clamped=true
      PhysicalOffsetFrame radius_offset: socket_parent=/bodyset/radius translation=(0.01442809 -0.2488374 0.02003902)
      PhysicalOffsetFrame lunate_offset: socket_parent=/bodyset/lunate translation=(0 0 0)
      SpatialTransform: axes_held_at_zero=(rotation3 translation1 translation2 translation3)
        TransformAxis rotation1: coordinates=deviation axis=(0 0 1) LinearFunction(coefficients=1 0)
        TransformAxis rotation2: coordinates=flexion axis=(1 0 0) LinearFunction(coefficients=1 0)
    CustomJoint sternoclavicular_l: socket_parent_frame=thorax_offset socket_child_frame=clavicle_l_offset
      Coordinate sternoclavicular_r2_l: default_value=-0.3801336 range=(-1.571 0.7854) clamped=true
      Coordinate sternoclavicular_r3_l: default_value=0.1610066 range=(-0.524 0.524) clamped=true
      PhysicalOffsetFrame thorax_offset: socket_parent=/bodyset/thorax
          translation=(0.007035762 0.007640566 -0.01870063)
      PhysicalOffsetFrame clavicle_l_offset: socket_parent=/bodyset/clavicle_l translation=(0 0 0)
      SpatialTransform: axes_held_at_zero=(rotation3 translation1 translation2 translation3)
        TransformAxis rotation1: coordinates=sternoclavicular_r2_l axis=(-0.0153 -0.989299 -0.1451)
            LinearFunction(coefficients=1 0)
        TransformAxis rotation2: coordinates=sternoclavicular_r3_l axis=(0.994473 0 -0.104997)
            LinearFunction(coefficients=1 0)
    CustomJoint unrotscap_l: socket_parent_frame=clavicle_l_offset socket_child_frame=clavphant_l_offset
      Coordinate unrotscap_r3_l: default_value=-0.1610066 range=(-4.7123 4.7123) clamped=true
      Coordinate unrotscap_r2_l: default_value=0.3801336 range=(-4.7123 4.7123) clamped=true
      PhysicalOffsetFrame clavicle_l_offset: socket_parent=/bodyset/clavicle_l
          translation=(-0.01226062 0.0181562 -0.09910058)
      PhysicalOffsetFrame clavphant_l_offset: socket_parent=/bodyset/clavphant_l translation=(0 0 0)
      SpatialTransform: axes_held_at_zero=(rotation3 translation1 translation2 translation3)
        TransformAxis rotation1: coordinates=unrotscap_r3_l axis=(0.994473 0 -0.104997)
            LinearFunction(coefficients=1 0)
        TransformAxis rotation2: coordinates=unrotscap_r2_l axis=(-0.0153 -0.989299 -0.1451)
            LinearFunction(coefficients=1 0)
    CustomJoint acromioclavicular_l: socket_parent_frame=clavphant_l_offset socket_child_frame=scapula_l_offset
      Coordinate acromioclavicular_r2_l: default_value=-0.07696931 range=(-1.5708 1.5708) clamped=true
      Coordinate acromioclavicular_r3_l: default_value=0.6220389 range=(-4.7123 4.7123) clamped=true
      Coordinate acromioclavicular_r1_l: default_value=0.2796022 range=(-4.7123 4.7123) clamped=true
      PhysicalOffsetFrame clavphant_l_offset: socket_parent=/bodyset/clavphant_l translation=(0 0 0)
      PhysicalOffsetFrame scapula_l_offset: socket_parent=/bodyset/scapula_l translation=(0 0 0)
      SpatialTransform: axes_held_at_zero=(translation1 translation2 translation3)
        TransformAxis rotation1: coordinates=acromioclavicular_r2_l axis=(-0.157095 -0.947269 -0.279291)
            LinearFunction(coefficients=1 0)
        TransformAxis rotation2: coordinates=acromioclavicular_r3_l axis=(0.754084 -0.297594 0.585487)
            LinearFunction(coefficients=1 0)
        TransformAxis rotation3: coordinates=acromioclavicular_r1_l axis=(-0.6377 -0.1186 0.7611)
            LinearFunction(coefficients=1 0)
    CustomJoint unrothum_l: socket_parent_frame=scapula_l_offset socket_child_frame=scapphant_l_offset
      Coordinate unrothum_r1_l: default_value=-0.2796022 range=(-4.7123 4.7123) clamped=true
      Coordinate unrothum_r3_l: default_value=-0.6220389 range=(-4.7123 4.7123) clamped=true
      Coordinate unrothum_r2_l: default_value=0.07696931 range=(-4.7123 4.7123) clamped=true
      PhysicalOffsetFrame scapula_l_offset: socket_parent=/bodyset/scapula_l
          translation=(-0.01062317 -0.03748618 -0.006580626)
      PhysicalOffsetFrame scapphant_l_offset: socket_parent=/bodyset/scapphant_l translation=(0 0 0)
      SpatialTransform: axes_held_at_zero=(translation1 translation2 translation3)
        TransformAxis rotation1: coordinates=unrothum_r1_l axis=(-0.6377 -0.1186 0.7611)
            LinearFunction(coefficients=1 0)
        TransformAxis rotation2: coordinates=unrothum_r3_l axis=(0.754084 -0.297594 0.585487)
            LinearFunction(coefficients=1 0)
        TransformAxis rotation3: coordinates=unrothum_r2_l axis=(-0.157095 -0.947269 -0.279291)
            LinearFunction(coefficients=1 0)
    CustomJoint shoulder0_l: socket_parent_frame=scapphant_l_offset socket_child_frame=humphant_l_offset
      Coordinate elv_angle_l: default_value=-1.560377e-9 range=(-1.570796 3.141593) clamped=true
      PhysicalOffsetFrame scapphant_l_offset: socket_parent=/bodyset/scapphant_l translation=(0 0 0)
      PhysicalOffsetFrame humphant_l_offset: socket_parent=/bodyset/humphant_l translation=(0 0 0)
      SpatialTransform: axes_held_at_zero=(rotation2 rotation3 translation1 translation2 translation3)
        TransformAxis rotation1: coordinates=elv_angle_l axis=(-0.0048 -0.999089 0.0424)
            LinearFunction(coefficients=1 0)
    CustomJoint shoulder1_l: socket_parent_frame=humphant_l_offset socket_child_frame=humphant1_l_offset
      Coordinate shoulder_elv_l: default_value=1.570796 range=(-0.1745329 3.141593) clamped=true
      Coordinate shoulder1_r2_l: default_value=1.849819e-9 range=(-4.7123 4.7123) clamped=true
      PhysicalOffsetFrame humphant_l_offset: socket_parent=/bodyset/humphant_l translation=(0 0 0)
      PhysicalOffsetFrame humphant1_l_offset: socket_parent=/bodyset/humphant1_l translation=(0 0 0)
      SpatialTransform: axes_held_at_zero=(rotation3 translation1 translation2 translation3)
        TransformAxis rotation1: coordinates=shoulder_elv_l axis=(0.998261 -0.0023 0.058898)
            LinearFunction(coefficients=1 0)
        TransformAxis rotation2: coordinates=shoulder1_r2_l axis=(-0.0048 -0.999089 0.0424)
            LinearFunction(coefficients=1 0)
    CustomJoint shoulder2_l: socket_parent_frame=humphant1_l_offset socket_child_frame=humerus_l_offset
      Coordinate shoulder_rot_l: default_value=-1.289462e-12 range=(-1.570796 1.570796) clamped=true
      PhysicalOffsetFrame humphant1_l_offset: socket_parent=/bodyset/humphant1_l translation=(0 0 0)
      PhysicalOffsetFrame humerus_l_offset: socket_parent=/bodyset/humerus_l translation=(0 0 0)
      SpatialTransform: axes_held_at_zero=(rotation2 rotation3 translation1 translation2 translation3)
        TransformAxis rotation1: coordinates=shoulder_rot_l axis=(-0.0048 -0.999089 0.0424)
            LinearFunction(coefficients=1 0)
    CustomJoint elbow_l: socket_parent_frame=humerus_l_offset socket_child_frame=ulna_l_offset
      Coordinate elbow_flexion_l: default_value=3.237372e-9 range=(-0.3490659 3.141593) clamped=true
      Coordinate elbow_x_l: default_value=0 range=(-0.6981317 0.6981317) clamped=true
      Coordinate elbow_y_l: default_value=0 range=(-0.6981317 0.6981317) clamped=true
      PhysicalOffsetFrame humerus_l_offset: socket_parent=/bodyset/humerus_l
          translation=(0.00622389 -0.3148836 0.01254981)
      PhysicalOffsetFrame ulna_l_offset: socket_parent=/bodyset/ulna_l translation=(0 0 0)
      SpatialTransform: axes_held_at_zero=(translation1 translation2 translation3)
        TransformAxis rotation1: coordinates=elbow_flexion_l axis=(-0.0494 -0.0366 0.998108)
            LinearFunction(coefficients=1 0)
        TransformAxis rotation2: coordinates=elbow_x_l axis=(-1 0 0) LinearFunction(coefficients=1 0)
        TransformAxis rotation3: coordinates=elbow_y_l axis=(0 -1 0) LinearFunction(coefficients=1 0)
    CustomJoint radioulnar_l: socket_parent_frame=ulna_l_offset socket_child_frame=radius_l_offset
      Coordinate pro_sup_l: default_value=-3.534157e-10 range=(-3.316126 1.570796) clamped=true
      PhysicalOffsetFrame ulna_l_offset: socket_parent=/bodyset/ulna_l translation=(0.0003147547 -0.011856 -0.01573695)
      PhysicalOffsetFrame radius_l_offset: socket_parent=/bodyset/radius_l translation=(0 0 0)
      SpatialTransform: axes_held_at_zero=(rotation2 rotation3 translation1 translation2 translation3)
        TransformAxis rotation1: coordinates=pro_sup_l axis=(0.017161 -0.992666 -0.119668)
            LinearFunction(coefficients=1 0)
    CustomJoint radiocarpal_l: socket_parent_frame=radius_l_offset socket_child_frame=lunate_l_offset
      Coordinate deviation_l: default_value=6.041194e-10 range=(-0.4363323 0.6108652) clamped=true
      Coordinate flexion_l: default_value=0 range=(-1.22173 1.22173) clamped=true
      PhysicalOffsetFrame radius_l_offset: socket_parent=/bodyset/radius_l
          translation=(0.01416396 -0.2494265 -0.01967217)
      PhysicalOffsetFrame lunate_l_offset: socket_parent=/bodyset/lunate_l translation=(0 0 0)
      SpatialTransform: axes_held_at_zero=(rotation3 translation1 translation2 translation3)
        TransformAxis rotation1: coordinates=deviation_l axis=(0 0 1) LinearFunction(coefficients=1 0)
        TransformAxis rotation2: coordinates=flexion_l axis=(1 0 0) LinearFunction(coefficients=-1 0)
    CustomJoint T1_rib: socket_parent_frame=thoracic1_offset socket_child_frame=thorax_offset
      Coordinate ribs_bending: default_value=0 range=(-0.3490659 0.3490659) clamped=true
      PhysicalOffsetFrame thoracic1_offset: socket_parent=/bodyset/thoracic1 translation=(-0.001448027 0.01084064 0)
      PhysicalOffsetFrame thorax_offset: socket_parent=/bodyset/thorax translation=(-0.0806453 0.0342839 0)
          orientation=(0 0 -0.35)
      SpatialTransform: axes_held_at_zero=(rotation2 rotation3 translation1 translation2 translation3)
        TransformAxis rotation1: coordinates=ribs_bending axis=(0 0 1) LinearFunction(coefficients=1 0)
  ConstraintSet:
    CoordinateCouplerConstraint sternoclavicular_r2_con: isEnforced=false independent_coordinate_names=shoulder_elv
        dependent_coordinate_name=sternoclavicular_r2 scale_factor=1
      coupled_coordinates_function: SimmSpline f0: x=(0 2.61799) y=(0 -0.633555)
    CoordinateCouplerConstraint sternoclavicular_r3_con: isEnforced=false independent_coordinate_names=shoulder_elv
        dependent_coordinate_name=sternoclavicular_r3
      coupled_coordinates_function: SimmSpline f1: x=(0 3.14159) y=(0 0.322013)
    CoordinateCouplerConstraint unrotscap_r2_con: independent_coordinate_names=shoulder_elv
        dependent_coordinate_name=unrotscap_r2
      coupled_coordinates_function: SimmSpline f2: x=(0 2.61799) y=(0 0.633555)
    CoordinateCouplerConstraint unrotscap_r3_con: independent_coordinate_names=shoulder_elv
        dependent_coordinate_name=unrotscap_r3
      coupled_coordinates_function: SimmSpline f3: x=(0 3.14159) y=(0 -0.322013)
    CoordinateCouplerConstraint acromioclavicular_r1_con: independent_coordinate_names=shoulder_elv
        dependent_coordinate_name=acromioclavicular_r1
      coupled_coordinates_function: SimmSpline f4: x=(0 2.61799) y=(0 0.466003)
    CoordinateCouplerConstraint acromioclavicular_r2_con: isEnforced=false independent_coordinate_names=shoulder_elv
        dependent_coordinate_name=acromioclavicular_r2
      coupled_coordinates_function: SimmSpline f5: x=(0 2.61799) y=(0 -0.128282)
    CoordinateCouplerConstraint acromioclavicular_r3_con: independent_coordinate_names=shoulder_elv
        dependent_coordinate_name=acromioclavicular_r3
      coupled_coordinates_function: SimmSpline f6: x=(0 2.61799) y=(0 1.03673)
    CoordinateCouplerConstraint unrothum_r1_con: independent_coordinate_names=shoulder_elv
        dependent_coordinate_name=unrothum_r1
      coupled_coordinates_function: SimmSpline f7: x=(0 2.61799) y=(0 -0.466003)
    CoordinateCouplerConstraint unrothum_r2_con: independent_coordinate_names=shoulder_elv
        dependent_coordinate_name=unrothum_r2
      coupled_coordinates_function: SimmSpline f8: x=(0 2.61799) y=(0 0.128282)
    CoordinateCouplerConstraint unrothum_r3_con: independent_coordinate_names=shoulder_elv
        dependent_coordinate_name=unrothum_r3
      coupled_coordinates_function: SimmSpline f9: x=(0 2.61799) y=(0 -1.03673)
    CoordinateCouplerConstraint shoulder1_r2_con: independent_coordinate_names=elv_angle
        dependent_coordinate_name=shoulder1_r2
      coupled_coordinates_function: SimmSpline f11: x=(-1.5708 3.14159) y=(1.5708 -3.14159)
    CoordinateCouplerConstraint sternoclavicular_r2_con_l: isEnforced=false independent_coordinate_names=shoulder_elv_l
        dependent_coordinate_name=sternoclavicular_r2_l
      coupled_coordinates_function: SimmSpline f0_l: x=(0 2.61799) y=(0 -0.633555)
    CoordinateCouplerConstraint sternoclavicular_r3_con_l: isEnforced=false independent_coordinate_names=shoulder_elv_l
        dependent_coordinate_name=sternoclavicular_r3_l
      coupled_coordinates_function: SimmSpline f1_l: x=(0 3.14159) y=(0 0.322013)
    CoordinateCouplerConstraint unrotscap_r2_con_l: independent_coordinate_names=shoulder_elv_l
        dependent_coordinate_name=unrotscap_r2_l
      coupled_coordinates_function: SimmSpline f2_l: x=(0 2.61799) y=(0 0.633555)
    CoordinateCouplerConstraint unrotscap_r3_con_l: independent_coordinate_names=shoulder_elv_l
        dependent_coordinate_name=unrotscap_r3_l
      coupled_coordinates_function: SimmSpline f3_l: x=(0 3.14159) y=(0 -0.322013)
    CoordinateCouplerConstraint acromioclavicular_r1_con_l: independent_coordinate_names=shoulder_elv_l
        dependent_coordinate_name=acromioclavicular_r1_l
      coupled_coordinates_function: SimmSpline f4_l: x=(0 2.61799) y=(0 0.466003)
    CoordinateCouplerConstraint acromioclavicular_r2_con_l: isEnforced=false
        independent_coordinate_names=shoulder_elv_l dependent_coordinate_name=acromioclavicular_r2_l
      coupled_coordinates_function: SimmSpline f5_l: x=(0 2.61799) y=(0 -0.128282)
    CoordinateCouplerConstraint acromioclavicular_r3_con_l: independent_coordinate_names=shoulder_elv_l
        dependent_coordinate_name=acromioclavicular_r3_l
      coupled_coordinates_function: SimmSpline f6_l: x=(0 2.61799) y=(0 1.03673)
    CoordinateCouplerConstraint unrothum_r1_con_l: independent_coordinate_names=shoulder_elv_l
        dependent_coordinate_name=unrothum_r1_l
      coupled_coordinates_function: SimmSpline f7_l: x=(0 2.61799) y=(0 -0.466003)
    CoordinateCouplerConstraint unrothum_r2_con_l: independent_coordinate_names=shoulder_elv_l
        dependent_coordinate_name=unrothum_r2_l
      coupled_coordinates_function: SimmSpline f8_l: x=(0 2.61799) y=(0 0.128282)
    CoordinateCouplerConstraint unrothum_r3_con_l: independent_coordinate_names=shoulder_elv_l
        dependent_coordinate_name=unrothum_r3_l
      coupled_coordinates_function: SimmSpline f9_l: x=(0 2.61799) y=(0 -1.03673)
  MarkerSet:
    Marker C7: head_neck (-0.02531503 0.01076677 0.001796667) fixed=true
    Marker T8: thoracic8 (-0.049728 0.009608534 -1.22217e-10) fixed=true
    Marker T12: thoracic12 (-0.05093013 0.01552593 2.268657e-10) fixed=true
    Marker RASI: pelvis (0.007387196 -0.008238445 0.1287534) fixed=true
    Marker RPSI: pelvis (-0.1913608 0.06978129 0.05896352) fixed=true
    Marker LPSI: pelvis (-0.1913608 0.06978129 -0.05896352) fixed=true
    Marker LASI: pelvis (0.007704155 -0.003016577 -0.1247309) fixed=true
    Marker RHIPJ: pelvis (-0.08674198 -0.08320008 0.06882459) fixed=true
    Marker LHIPJ: pelvis (-0.08674198 -0.08328993 -0.06949161) fixed=true
    Marker MHIPJ: pelvis (-0.08674198 -0.083245 -0.0003335124) fixed=true
    Marker Spine1: lumbar4 (0.01474246 0.007405863 0.00313627)
    Marker LSHO: scapula_l (-0.008723351 0.007355656 0.006014106) fixed=true
    Marker RSHO: scapula (-0.008723351 0.007355656 -0.006045633) fixed=true
    Marker RCLAV: clavicle (0.00655231 -0.001986468 0.04313437)
    Marker LCLAV: clavicle_l (0.007993038 0.0001640253 -0.04455022)
    Marker CLAV: thorax (0.01410445 -0.003724561 0) fixed=true
    Marker STRN: thorax (0.08985964 -0.1913868 0)
    Marker RELB: humerus (-0.0008692594 -0.3105028 0.03141576) fixed=true
    Marker RELBIN: humerus (0.007151338 -0.320867 -0.05444779) fixed=true
    Marker ROWR: ulna (-0.01241329 -0.2481433 0.03739497) fixed=true
    Marker T10: thoracic10 (-0.05024563 0.009939657 2.155757e-10) fixed=true
    Marker RIWR: radius (0.04347786 -0.2354238 0.0219489) fixed=true
    Marker RWRIST: radius (0.01059828 -0.2464057 0.01956983)
    Marker MPSI: pelvis (-0.1901795 0.07123456 0.0007876504)
    Marker MASI: pelvis (0.007545675 -0.005627511 0.002011216) fixed=true
    Marker RELC: humerus (0.004671908 -0.3187102 -0.01664939)
    Marker LELB: humerus_l (-0.0001610007 -0.3074419 -0.0312917) fixed=true
    Marker LELBIN: humerus_l (0.004319769 -0.3185584 0.05398643) fixed=true
    Marker LOWR: ulna_l (-0.01218608 -0.2487303 -0.03671041) fixed=true
    Marker LIWR: radius_l (0.04268192 -0.2359815 -0.02154704) fixed=true
    Marker LWRIST: radius_l (0.01148558 -0.242167 -0.01922643)
    Marker LELC: humerus_l (-9.042309e-5 -0.3190092 0.01542891)
    Marker CENTER: pelvis (-0.09190758 0.03207689 0.001005608) fixed=true
    Marker ROOT: pelvis (-0.07150948 0.008486456 0.002153157)
    Marker Spine2: thoracic11 (0.04316142 -0.01123591 -0.00129096)
    Marker Spine3: thoracic9 (0.0837082 0.0002830531 -0.00235734)
    Marker NECK: head_neck (0.02192442 0.004923658 0.001622953)
    Marker LCOL: scapula_l (-0.03995041 -0.05581923 0.05050212)
    Marker RCOL: scapula (-0.04531879 -0.05738256 -0.05331016)
    Marker LSHOULDER: humerus_l (-0.0213593 -0.05558396 0.01369283)
    Marker RSHOULDER: humerus (-0.02273671 -0.06181519 -0.01802462)
    Marker T1: thoracic1 (-0.04027917 0.003454869 -4.898449e-18) fixed=true
    Marker RKNE: femur_r (0.005946138 -0.3773612 0.0506225) fixed=true
    Marker RKNI: femur_r (0.009189742 -0.3813687 -0.06326753) fixed=true
    Marker LKNE: femur_l (0.005821837 -0.3760455 -0.04817587) fixed=true
    Marker LKNI: femur_l (0.009025922 -0.3794435 0.06423202) fixed=true
    Marker Virtual_LKJC: femur_l (0.00742388 -0.3777445 0.008028076) fixed=true
    Marker Virtual_RKJC: femur_r (0.00756794 -0.379365 -0.006322513) fixed=true
    Marker LKJC: femur_l (0.005402125 -0.3806901 -0.00402224)
    Marker RKJC: femur_r (0.006999375 -0.3882154 0.007885925)
    Marker LANK: tibia_l (0.002635636 -0.4083293 -0.03828316) fixed=true
    Marker RANK: tibia_r (0.005880104 -0.3970388 0.03679086) fixed=true
    Marker LANI: tibia_l (-0.005212197 -0.3912408 0.02378067) fixed=true
    Marker RANI: tibia_r (-0.004643435 -0.3795428 -0.02278765) fixed=true
    Marker Virtual_LAJC: tibia_l (-0.001288281 -0.3997851 -0.007251245) fixed=true
    Marker Virtual_RAJC: tibia_r (0.0006183346 -0.3882908 0.007001607) fixed=true
    Marker LAJC: tibia_l (0.003514023 -0.4119229 0.00620481)
    Marker RAJC: tibia_r (0.005447126 -0.409446 -0.005297581)
    Marker LFOOT: toes_l (-0.0007116579 0.004680253 -0.01092639) fixed=true
    Marker RFOOT: toes_r (0.002397595 0.002999435 0.01637397) fixed=true
    Marker LHEE: calcn_l (-0.01630368 -0.000405336 0.006166782) fixed=true
    Marker RHEE: calcn_r (-0.01591284 -0.01143466 -0.005214091) fixed=true
    Marker LMT5: toes_l (-0.01154943 0.01680616 -0.05189431) fixed=true
    Marker RMT5: toes_r (-0.01156927 0.01649166 0.0509233) fixed=true
    Marker RMT1: calcn_r (0.1594134 0.009877995 -0.02910845) fixed=true
    Marker LMT1: calcn_l (0.1563761 0.008812362 0.02905864) fixed=true
    Marker RTOE: toes_r (0.0470246 0.007205854 -0.03776125) fixed=true
    Marker LTOE: toes_l (0.04694409 0.007343263 0.03848132) fixed=true
    Marker LBHD: skull (-0.07577327 0.1122071 -0.04326625) fixed=true
    Marker RFHD: skull (0.05741218 0.1126628 0.05158551) fixed=true
    Marker RBHD: skull (-0.07442 0.112365 0.0432663) fixed=true
    Marker LFHD: skull (0.05958005 0.1129213 -0.05145154) fixed=true
    Marker HEAD: skull (0.0350909 -0.0415503 0)
    Marker Virtual_Ground_RAJC: calcn_r (0.03626756 -0.02697589 -0.009038737) fixed=true
    Marker Virtual_Ground_LAJC: calcn_l (0.03557659 -0.02406568 0.009023261) fixed=true
    Marker Virtual_Ground_RHEE: calcn_r (-0.01608208 -0.03045046 -0.005519009) fixed=true
    Marker Virtual_Ground_LHEE: calcn_l (-0.01577564 -0.02716543 0.005509557) fixed=true
    Marker Virtual_Ground_RFOOT: calcn_r (0.1662153 -0.01442981 0.01139306) fixed=true
    Marker Virtual_Ground_LFOOT: calcn_l (0.1630485 -0.01287308 -0.01137359) fixed=true
    Marker Virtual_Ground_RFJC: toes_r (0.0366865 -0.0117448 -0.00678235) fixed=true
    Marker Virtual_Ground_LFJC: toes_l (0.0366865 -0.0117448 0.00678235) fixed=true
    Marker Virtual_Ground_LTOE: toes_l (0.04155997 -0.01261556 0.03097421) fixed=true
    Marker Virtual_Ground_RTOE: toes_r (0.04163124 -0.01237949 -0.03039461) fixed=true
    Marker Virtual_Ground_RMT1: calcn_r (0.1594133 -0.01442895 -0.02910851) fixed=true
    Marker Virtual_Ground_RMT5: toes_r (-0.01156927 -0.01237949 0.0509233) fixed=true
    Marker Virtual_Ground_LMT1: calcn_l (0.1563761 -0.01287291 0.02905864) fixed=true
    Marker Virtual_Ground_LMT5: toes_l (-0.01154947 -0.01261556 -0.05189436) fixed=true
